// SBML level 2 version 4

model mix_of_E30VNPRL_E30VNPRL_gene_expression()
  // mix_of_E30VNPRL_E30VNPRL_gene_expression

  // Compartments:
  compartment contents = 1;

  // Species:
  species RNAP in contents = 100.0001/contents;
  species Ribo in contents = 30.00002/contents;
  species RecBCD in contents = 5.000003/contents;
  species RNase in contents = 100.0001/contents;
  species AGTP in contents = 3180048/contents;
  species CUTP in contents = 1908029/contents;
  species AA in contents = 3.180048e7/contents;
  species protein_deGFP_contents_9 in contents = 0;
  species protein_deGFP_contents_10 in contents = 0; protein_deGFP_contents_10 is "protein deGFP*";
  species RNA_utr1_deGFP in contents = 0; RNA_utr1_deGFP is "RNA utr1--deGFP";
  species Ribo_RNA_utr1_deGFP in contents = 0; Ribo_RNA_utr1_deGFP is "Ribo:RNA utr1--deGFP";
  species DNA_p28_ptet_utr1_deGFP in contents = 2.000001/contents; DNA_p28_ptet_utr1_deGFP is "DNA p28_ptet--utr1--deGFP";
  species RNAP28 in contents = 0;
  species RNAP28_DNA_p28_ptet_utr1_deGFP in contents = 0; RNAP28_DNA_p28_ptet_utr1_deGFP is "RNAP28:DNA p28_ptet--utr1--deGFP";
  species protein_sigma28 in contents = 0;
  species protein_tetRdimer in contents = 0;
  species CUTP_AGTP_RNAP28_DNA_p28_ptet_utr1_deGFP in contents = 0; CUTP_AGTP_RNAP28_DNA_p28_ptet_utr1_deGFP is "CUTP:AGTP:RNAP28:DNA p28_ptet--utr1--deGFP";
  species term_RNAP28_DNA_p28_ptet_utr1_deGFP in contents = 0; term_RNAP28_DNA_p28_ptet_utr1_deGFP is "term_RNAP28:DNA p28_ptet--utr1--deGFP";
  species RNAP28_DNA_p28_ptet_utr1_deGFP_protein_tetRdimer in contents = 0; RNAP28_DNA_p28_ptet_utr1_deGFP_protein_tetRdimer is "RNAP28:DNA p28_ptet--utr1--deGFP:protein tetRdimer";
  species CUTP_AGTP_RNAP28_DNA_p28_ptet_utr1_deGFP_protein_tetRdimer in contents = 0; CUTP_AGTP_RNAP28_DNA_p28_ptet_utr1_deGFP_protein_tetRdimer is "CUTP:AGTP:RNAP28:DNA p28_ptet--utr1--deGFP:protein tetRdimer";
  species term_RNAP28_DNA_p28_ptet_utr1_deGFP_protein_tetRdimer in contents = 0; term_RNAP28_DNA_p28_ptet_utr1_deGFP_protein_tetRdimer is "term_RNAP28:DNA p28_ptet--utr1--deGFP:protein tetRdimer";
  species AA_2AGTP_Ribo_RNA_utr1_deGFP in contents = 0; AA_2AGTP_Ribo_RNA_utr1_deGFP is "AA:2AGTP:Ribo:RNA utr1--deGFP";
  species term_Ribo_RNA_utr1_deGFP in contents = 0; term_Ribo_RNA_utr1_deGFP is "term_Ribo:RNA utr1--deGFP";
  species RNA_utr1_sigma28 in contents = 0; RNA_utr1_sigma28 is "RNA utr1--sigma28";
  species Ribo_RNA_utr1_sigma28 in contents = 0; Ribo_RNA_utr1_sigma28 is "Ribo:RNA utr1--sigma28";
  species DNA_plac_utr1_sigma28 in contents = 0.2000001/contents; DNA_plac_utr1_sigma28 is "DNA plac--utr1--sigma28";
  species RNAP_DNA_plac_utr1_sigma28 in contents = 0; RNAP_DNA_plac_utr1_sigma28 is "RNAP:DNA plac--utr1--sigma28";
  species CUTP_AGTP_RNAP_DNA_plac_utr1_sigma28 in contents = 0; CUTP_AGTP_RNAP_DNA_plac_utr1_sigma28 is "CUTP:AGTP:RNAP:DNA plac--utr1--sigma28";
  species term_RNAP_DNA_plac_utr1_sigma28 in contents = 0; term_RNAP_DNA_plac_utr1_sigma28 is "term_RNAP:DNA plac--utr1--sigma28";
  species AA_2AGTP_Ribo_RNA_utr1_sigma28 in contents = 0; AA_2AGTP_Ribo_RNA_utr1_sigma28 is "AA:2AGTP:Ribo:RNA utr1--sigma28";
  species term_Ribo_RNA_utr1_sigma28 in contents = 0; term_Ribo_RNA_utr1_sigma28 is "term_Ribo:RNA utr1--sigma28";
  species protein_tetR in contents = 0;
  species aTc in contents = 0;
  species _2_aTc_protein_tetRdimer in contents = 0; _2_aTc_protein_tetRdimer is "2 aTc:protein tetRdimer";
  species DNA_p28_ptet_utr1_deGFP_protein_tetRdimer in contents = 0; DNA_p28_ptet_utr1_deGFP_protein_tetRdimer is "DNA p28_ptet--utr1--deGFP:protein tetRdimer";
  species AGTP_RNAP28_DNA_p28_ptet_utr1_deGFP in contents = 0; AGTP_RNAP28_DNA_p28_ptet_utr1_deGFP is "AGTP:RNAP28:DNA p28_ptet--utr1--deGFP";
  species CUTP_RNAP28_DNA_p28_ptet_utr1_deGFP in contents = 0; CUTP_RNAP28_DNA_p28_ptet_utr1_deGFP is "CUTP:RNAP28:DNA p28_ptet--utr1--deGFP";
  species AGTP_RNAP28_DNA_p28_ptet_utr1_deGFP_protein_tetRdimer in contents = 0; AGTP_RNAP28_DNA_p28_ptet_utr1_deGFP_protein_tetRdimer is "AGTP:RNAP28:DNA p28_ptet--utr1--deGFP:protein tetRdimer";
  species CUTP_RNAP28_DNA_p28_ptet_utr1_deGFP_protein_tetRdimer in contents = 0; CUTP_RNAP28_DNA_p28_ptet_utr1_deGFP_protein_tetRdimer is "CUTP:RNAP28:DNA p28_ptet--utr1--deGFP:protein tetRdimer";
  species AA_Ribo_RNA_utr1_deGFP in contents = 0; AA_Ribo_RNA_utr1_deGFP is "AA:Ribo:RNA utr1--deGFP";
  species RNA_utr1_deGFP_RNase in contents = 0; RNA_utr1_deGFP_RNase is "RNA utr1--deGFP:RNase";
  species Ribo_RNA_utr1_deGFP_RNase in contents = 0; Ribo_RNA_utr1_deGFP_RNase is "Ribo:RNA utr1--deGFP:RNase";
  species AA_2AGTP_Ribo_RNA_utr1_deGFP_RNase in contents = 0; AA_2AGTP_Ribo_RNA_utr1_deGFP_RNase is "AA:2AGTP:Ribo:RNA utr1--deGFP:RNase";
  species term_Ribo_RNA_utr1_deGFP_RNase in contents = 0; term_Ribo_RNA_utr1_deGFP_RNase is "term_Ribo:RNA utr1--deGFP:RNase";
  species AA_Ribo_RNA_utr1_deGFP_RNase in contents = 0; AA_Ribo_RNA_utr1_deGFP_RNase is "AA:Ribo:RNA utr1--deGFP:RNase";
  species AGTP_RNAP_DNA_plac_utr1_sigma28 in contents = 0; AGTP_RNAP_DNA_plac_utr1_sigma28 is "AGTP:RNAP:DNA plac--utr1--sigma28";
  species CUTP_RNAP_DNA_plac_utr1_sigma28 in contents = 0; CUTP_RNAP_DNA_plac_utr1_sigma28 is "CUTP:RNAP:DNA plac--utr1--sigma28";
  species AA_Ribo_RNA_utr1_sigma28 in contents = 0; AA_Ribo_RNA_utr1_sigma28 is "AA:Ribo:RNA utr1--sigma28";
  species RNA_utr1_sigma28_RNase in contents = 0; RNA_utr1_sigma28_RNase is "RNA utr1--sigma28:RNase";
  species Ribo_RNA_utr1_sigma28_RNase in contents = 0; Ribo_RNA_utr1_sigma28_RNase is "Ribo:RNA utr1--sigma28:RNase";
  species AA_2AGTP_Ribo_RNA_utr1_sigma28_RNase in contents = 0; AA_2AGTP_Ribo_RNA_utr1_sigma28_RNase is "AA:2AGTP:Ribo:RNA utr1--sigma28:RNase";
  species term_Ribo_RNA_utr1_sigma28_RNase in contents = 0; term_Ribo_RNA_utr1_sigma28_RNase is "term_Ribo:RNA utr1--sigma28:RNase";
  species AA_Ribo_RNA_utr1_sigma28_RNase in contents = 0; AA_Ribo_RNA_utr1_sigma28_RNase is "AA:Ribo:RNA utr1--sigma28:RNase";
  species AGTP_USED in contents = 0;

  // Parameters:
  AGTPdeg_F = 0;

  // Reactions:
  reaction_57: protein_tetRdimer + 2 aTc -> _2_aTc_protein_tetRdimer; TXTL_INDUCER_TETR_ATC_F*protein_tetRdimer*aTc^2 - TXTL_INDUCER_TETR_ATC_R*_2_aTc_protein_tetRdimer;
    TXTL_INDUCER_TETR_ATC_F = 1e-5; TXTL_INDUCER_TETR_ATC_R = 0.1;
  reaction_58: 2 protein_tetR -> protein_tetRdimer; reaction_58_kf*protein_tetR^2 - reaction_58_kr*protein_tetRdimer;
    reaction_58_kf = 1; reaction_58_kr = 1;
  reaction_59: protein_deGFP_contents_9 => protein_deGFP_contents_10; TXTL_PROT_deGFP_MATURATION*protein_deGFP_contents_9;
    TXTL_PROT_deGFP_MATURATION = 0.002310491;
  reaction_60: RNA_utr1_deGFP + Ribo -> Ribo_RNA_utr1_deGFP; reaction_60_TXTL_UTR_UTR1_F*RNA_utr1_deGFP*Ribo - reaction_60_TXTL_UTR_UTR1_R*Ribo_RNA_utr1_deGFP;
    reaction_60_TXTL_UTR_UTR1_F = 0.2; reaction_60_TXTL_UTR_UTR1_R = 4;
  reaction_61: DNA_p28_ptet_utr1_deGFP + RNAP28 -> RNAP28_DNA_p28_ptet_utr1_deGFP; TXTL_PTET_RNAPbound_F*DNA_p28_ptet_utr1_deGFP*RNAP28 - TXTL_PTET_RNAPbound_R*RNAP28_DNA_p28_ptet_utr1_deGFP;
    TXTL_PTET_RNAPbound_F = 0.006; TXTL_PTET_RNAPbound_R = 5;
  reaction_62: DNA_p28_ptet_utr1_deGFP + protein_tetRdimer -> DNA_p28_ptet_utr1_deGFP_protein_tetRdimer; reaction_62_kf*DNA_p28_ptet_utr1_deGFP*protein_tetRdimer - reaction_62_kr*DNA_p28_ptet_utr1_deGFP_protein_tetRdimer;
    reaction_62_kf = 0.00286; reaction_62_kr = 1.1e-5;
  reaction_63: RNAP28_DNA_p28_ptet_utr1_deGFP + protein_tetRdimer -> RNAP28_DNA_p28_ptet_utr1_deGFP_protein_tetRdimer; reaction_63_kf*RNAP28_DNA_p28_ptet_utr1_deGFP*protein_tetRdimer - reaction_63_kr*RNAP28_DNA_p28_ptet_utr1_deGFP_protein_tetRdimer;
    reaction_63_kf = 0.00286; reaction_63_kr = 1.1e-5;
  reaction_64: DNA_p28_ptet_utr1_deGFP_protein_tetRdimer + RNAP28 -> RNAP28_DNA_p28_ptet_utr1_deGFP_protein_tetRdimer; reaction_64_kf*DNA_p28_ptet_utr1_deGFP_protein_tetRdimer*RNAP28 - reaction_64_kr*RNAP28_DNA_p28_ptet_utr1_deGFP_protein_tetRdimer;
    reaction_64_kf = 0.006; reaction_64_kr = 5000;
  reaction_65: CUTP_AGTP_RNAP28_DNA_p28_ptet_utr1_deGFP => RNAP28_DNA_p28_ptet_utr1_deGFP; reaction_65_TXTL_NTP_consumption*CUTP_AGTP_RNAP28_DNA_p28_ptet_utr1_deGFP;
    reaction_65_TXTL_NTP_consumption = 0.7485294;
  reaction_66: term_RNAP28_DNA_p28_ptet_utr1_deGFP => RNAP28 + DNA_p28_ptet_utr1_deGFP; reaction_66_TXTL_RNAPBOUND_TERMINATION_RATE*term_RNAP28_DNA_p28_ptet_utr1_deGFP;
    reaction_66_TXTL_RNAPBOUND_TERMINATION_RATE = 0.05;
  reaction_67: RNAP28_DNA_p28_ptet_utr1_deGFP + AGTP -> AGTP_RNAP28_DNA_p28_ptet_utr1_deGFP; reaction_67_TXTL_NTP_RNAP_F*RNAP28_DNA_p28_ptet_utr1_deGFP*AGTP - reaction_67_TXTL_NTP_RNAP_R*AGTP_RNAP28_DNA_p28_ptet_utr1_deGFP;
    reaction_67_TXTL_NTP_RNAP_F = 1000; reaction_67_TXTL_NTP_RNAP_R = 120000000;
  reaction_68: RNAP28_DNA_p28_ptet_utr1_deGFP + CUTP -> CUTP_RNAP28_DNA_p28_ptet_utr1_deGFP; reaction_68_TXTL_NTP_RNAP_F*RNAP28_DNA_p28_ptet_utr1_deGFP*CUTP - reaction_68_TXTL_NTP_RNAP_R*CUTP_RNAP28_DNA_p28_ptet_utr1_deGFP;
    reaction_68_TXTL_NTP_RNAP_F = 1000; reaction_68_TXTL_NTP_RNAP_R = 120000000;
  reaction_69: AGTP_RNAP28_DNA_p28_ptet_utr1_deGFP + CUTP -> CUTP_AGTP_RNAP28_DNA_p28_ptet_utr1_deGFP; reaction_69_TXTL_NTP_RNAP_F*AGTP_RNAP28_DNA_p28_ptet_utr1_deGFP*CUTP - reaction_69_TXTL_NTP_RNAP_R*CUTP_AGTP_RNAP28_DNA_p28_ptet_utr1_deGFP;
    reaction_69_TXTL_NTP_RNAP_F = 1; reaction_69_TXTL_NTP_RNAP_R = 120000;
  reaction_70: CUTP_RNAP28_DNA_p28_ptet_utr1_deGFP + AGTP -> CUTP_AGTP_RNAP28_DNA_p28_ptet_utr1_deGFP; reaction_70_TXTL_NTP_RNAP_F*CUTP_RNAP28_DNA_p28_ptet_utr1_deGFP*AGTP - reaction_70_TXTL_NTP_RNAP_R*CUTP_AGTP_RNAP28_DNA_p28_ptet_utr1_deGFP;
    reaction_70_TXTL_NTP_RNAP_F = 1; reaction_70_TXTL_NTP_RNAP_R = 120000;
  reaction_71: CUTP_AGTP_RNAP28_DNA_p28_ptet_utr1_deGFP => term_RNAP28_DNA_p28_ptet_utr1_deGFP + RNA_utr1_deGFP; reaction_71_TXTL_transcription_rate1*CUTP_AGTP_RNAP28_DNA_p28_ptet_utr1_deGFP;
    reaction_71_TXTL_transcription_rate1 = 0.001470588;
  reaction_72: CUTP_AGTP_RNAP28_DNA_p28_ptet_utr1_deGFP_protein_tetRdimer => RNAP28_DNA_p28_ptet_utr1_deGFP_protein_tetRdimer; reaction_72_TXTL_NTP_consumption*CUTP_AGTP_RNAP28_DNA_p28_ptet_utr1_deGFP_protein_tetRdimer;
    reaction_72_TXTL_NTP_consumption = 0.7485294;
  reaction_73: term_RNAP28_DNA_p28_ptet_utr1_deGFP_protein_tetRdimer => RNAP28 + DNA_p28_ptet_utr1_deGFP + protein_tetRdimer; reaction_73_TXTL_RNAPBOUND_TERMINATION_RATE*term_RNAP28_DNA_p28_ptet_utr1_deGFP_protein_tetRdimer;
    reaction_73_TXTL_RNAPBOUND_TERMINATION_RATE = 0.05;
  reaction_74: RNAP28_DNA_p28_ptet_utr1_deGFP_protein_tetRdimer + AGTP -> AGTP_RNAP28_DNA_p28_ptet_utr1_deGFP_protein_tetRdimer; reaction_74_TXTL_NTP_RNAP_F*RNAP28_DNA_p28_ptet_utr1_deGFP_protein_tetRdimer*AGTP - reaction_74_TXTL_NTP_RNAP_R*AGTP_RNAP28_DNA_p28_ptet_utr1_deGFP_protein_tetRdimer;
    reaction_74_TXTL_NTP_RNAP_F = 1000; reaction_74_TXTL_NTP_RNAP_R = 120000000;
  reaction_75: RNAP28_DNA_p28_ptet_utr1_deGFP_protein_tetRdimer + CUTP -> CUTP_RNAP28_DNA_p28_ptet_utr1_deGFP_protein_tetRdimer; reaction_75_TXTL_NTP_RNAP_F*RNAP28_DNA_p28_ptet_utr1_deGFP_protein_tetRdimer*CUTP - reaction_75_TXTL_NTP_RNAP_R*CUTP_RNAP28_DNA_p28_ptet_utr1_deGFP_protein_tetRdimer;
    reaction_75_TXTL_NTP_RNAP_F = 1000; reaction_75_TXTL_NTP_RNAP_R = 120000000;
  reaction_76: AGTP_RNAP28_DNA_p28_ptet_utr1_deGFP_protein_tetRdimer + CUTP -> CUTP_AGTP_RNAP28_DNA_p28_ptet_utr1_deGFP_protein_tetRdimer; reaction_76_TXTL_NTP_RNAP_F*AGTP_RNAP28_DNA_p28_ptet_utr1_deGFP_protein_tetRdimer*CUTP - reaction_76_TXTL_NTP_RNAP_R*CUTP_AGTP_RNAP28_DNA_p28_ptet_utr1_deGFP_protein_tetRdimer;
    reaction_76_TXTL_NTP_RNAP_F = 1; reaction_76_TXTL_NTP_RNAP_R = 120000;
  reaction_77: CUTP_RNAP28_DNA_p28_ptet_utr1_deGFP_protein_tetRdimer + AGTP -> CUTP_AGTP_RNAP28_DNA_p28_ptet_utr1_deGFP_protein_tetRdimer; reaction_77_TXTL_NTP_RNAP_F*CUTP_RNAP28_DNA_p28_ptet_utr1_deGFP_protein_tetRdimer*AGTP - reaction_77_TXTL_NTP_RNAP_R*CUTP_AGTP_RNAP28_DNA_p28_ptet_utr1_deGFP_protein_tetRdimer;
    reaction_77_TXTL_NTP_RNAP_F = 1; reaction_77_TXTL_NTP_RNAP_R = 120000;
  reaction_78: CUTP_AGTP_RNAP28_DNA_p28_ptet_utr1_deGFP_protein_tetRdimer => term_RNAP28_DNA_p28_ptet_utr1_deGFP_protein_tetRdimer + RNA_utr1_deGFP; reaction_78_TXTL_transcription_rate1*CUTP_AGTP_RNAP28_DNA_p28_ptet_utr1_deGFP_protein_tetRdimer;
    reaction_78_TXTL_transcription_rate1 = 0.001470588;
  reaction_79: Ribo_RNA_utr1_deGFP + AA -> AA_Ribo_RNA_utr1_deGFP; reaction_79_TL_AA_F*Ribo_RNA_utr1_deGFP*AA - reaction_79_TL_AA_R*AA_Ribo_RNA_utr1_deGFP;
    reaction_79_TL_AA_F = 300; reaction_79_TL_AA_R = 0.1;
  reaction_80: AA_Ribo_RNA_utr1_deGFP + 2 AGTP -> AA_2AGTP_Ribo_RNA_utr1_deGFP; reaction_80_TL_AGTP_F*AA_Ribo_RNA_utr1_deGFP*AGTP^2 - reaction_80_TL_AGTP_R*AA_2AGTP_Ribo_RNA_utr1_deGFP;
    reaction_80_TL_AGTP_F = 30; reaction_80_TL_AGTP_R = 10;
  reaction_81: AA_2AGTP_Ribo_RNA_utr1_deGFP => term_Ribo_RNA_utr1_deGFP; reaction_81_TXTL_TL_AA_consumption*AA_2AGTP_Ribo_RNA_utr1_deGFP;
    reaction_81_TXTL_TL_AA_consumption = 0.024;
  reaction_82: AA_2AGTP_Ribo_RNA_utr1_deGFP => term_Ribo_RNA_utr1_deGFP + protein_deGFP_contents_9; reaction_82_TXTL_TL_rate*AA_2AGTP_Ribo_RNA_utr1_deGFP;
    reaction_82_TXTL_TL_rate = 0.012;
  reaction_83: term_Ribo_RNA_utr1_deGFP => RNA_utr1_deGFP + Ribo; reaction_83_TXTL_RIBOBOUND_TERMINATION_RATE*term_Ribo_RNA_utr1_deGFP;
    reaction_83_TXTL_RIBOBOUND_TERMINATION_RATE = 50;
  reaction_84: RNA_utr1_deGFP + RNase -> RNA_utr1_deGFP_RNase; reaction_84_TXTL_RNAdeg_F*RNA_utr1_deGFP*RNase - reaction_84_TXTL_RNAdeg_R*RNA_utr1_deGFP_RNase;
    reaction_84_TXTL_RNAdeg_F = 10; reaction_84_TXTL_RNAdeg_R = 2000;
  reaction_85: RNA_utr1_deGFP_RNase => RNase; reaction_85_TXTL_RNAdeg_F*RNA_utr1_deGFP_RNase;
    reaction_85_TXTL_RNAdeg_F = 0.002777778;
  reaction_86: Ribo_RNA_utr1_deGFP + RNase -> Ribo_RNA_utr1_deGFP_RNase; reaction_86_TXTL_RNAdeg_F*Ribo_RNA_utr1_deGFP*RNase - reaction_86_TXTL_RNAdeg_R*Ribo_RNA_utr1_deGFP_RNase;
    reaction_86_TXTL_RNAdeg_F = 10; reaction_86_TXTL_RNAdeg_R = 2000;
  reaction_87: Ribo_RNA_utr1_deGFP_RNase => RNase + Ribo; reaction_87_TXTL_RNAdeg_F*Ribo_RNA_utr1_deGFP_RNase;
    reaction_87_TXTL_RNAdeg_F = 0.002777778;
  reaction_88: AA_2AGTP_Ribo_RNA_utr1_deGFP + RNase -> AA_2AGTP_Ribo_RNA_utr1_deGFP_RNase; reaction_88_TXTL_RNAdeg_F*AA_2AGTP_Ribo_RNA_utr1_deGFP*RNase - reaction_88_TXTL_RNAdeg_R*AA_2AGTP_Ribo_RNA_utr1_deGFP_RNase;
    reaction_88_TXTL_RNAdeg_F = 10; reaction_88_TXTL_RNAdeg_R = 2000;
  reaction_89: AA_2AGTP_Ribo_RNA_utr1_deGFP_RNase => RNase + AA + 2 AGTP + Ribo; reaction_89_TXTL_RNAdeg_F*AA_2AGTP_Ribo_RNA_utr1_deGFP_RNase;
    reaction_89_TXTL_RNAdeg_F = 0.002777778;
  reaction_90: term_Ribo_RNA_utr1_deGFP + RNase -> term_Ribo_RNA_utr1_deGFP_RNase; reaction_90_TXTL_RNAdeg_F*term_Ribo_RNA_utr1_deGFP*RNase - reaction_90_TXTL_RNAdeg_R*term_Ribo_RNA_utr1_deGFP_RNase;
    reaction_90_TXTL_RNAdeg_F = 10; reaction_90_TXTL_RNAdeg_R = 2000;
  reaction_91: term_Ribo_RNA_utr1_deGFP_RNase => RNase + Ribo; reaction_91_TXTL_RNAdeg_F*term_Ribo_RNA_utr1_deGFP_RNase;
    reaction_91_TXTL_RNAdeg_F = 0.002777778;
  reaction_92: AA_Ribo_RNA_utr1_deGFP + RNase -> AA_Ribo_RNA_utr1_deGFP_RNase; reaction_92_TXTL_RNAdeg_F*AA_Ribo_RNA_utr1_deGFP*RNase - reaction_92_TXTL_RNAdeg_R*AA_Ribo_RNA_utr1_deGFP_RNase;
    reaction_92_TXTL_RNAdeg_F = 10; reaction_92_TXTL_RNAdeg_R = 2000;
  reaction_93: AA_Ribo_RNA_utr1_deGFP_RNase => RNase + AA + Ribo; reaction_93_TXTL_RNAdeg_F*AA_Ribo_RNA_utr1_deGFP_RNase;
    reaction_93_TXTL_RNAdeg_F = 0.002777778;
  reaction_94: RNAP + protein_sigma28 -> RNAP28; Sigma28_RNAP_F*RNAP*protein_sigma28 - Sigma28_RNAP_R*RNAP28;
    Sigma28_RNAP_F = 100; Sigma28_RNAP_R = 0.1;
  reaction_95: RNA_utr1_sigma28 + Ribo -> Ribo_RNA_utr1_sigma28; reaction_95_TXTL_UTR_UTR1_F*RNA_utr1_sigma28*Ribo - reaction_95_TXTL_UTR_UTR1_R*Ribo_RNA_utr1_sigma28;
    reaction_95_TXTL_UTR_UTR1_F = 0.2; reaction_95_TXTL_UTR_UTR1_R = 4;
  reaction_96: DNA_plac_utr1_sigma28 + RNAP -> RNAP_DNA_plac_utr1_sigma28; TXTL_PLAC_RNAPbound_F*DNA_plac_utr1_sigma28*RNAP - TXTL_PLAC_RNAPbound_R*RNAP_DNA_plac_utr1_sigma28;
    TXTL_PLAC_RNAPbound_F = 20; TXTL_PLAC_RNAPbound_R = 400;
  reaction_97: CUTP_AGTP_RNAP_DNA_plac_utr1_sigma28 => RNAP_DNA_plac_utr1_sigma28; reaction_97_TXTL_NTP_consumption*CUTP_AGTP_RNAP_DNA_plac_utr1_sigma28;
    reaction_97_TXTL_NTP_consumption = 0.7487705;
  reaction_98: term_RNAP_DNA_plac_utr1_sigma28 => RNAP + DNA_plac_utr1_sigma28; reaction_98_TXTL_RNAPBOUND_TERMINATION_RATE*term_RNAP_DNA_plac_utr1_sigma28;
    reaction_98_TXTL_RNAPBOUND_TERMINATION_RATE = 0.05;
  reaction_99: RNAP_DNA_plac_utr1_sigma28 + AGTP -> AGTP_RNAP_DNA_plac_utr1_sigma28; reaction_99_TXTL_NTP_RNAP_F*RNAP_DNA_plac_utr1_sigma28*AGTP - reaction_99_TXTL_NTP_RNAP_R*AGTP_RNAP_DNA_plac_utr1_sigma28;
    reaction_99_TXTL_NTP_RNAP_F = 1000; reaction_99_TXTL_NTP_RNAP_R = 120000000;
  reaction_100: RNAP_DNA_plac_utr1_sigma28 + CUTP -> CUTP_RNAP_DNA_plac_utr1_sigma28; reaction_100_TXTL_NTP_RNAP_F*RNAP_DNA_plac_utr1_sigma28*CUTP - reaction_100_TXTL_NTP_RNAP_R*CUTP_RNAP_DNA_plac_utr1_sigma28;
    reaction_100_TXTL_NTP_RNAP_F = 1000; reaction_100_TXTL_NTP_RNAP_R = 120000000;
  reaction_101: AGTP_RNAP_DNA_plac_utr1_sigma28 + CUTP -> CUTP_AGTP_RNAP_DNA_plac_utr1_sigma28; reaction_101_TXTL_NTP_RNAP_F*AGTP_RNAP_DNA_plac_utr1_sigma28*CUTP - reaction_101_TXTL_NTP_RNAP_R*CUTP_AGTP_RNAP_DNA_plac_utr1_sigma28;
    reaction_101_TXTL_NTP_RNAP_F = 1; reaction_101_TXTL_NTP_RNAP_R = 120000;
  reaction_102: CUTP_RNAP_DNA_plac_utr1_sigma28 + AGTP -> CUTP_AGTP_RNAP_DNA_plac_utr1_sigma28; reaction_102_TXTL_NTP_RNAP_F*CUTP_RNAP_DNA_plac_utr1_sigma28*AGTP - reaction_102_TXTL_NTP_RNAP_R*CUTP_AGTP_RNAP_DNA_plac_utr1_sigma28;
    reaction_102_TXTL_NTP_RNAP_F = 1; reaction_102_TXTL_NTP_RNAP_R = 120000;
  reaction_103: CUTP_AGTP_RNAP_DNA_plac_utr1_sigma28 => term_RNAP_DNA_plac_utr1_sigma28 + RNA_utr1_sigma28; reaction_103_TXTL_transcription_rate1*CUTP_AGTP_RNAP_DNA_plac_utr1_sigma28;
    reaction_103_TXTL_transcription_rate1 = 0.001229508;
  reaction_104: Ribo_RNA_utr1_sigma28 + AA -> AA_Ribo_RNA_utr1_sigma28; reaction_104_TL_AA_F*Ribo_RNA_utr1_sigma28*AA - reaction_104_TL_AA_R*AA_Ribo_RNA_utr1_sigma28;
    reaction_104_TL_AA_F = 300; reaction_104_TL_AA_R = 0.1;
  reaction_105: AA_Ribo_RNA_utr1_sigma28 + 2 AGTP -> AA_2AGTP_Ribo_RNA_utr1_sigma28; reaction_105_TL_AGTP_F*AA_Ribo_RNA_utr1_sigma28*AGTP^2 - reaction_105_TL_AGTP_R*AA_2AGTP_Ribo_RNA_utr1_sigma28;
    reaction_105_TL_AGTP_F = 30; reaction_105_TL_AGTP_R = 10;
  reaction_106: AA_2AGTP_Ribo_RNA_utr1_sigma28 => term_Ribo_RNA_utr1_sigma28; reaction_106_TXTL_TL_AA_consumption*AA_2AGTP_Ribo_RNA_utr1_sigma28;
    reaction_106_TXTL_TL_AA_consumption = 0.03;
  reaction_107: AA_2AGTP_Ribo_RNA_utr1_sigma28 => term_Ribo_RNA_utr1_sigma28 + protein_sigma28; reaction_107_TXTL_TL_rate*AA_2AGTP_Ribo_RNA_utr1_sigma28;
    reaction_107_TXTL_TL_rate = 0.01;
  reaction_108: term_Ribo_RNA_utr1_sigma28 => RNA_utr1_sigma28 + Ribo; reaction_108_TXTL_RIBOBOUND_TERMINATION_RATE*term_Ribo_RNA_utr1_sigma28;
    reaction_108_TXTL_RIBOBOUND_TERMINATION_RATE = 50;
  reaction_109: RNA_utr1_sigma28 + RNase -> RNA_utr1_sigma28_RNase; reaction_109_TXTL_RNAdeg_F*RNA_utr1_sigma28*RNase - reaction_109_TXTL_RNAdeg_R*RNA_utr1_sigma28_RNase;
    reaction_109_TXTL_RNAdeg_F = 10; reaction_109_TXTL_RNAdeg_R = 2000;
  reaction_110: RNA_utr1_sigma28_RNase => RNase; reaction_110_TXTL_RNAdeg_F*RNA_utr1_sigma28_RNase;
    reaction_110_TXTL_RNAdeg_F = 0.002777778;
  reaction_111: Ribo_RNA_utr1_sigma28 + RNase -> Ribo_RNA_utr1_sigma28_RNase; reaction_111_TXTL_RNAdeg_F*Ribo_RNA_utr1_sigma28*RNase - reaction_111_TXTL_RNAdeg_R*Ribo_RNA_utr1_sigma28_RNase;
    reaction_111_TXTL_RNAdeg_F = 10; reaction_111_TXTL_RNAdeg_R = 2000;
  reaction_112: Ribo_RNA_utr1_sigma28_RNase => RNase + Ribo; reaction_112_TXTL_RNAdeg_F*Ribo_RNA_utr1_sigma28_RNase;
    reaction_112_TXTL_RNAdeg_F = 0.002777778;
  reaction_113: AA_2AGTP_Ribo_RNA_utr1_sigma28 + RNase -> AA_2AGTP_Ribo_RNA_utr1_sigma28_RNase; reaction_113_TXTL_RNAdeg_F*AA_2AGTP_Ribo_RNA_utr1_sigma28*RNase - reaction_113_TXTL_RNAdeg_R*AA_2AGTP_Ribo_RNA_utr1_sigma28_RNase;
    reaction_113_TXTL_RNAdeg_F = 10; reaction_113_TXTL_RNAdeg_R = 2000;
  reaction_114: AA_2AGTP_Ribo_RNA_utr1_sigma28_RNase => RNase + AA + 2 AGTP + Ribo; reaction_114_TXTL_RNAdeg_F*AA_2AGTP_Ribo_RNA_utr1_sigma28_RNase;
    reaction_114_TXTL_RNAdeg_F = 0.002777778;
  reaction_115: term_Ribo_RNA_utr1_sigma28 + RNase -> term_Ribo_RNA_utr1_sigma28_RNase; reaction_115_TXTL_RNAdeg_F*term_Ribo_RNA_utr1_sigma28*RNase - reaction_115_TXTL_RNAdeg_R*term_Ribo_RNA_utr1_sigma28_RNase;
    reaction_115_TXTL_RNAdeg_F = 10; reaction_115_TXTL_RNAdeg_R = 2000;
  reaction_116: term_Ribo_RNA_utr1_sigma28_RNase => RNase + Ribo; reaction_116_TXTL_RNAdeg_F*term_Ribo_RNA_utr1_sigma28_RNase;
    reaction_116_TXTL_RNAdeg_F = 0.002777778;
  reaction_117: AA_Ribo_RNA_utr1_sigma28 + RNase -> AA_Ribo_RNA_utr1_sigma28_RNase; reaction_117_TXTL_RNAdeg_F*AA_Ribo_RNA_utr1_sigma28*RNase - reaction_117_TXTL_RNAdeg_R*AA_Ribo_RNA_utr1_sigma28_RNase;
    reaction_117_TXTL_RNAdeg_F = 10; reaction_117_TXTL_RNAdeg_R = 2000;
  reaction_118: AA_Ribo_RNA_utr1_sigma28_RNase => RNase + AA + Ribo; reaction_118_TXTL_RNAdeg_F*AA_Ribo_RNA_utr1_sigma28_RNase;
    reaction_118_TXTL_RNAdeg_F = 0.002777778;
  reaction_119: AGTP => AGTP_USED; AGTPdeg_F*AGTP;

  // Events:
  event_120: at (time <= 5400): AGTPdeg_F = 0;
  event_121: at (time > 5400): AGTPdeg_F = 0.0002;
end
