// SBML level 3 version 2

model connected_subsystems_combined_model_of__mw57655e33_b0da_4e0d_8be7_9f10a9a0b77c_AnB_in()
  // model units - substance: count, time: second, extent: mole

  // Compartments:
  compartment cell_combined = 2 volume;
  compartment cell_combined = 1 litre;

  // Species:
  species mwe26f1cb1_86e9_4e5e_9114_02970551aeb9_AnB in cell_combined = 100.0001/cell_combined; mwe26f1cb1_86e9_4e5e_9114_02970551aeb9_AnB is "RNAP";
  species mw41d4d6ad_adcc_4998_9736_211a8e68d45b_AnB in cell_combined = 30.00002/cell_combined; mw41d4d6ad_adcc_4998_9736_211a8e68d45b_AnB is "Ribo";
  species mw095e21ea_4cd4_4394_91fc_b2b5764f5556_AnB in cell_combined = 5.000003/cell_combined; mw095e21ea_4cd4_4394_91fc_b2b5764f5556_AnB is "RecBCD";
  species mwe269f848_a93f_4ee4_946a_ed61e5a48c84_AnB in cell_combined = 100.0001/cell_combined; mwe269f848_a93f_4ee4_946a_ed61e5a48c84_AnB is "RNase";
  species mwbef4c2a1_39b3_45b9_9560_96f951c1a1bb_AnB in cell_combined = 3180048/cell_combined; mwbef4c2a1_39b3_45b9_9560_96f951c1a1bb_AnB is "AGTP";
  species mw14a57bf4_e194_425f_a352_17261719166f_AnB in cell_combined = 1908029/cell_combined; mw14a57bf4_e194_425f_a352_17261719166f_AnB is "CUTP";
  species mwfa85abf9_cffb_4957_9678_1c8b4dafd02b_AnB in cell_combined = 3.180048e7/cell_combined; mwfa85abf9_cffb_4957_9678_1c8b4dafd02b_AnB is "AA";
  species mwab9d2159_bf3e_4f3c_baf2_d175b38e1198_AnB in cell_combined = 0; mwab9d2159_bf3e_4f3c_baf2_d175b38e1198_AnB is "protein tetR";
  species mwdb7ddc75_8820_4ba8_87e2_df32424af589_AnB in cell_combined = 0; mwdb7ddc75_8820_4ba8_87e2_df32424af589_AnB is "aTc";
  species mwd65f83fe_728f_4fe0_8e8a_156cac9da854_AnB in cell_combined = 0; mwd65f83fe_728f_4fe0_8e8a_156cac9da854_AnB is "protein tetRdimer";
  species mwc43475e1_0130_4c9b_b1da_ba74b5ce8db6_AnB in cell_combined = 0; mwc43475e1_0130_4c9b_b1da_ba74b5ce8db6_AnB is "RNA utr1--tetR";
  species mwee983928_d5f9_4fa4_82ae_7674ce11a164_AnB in cell_combined = 0; mwee983928_d5f9_4fa4_82ae_7674ce11a164_AnB is "Ribo:RNA utr1--tetR";
  species mwb0aee06d_abe2_4c7c_af3e_8f042eb02bc7_AnB in cell_combined = 0.5000003/cell_combined; mwb0aee06d_abe2_4c7c_af3e_8f042eb02bc7_AnB is "DNA psigX--utr1--tetR";
  species mwb8d95765_e1f7_4557_b5c0_e40b693ebdd1_AnB in cell_combined = 0; mwb8d95765_e1f7_4557_b5c0_e40b693ebdd1_AnB is "RNAPSIGX";
  species mwba6cfef5_893b_474b_bd35_d0283ca55c91_AnB in cell_combined = 0; mwba6cfef5_893b_474b_bd35_d0283ca55c91_AnB is "RNAPSIGX:DNA psigX--utr1--tetR";
  species mw2639d30c_e88d_46f5_a93a_997b65be22c8_AnB in cell_combined = 0; mw2639d30c_e88d_46f5_a93a_997b65be22c8_AnB is "AA:2AGTP:Ribo:RNA utr1--tetR";
  species mwa9ef0e73_1944_4ec4_9138_9d54f966fcf2_AnB in cell_combined = 0; mwa9ef0e73_1944_4ec4_9138_9d54f966fcf2_AnB is "term_Ribo:RNA utr1--tetR";
  species mw5f21ad5e_ed26_4c67_a1ea_7e431ce0ca48_AnB in cell_combined = 0; mw5f21ad5e_ed26_4c67_a1ea_7e431ce0ca48_AnB is "protein deGFP";
  species mw09573132_c9ae_462c_a7c8_6e82bcf624d8_AnB in cell_combined = 0; mw09573132_c9ae_462c_a7c8_6e82bcf624d8_AnB is "protein deGFP*";
  species mw42df642f_d9db_4718_a36f_6bd1ae930719_AnB in cell_combined = 0; mw42df642f_d9db_4718_a36f_6bd1ae930719_AnB is "RNA utr1--deGFP";
  species mwef6a699a_8299_45ed_95a1_20c751e272f9_AnB in cell_combined = 0; mwef6a699a_8299_45ed_95a1_20c751e272f9_AnB is "Ribo:RNA utr1--deGFP";
  species mw262ad616_bfca_4490_b1fe_7c20f2bbe036_AnB in cell_combined = 2.000001/cell_combined; mw262ad616_bfca_4490_b1fe_7c20f2bbe036_AnB is "DNA p28_ptet--utr1--deGFP";
  species mw404a05a7_dfdf_4ac5_8c65_8c2ec10d852b_AnB in cell_combined = 0; mw404a05a7_dfdf_4ac5_8c65_8c2ec10d852b_AnB is "RNAP28";
  species mwc17f290b_3175_40f8_92f4_3545163c67d6_AnB in cell_combined = 0; mwc17f290b_3175_40f8_92f4_3545163c67d6_AnB is "RNAP28:DNA p28_ptet--utr1--deGFP";
  species mw7a2929bf_23db_4c0d_b6f5_bf69bb477bcb_AnB in cell_combined = 0; mw7a2929bf_23db_4c0d_b6f5_bf69bb477bcb_AnB is "protein sigma28";
  species mw15176c50_739a_4df7_82be_1cc78d9023eb_AnB in cell_combined = 0; mw15176c50_739a_4df7_82be_1cc78d9023eb_AnB is "CUTP:AGTP:RNAP28:DNA p28_ptet--utr1--deGFP";
  species mw2c0dd119_44c6_4ef8_9b33_2654073c0d4b_AnB in cell_combined = 0; mw2c0dd119_44c6_4ef8_9b33_2654073c0d4b_AnB is "term_RNAP28:DNA p28_ptet--utr1--deGFP";
  species mwcae5b911_5ff1_49a8_98ef_1f8824967c41_AnB in cell_combined = 0; mwcae5b911_5ff1_49a8_98ef_1f8824967c41_AnB is "RNAP28:DNA p28_ptet--utr1--deGFP:protein tetRdimer";
  species mwfe70ddf6_5ae6_4809_aba0_acae00ac9833_AnB in cell_combined = 0; mwfe70ddf6_5ae6_4809_aba0_acae00ac9833_AnB is "CUTP:AGTP:RNAP28:DNA p28_ptet--utr1--deGFP:protein tetRdimer";
  species mwcdbab810_080b_4e6e_9371_cea3821e8bd7_AnB in cell_combined = 0; mwcdbab810_080b_4e6e_9371_cea3821e8bd7_AnB is "term_RNAP28:DNA p28_ptet--utr1--deGFP:protein tetRdimer";
  species mw54fe4092_6d73_4f63_b697_f6e98aae19fa_AnB in cell_combined = 0; mw54fe4092_6d73_4f63_b697_f6e98aae19fa_AnB is "AA:2AGTP:Ribo:RNA utr1--deGFP";
  species mwfb6fa50e_844e_40ff_a108_c5c0fa27e01f_AnB in cell_combined = 0; mwfb6fa50e_844e_40ff_a108_c5c0fa27e01f_AnB is "term_Ribo:RNA utr1--deGFP";
  species mwcea5300b_7ddc_42ab_925c_87b55beab50b_AnB in cell_combined = 0; mwcea5300b_7ddc_42ab_925c_87b55beab50b_AnB is "protein sigmaX";
  species mwa07cfc4d_c5f7_49d1_adcb_d24c80d37745_AnB in cell_combined = 0; mwa07cfc4d_c5f7_49d1_adcb_d24c80d37745_AnB is "RNA utr1--sigmaX";
  species mw065bf04a_6b4d_4ffe_bcfe_f72e58d1e9db_AnB in cell_combined = 0; mw065bf04a_6b4d_4ffe_bcfe_f72e58d1e9db_AnB is "Ribo:RNA utr1--sigmaX";
  species mwe156cca0_16b9_4b52_b889_6b7b6d7152d5_AnB in cell_combined = 0.5000003/cell_combined; mwe156cca0_16b9_4b52_b889_6b7b6d7152d5_AnB is "DNA plas--utr1--sigmaX";
  species mw5bfd941c_66e6_4a4c_b6bb_157ad14105c7_AnB in cell_combined = 0; mw5bfd941c_66e6_4a4c_b6bb_157ad14105c7_AnB is "RNAP:DNA plas--utr1--sigmaX";
  species mwf7d21f13_7c61_4c7a_b4b9_08280255ab19_AnB in cell_combined = 0; mwf7d21f13_7c61_4c7a_b4b9_08280255ab19_AnB is "AA:2AGTP:Ribo:RNA utr1--sigmaX";
  species mw1fd81d8c_23e4_4079_bc65_7691b70d3544_AnB in cell_combined = 0; mw1fd81d8c_23e4_4079_bc65_7691b70d3544_AnB is "term_Ribo:RNA utr1--sigmaX";
  species mw533eb5b8_8b8e_4dac_9a4b_71d6eb3a3b87_AnB in cell_combined = 0; mw533eb5b8_8b8e_4dac_9a4b_71d6eb3a3b87_AnB is "RNA utr1--sigma28";
  species mw4d455df1_e8ff_4b24_a734_72d8e842f12f_AnB in cell_combined = 0; mw4d455df1_e8ff_4b24_a734_72d8e842f12f_AnB is "Ribo:RNA utr1--sigma28";
  species mwcef0e140_c962_4d8d_8a59_e568667c674c_AnB in cell_combined = 2.000001/cell_combined; mwcef0e140_c962_4d8d_8a59_e568667c674c_AnB is "DNA plux--utr1--sigma28";
  species mwe82cef39_2326_4877_8bef_dafc36b43da4_AnB in cell_combined = 0; mwe82cef39_2326_4877_8bef_dafc36b43da4_AnB is "RNAP:DNA plux--utr1--sigma28";
  species mw4fedd4e5_85f3_41dc_b57d_0122030c7cb7_AnB in cell_combined = 0; mw4fedd4e5_85f3_41dc_b57d_0122030c7cb7_AnB is "AA:2AGTP:Ribo:RNA utr1--sigma28";
  species mw52913b82_e0ca_41b9_8b31_b67a4c98ba41_AnB in cell_combined = 0; mw52913b82_e0ca_41b9_8b31_b67a4c98ba41_AnB is "term_Ribo:RNA utr1--sigma28";
  species mw7da19d87_d0e3_49ef_9f7f_ee08ddb4a65b_AnB in cell_combined = 0; mw7da19d87_d0e3_49ef_9f7f_ee08ddb4a65b_AnB is "protein lasR";
  species mw8545f0a9_d5b7_41ae_8631_f8133e6e48e3_AnB in cell_combined = 0; mw8545f0a9_d5b7_41ae_8631_f8133e6e48e3_AnB is "OC12HSL:protein lasR";
  species mwe7299c8b_c978_499c_b659_a7cf679423bf_AnB in cell_combined = 0; mwe7299c8b_c978_499c_b659_a7cf679423bf_AnB is "RNA utr1--lasR";
  species mw821f961f_3e9f_45d8_beb3_fa53c31cf200_AnB in cell_combined = 0; mw821f961f_3e9f_45d8_beb3_fa53c31cf200_AnB is "Ribo:RNA utr1--lasR";
  species mw7f5e74ca_cee2_4996_b0ba_f02a03354e44_AnB in cell_combined = 0.5000003/cell_combined; mw7f5e74ca_cee2_4996_b0ba_f02a03354e44_AnB is "DNA plac--utr1--lasR";
  species mw9b510f28_acd6_4394_bf9a_56c412aeaeea_AnB in cell_combined = 0; mw9b510f28_acd6_4394_bf9a_56c412aeaeea_AnB is "RNAP:DNA plac--utr1--lasR";
  species mwbb071b24_8a84_4473_8060_5972bd8b23d7_AnB in cell_combined = 0; mwbb071b24_8a84_4473_8060_5972bd8b23d7_AnB is "CUTP:AGTP:RNAP:DNA plac--utr1--lasR";
  species mw9757e80e_20c7_45a6_a253_04a843cc9d6c_AnB in cell_combined = 0; mw9757e80e_20c7_45a6_a253_04a843cc9d6c_AnB is "term_RNAP:DNA plac--utr1--lasR";
  species mwf3aa8744_d349_4acd_b6a3_a126d39f0b78_AnB in cell_combined = 0; mwf3aa8744_d349_4acd_b6a3_a126d39f0b78_AnB is "AA:2AGTP:Ribo:RNA utr1--lasR";
  species mw4db62297_5f1a_4cd2_b49a_612c4ec9b288_AnB in cell_combined = 0; mw4db62297_5f1a_4cd2_b49a_612c4ec9b288_AnB is "term_Ribo:RNA utr1--lasR";
  species mw7a9edb37_bb57_4176_9eca_4757d50b96ff_AnB in cell_combined = 0; mw7a9edb37_bb57_4176_9eca_4757d50b96ff_AnB is "protein luxR";
  species mw51f6b144_881b_4e9b_a2c5_386db0664590_AnB in cell_combined = 0; mw51f6b144_881b_4e9b_a2c5_386db0664590_AnB is "OC6HSL:protein luxR";
  species mwd2a45846_560b_4fbe_8a44_9101f1712765_AnB in cell_combined = 0; mwd2a45846_560b_4fbe_8a44_9101f1712765_AnB is "RNA utr1--luxR";
  species mw3357fe24_7969_4a9a_9203_7c48c8260e4e_AnB in cell_combined = 0; mw3357fe24_7969_4a9a_9203_7c48c8260e4e_AnB is "Ribo:RNA utr1--luxR";
  species mw91be3320_3991_452b_8af2_257c30d8742b_AnB in cell_combined = 2.000001/cell_combined; mw91be3320_3991_452b_8af2_257c30d8742b_AnB is "DNA plac--utr1--luxR";
  species mwa7ee4873_d2be_47b6_a496_0b07019fe526_AnB in cell_combined = 0; mwa7ee4873_d2be_47b6_a496_0b07019fe526_AnB is "RNAP:DNA plac--utr1--luxR";
  species mw3ee67edf_053f_4ba0_a5de_653ae744a91b_AnB in cell_combined = 0; mw3ee67edf_053f_4ba0_a5de_653ae744a91b_AnB is "CUTP:AGTP:RNAP:DNA plac--utr1--luxR";
  species mw9ce5c506_f78b_4996_af0a_4367b22a4d17_AnB in cell_combined = 0; mw9ce5c506_f78b_4996_af0a_4367b22a4d17_AnB is "term_RNAP:DNA plac--utr1--luxR";
  species mwb87869ec_add0_408b_b524_b2a6e1406571_AnB in cell_combined = 0; mwb87869ec_add0_408b_b524_b2a6e1406571_AnB is "AA:2AGTP:Ribo:RNA utr1--luxR";
  species mwa51f73ea_14f8_422d_a377_1d5d002ef22d_AnB in cell_combined = 0; mwa51f73ea_14f8_422d_a377_1d5d002ef22d_AnB is "term_Ribo:RNA utr1--luxR";
  species mwb817f874_de2e_4ca0_821f_d038a7335217_AnB in cell_combined = 0; mwb817f874_de2e_4ca0_821f_d038a7335217_AnB is "2 aTc:protein tetRdimer";
  species mw7a9c85d3_d480_4697_8948_c6ecb61ea81d_AnB in cell_combined = 0; mw7a9c85d3_d480_4697_8948_c6ecb61ea81d_AnB is "CUTP:AGTP:RNAPSIGX:DNA psigX--utr1--tetR";
  species mwe6d8bbb9_7d32_43f1_b8dd_d20112cc3326_AnB in cell_combined = 0; mwe6d8bbb9_7d32_43f1_b8dd_d20112cc3326_AnB is "term_RNAPSIGX:DNA psigX--utr1--tetR";
  species mw1f3f8d8b_0a4e_40eb_be07_3816154f9919_AnB in cell_combined = 0; mw1f3f8d8b_0a4e_40eb_be07_3816154f9919_AnB is "AGTP:RNAPSIGX:DNA psigX--utr1--tetR";
  species mw611af529_0677_427a_838a_015a511313c3_AnB in cell_combined = 0; mw611af529_0677_427a_838a_015a511313c3_AnB is "CUTP:RNAPSIGX:DNA psigX--utr1--tetR";
  species mw02164b7e_5bb1_4f94_8475_9adb7994546a_AnB in cell_combined = 0; mw02164b7e_5bb1_4f94_8475_9adb7994546a_AnB is "AA:Ribo:RNA utr1--tetR";
  species mw51fa9acf_c23c_4e39_9f89_f826e85ef3b0_AnB in cell_combined = 0; mw51fa9acf_c23c_4e39_9f89_f826e85ef3b0_AnB is "RNA utr1--tetR:RNase";
  species mw69843df9_d3ef_465a_b942_4c87926f87d1_AnB in cell_combined = 0; mw69843df9_d3ef_465a_b942_4c87926f87d1_AnB is "Ribo:RNA utr1--tetR:RNase";
  species mw269395db_d626_48de_a5c4_1e5288fe5910_AnB in cell_combined = 0; mw269395db_d626_48de_a5c4_1e5288fe5910_AnB is "AA:2AGTP:Ribo:RNA utr1--tetR:RNase";
  species mw5fcf676e_d479_41a6_8c92_35c772c5dc37_AnB in cell_combined = 0; mw5fcf676e_d479_41a6_8c92_35c772c5dc37_AnB is "term_Ribo:RNA utr1--tetR:RNase";
  species mwff7ef0b0_0667_4a17_abfe_9e6d0bde01df_AnB in cell_combined = 0; mwff7ef0b0_0667_4a17_abfe_9e6d0bde01df_AnB is "AA:Ribo:RNA utr1--tetR:RNase";
  species mwba4ebcf9_ed5e_4b90_b728_941db2b48547_AnB in cell_combined = 0; mwba4ebcf9_ed5e_4b90_b728_941db2b48547_AnB is "DNA p28_ptet--utr1--deGFP:protein tetRdimer";
  species mwbf10e147_5c0f_48a6_acd1_e15ef968ff52_AnB in cell_combined = 0; mwbf10e147_5c0f_48a6_acd1_e15ef968ff52_AnB is "AGTP:RNAP28:DNA p28_ptet--utr1--deGFP";
  species mw01ca8228_c1ad_4866_a85f_3f52433510dd_AnB in cell_combined = 0; mw01ca8228_c1ad_4866_a85f_3f52433510dd_AnB is "CUTP:RNAP28:DNA p28_ptet--utr1--deGFP";
  species mw41ac4ef8_daf5_46c2_9861_190782b6da63_AnB in cell_combined = 0; mw41ac4ef8_daf5_46c2_9861_190782b6da63_AnB is "AGTP:RNAP28:DNA p28_ptet--utr1--deGFP:protein tetRdimer";
  species mw19027fbb_8a62_4f4d_a1d2_9433a98a20f0_AnB in cell_combined = 0; mw19027fbb_8a62_4f4d_a1d2_9433a98a20f0_AnB is "CUTP:RNAP28:DNA p28_ptet--utr1--deGFP:protein tetRdimer";
  species mw97c037b4_f017_45d6_9b5c_4e1bc4e1eb26_AnB in cell_combined = 0; mw97c037b4_f017_45d6_9b5c_4e1bc4e1eb26_AnB is "AA:Ribo:RNA utr1--deGFP";
  species mw359b08c7_1126_4f9b_9128_63c54bcb39cf_AnB in cell_combined = 0; mw359b08c7_1126_4f9b_9128_63c54bcb39cf_AnB is "RNA utr1--deGFP:RNase";
  species mw0f1e582d_ef0c_46ea_b204_99cfd1dc8e31_AnB in cell_combined = 0; mw0f1e582d_ef0c_46ea_b204_99cfd1dc8e31_AnB is "Ribo:RNA utr1--deGFP:RNase";
  species mw1b6c9a5c_598c_43c1_9d99_157c36bebe7a_AnB in cell_combined = 0; mw1b6c9a5c_598c_43c1_9d99_157c36bebe7a_AnB is "AA:2AGTP:Ribo:RNA utr1--deGFP:RNase";
  species mw2dece0fe_c9e6_459b_a0cc_fb71184dafef_AnB in cell_combined = 0; mw2dece0fe_c9e6_459b_a0cc_fb71184dafef_AnB is "term_Ribo:RNA utr1--deGFP:RNase";
  species mw8c5c7f7a_5416_469a_8efc_85c6e5bfefb5_AnB in cell_combined = 0; mw8c5c7f7a_5416_469a_8efc_85c6e5bfefb5_AnB is "AA:Ribo:RNA utr1--deGFP:RNase";
  species mw4c7ae5a4_8f05_44c9_bfc2_1e58523b8fba_AnB in cell_combined = 0; mw4c7ae5a4_8f05_44c9_bfc2_1e58523b8fba_AnB is "DNA plas--utr1--sigmaX:OC12HSL:protein lasR";
  species mw10d7141c_27b0_46e0_9d6f_817f6df9d9cb_AnB in cell_combined = 0; mw10d7141c_27b0_46e0_9d6f_817f6df9d9cb_AnB is "RNAP:DNA plas--utr1--sigmaX:OC12HSL:protein lasR";
  species mw39fac11d_2ddc_4355_b06d_6acd20ee2548_AnB in cell_combined = 0; mw39fac11d_2ddc_4355_b06d_6acd20ee2548_AnB is "CUTP:AGTP:RNAP:DNA plas--utr1--sigmaX";
  species mwa8dbf2cc_00c8_4948_888b_94b2435bbc60_AnB in cell_combined = 0; mwa8dbf2cc_00c8_4948_888b_94b2435bbc60_AnB is "term_RNAP:DNA plas--utr1--sigmaX";
  species mw73b59de8_b54e_4f3f_85aa_2f0a31ef99a3_AnB in cell_combined = 0; mw73b59de8_b54e_4f3f_85aa_2f0a31ef99a3_AnB is "CUTP:AGTP:RNAP:DNA plas--utr1--sigmaX:OC12HSL:protein lasR";
  species mw7b75872b_b85d_4551_86db_cce9a9eab6cf_AnB in cell_combined = 0; mw7b75872b_b85d_4551_86db_cce9a9eab6cf_AnB is "term_RNAP:DNA plas--utr1--sigmaX:OC12HSL:protein lasR";
  species mw6d94f91d_6103_4445_9478_8b0c9ac939be_AnB in cell_combined = 0; mw6d94f91d_6103_4445_9478_8b0c9ac939be_AnB is "AGTP:RNAP:DNA plas--utr1--sigmaX";
  species mw944cf215_e510_4f3e_8c6b_2cdc80bae3bb_AnB in cell_combined = 0; mw944cf215_e510_4f3e_8c6b_2cdc80bae3bb_AnB is "CUTP:RNAP:DNA plas--utr1--sigmaX";
  species mwf652ea52_d5bd_4f86_824d_76847703008d_AnB in cell_combined = 0; mwf652ea52_d5bd_4f86_824d_76847703008d_AnB is "AGTP:RNAP:DNA plas--utr1--sigmaX:OC12HSL:protein lasR";
  species mwb96830e3_3baa_413e_a014_494bfc8742f7_AnB in cell_combined = 0; mwb96830e3_3baa_413e_a014_494bfc8742f7_AnB is "CUTP:RNAP:DNA plas--utr1--sigmaX:OC12HSL:protein lasR";
  species mwd65841ba_96c2_4d96_88d0_f17c86887dee_AnB in cell_combined = 0; mwd65841ba_96c2_4d96_88d0_f17c86887dee_AnB is "AA:Ribo:RNA utr1--sigmaX";
  species mw9a36698b_94e3_48d1_9316_34a3638c802c_AnB in cell_combined = 0; mw9a36698b_94e3_48d1_9316_34a3638c802c_AnB is "RNA utr1--sigmaX:RNase";
  species mw4c863164_fb03_4865_a5f0_0ad2338ed993_AnB in cell_combined = 0; mw4c863164_fb03_4865_a5f0_0ad2338ed993_AnB is "Ribo:RNA utr1--sigmaX:RNase";
  species mw7bfb7ac7_522d_4003_8d74_2f8398e00159_AnB in cell_combined = 0; mw7bfb7ac7_522d_4003_8d74_2f8398e00159_AnB is "AA:2AGTP:Ribo:RNA utr1--sigmaX:RNase";
  species mw9bb808dd_2401_45af_8c5a_b6daeb4f274e_AnB in cell_combined = 0; mw9bb808dd_2401_45af_8c5a_b6daeb4f274e_AnB is "term_Ribo:RNA utr1--sigmaX:RNase";
  species mw1d8add78_72ad_4d08_9f44_ed2089d752da_AnB in cell_combined = 0; mw1d8add78_72ad_4d08_9f44_ed2089d752da_AnB is "AA:Ribo:RNA utr1--sigmaX:RNase";
  species mw57a0e349_0621_49d7_ba49_55473e600658_AnB in cell_combined = 0; mw57a0e349_0621_49d7_ba49_55473e600658_AnB is "DNA plux--utr1--sigma28:OC6HSL:protein luxR";
  species mwf1d9cbb0_c7e6_45e7_a3e3_fdc0d39c7987_AnB in cell_combined = 0; mwf1d9cbb0_c7e6_45e7_a3e3_fdc0d39c7987_AnB is "RNAP:DNA plux--utr1--sigma28:OC6HSL:protein luxR";
  species mw144ed4b2_02d6_447b_9dd2_4d3b780c9113_AnB in cell_combined = 0; mw144ed4b2_02d6_447b_9dd2_4d3b780c9113_AnB is "RNAP:DNA plux--utr1--sigma28+OC6HSL:protein luxR";
  species mwb55741ab_8f7e_4a41_b875_0b15d345b89e_AnB in cell_combined = 0; mwb55741ab_8f7e_4a41_b875_0b15d345b89e_AnB is "CUTP:AGTP:RNAP:DNA plux--utr1--sigma28";
  species mw1bb453d2_f6db_44a1_b44d_ed93fef360cd_AnB in cell_combined = 0; mw1bb453d2_f6db_44a1_b44d_ed93fef360cd_AnB is "term_RNAP:DNA plux--utr1--sigma28";
  species mw9c6826e6_be3e_4d75_a70b_7386b6505939_AnB in cell_combined = 0; mw9c6826e6_be3e_4d75_a70b_7386b6505939_AnB is "CUTP:AGTP:RNAP:DNA plux--utr1--sigma28:OC6HSL:protein luxR";
  species mwb62257b8_b7b5_4af1_8d8e_355c03e5a7b9_AnB in cell_combined = 0; mwb62257b8_b7b5_4af1_8d8e_355c03e5a7b9_AnB is "term_RNAP:DNA plux--utr1--sigma28:OC6HSL:protein luxR";
  species mw1eaf957b_c28c_438d_a2ab_bce712628e77_AnB in cell_combined = 0; mw1eaf957b_c28c_438d_a2ab_bce712628e77_AnB is "AGTP:RNAP:DNA plux--utr1--sigma28";
  species mw57048240_4f4b_4790_8d46_86a4c0ee6f1c_AnB in cell_combined = 0; mw57048240_4f4b_4790_8d46_86a4c0ee6f1c_AnB is "CUTP:RNAP:DNA plux--utr1--sigma28";
  species mwefff14e2_0a63_41d8_aab2_e4f368bd83e8_AnB in cell_combined = 0; mwefff14e2_0a63_41d8_aab2_e4f368bd83e8_AnB is "AGTP:RNAP:DNA plux--utr1--sigma28:OC6HSL:protein luxR";
  species mw94b5be2e_9dec_4a65_abd1_521865cfc9fb_AnB in cell_combined = 0; mw94b5be2e_9dec_4a65_abd1_521865cfc9fb_AnB is "CUTP:RNAP:DNA plux--utr1--sigma28:OC6HSL:protein luxR";
  species mw95dac394_f5f9_493e_beb1_2955219fd03e_AnB in cell_combined = 0; mw95dac394_f5f9_493e_beb1_2955219fd03e_AnB is "AA:Ribo:RNA utr1--sigma28";
  species mwfb99e7c0_7171_4cfc_a118_b2630e51d21a_AnB in cell_combined = 0; mwfb99e7c0_7171_4cfc_a118_b2630e51d21a_AnB is "RNA utr1--sigma28:RNase";
  species mwe45b5988_ada6_46e1_9875_d925ea218fc3_AnB in cell_combined = 0; mwe45b5988_ada6_46e1_9875_d925ea218fc3_AnB is "Ribo:RNA utr1--sigma28:RNase";
  species mw702213e9_e07f_4047_a4ef_46198134819f_AnB in cell_combined = 0; mw702213e9_e07f_4047_a4ef_46198134819f_AnB is "AA:2AGTP:Ribo:RNA utr1--sigma28:RNase";
  species mw4d1b0f9e_7105_4e17_8bf7_386aafded37d_AnB in cell_combined = 0; mw4d1b0f9e_7105_4e17_8bf7_386aafded37d_AnB is "term_Ribo:RNA utr1--sigma28:RNase";
  species mwdfac0584_fa3a_4ac3_b147_8cbb10a2d488_AnB in cell_combined = 0; mwdfac0584_fa3a_4ac3_b147_8cbb10a2d488_AnB is "AA:Ribo:RNA utr1--sigma28:RNase";
  species mwdd88c8b3_1ace_4ffb_9665_bacb309abaf4_AnB in cell_combined = 0; mwdd88c8b3_1ace_4ffb_9665_bacb309abaf4_AnB is "AGTP:RNAP:DNA plac--utr1--lasR";
  species mw8273af67_e7e7_49b6_88e8_5317e18838c8_AnB in cell_combined = 0; mw8273af67_e7e7_49b6_88e8_5317e18838c8_AnB is "CUTP:RNAP:DNA plac--utr1--lasR";
  species mwdb8c4048_92db_46d6_b90f_42dedc72532e_AnB in cell_combined = 0; mwdb8c4048_92db_46d6_b90f_42dedc72532e_AnB is "AA:Ribo:RNA utr1--lasR";
  species mw4b013c16_fbca_4bb2_89ce_2237fa9fe2fe_AnB in cell_combined = 0; mw4b013c16_fbca_4bb2_89ce_2237fa9fe2fe_AnB is "RNA utr1--lasR:RNase";
  species mw30e3a809_45c5_47da_86da_07d1826f7092_AnB in cell_combined = 0; mw30e3a809_45c5_47da_86da_07d1826f7092_AnB is "Ribo:RNA utr1--lasR:RNase";
  species mw9d4996bf_1fd0_402a_85e1_1ec6341b1bf8_AnB in cell_combined = 0; mw9d4996bf_1fd0_402a_85e1_1ec6341b1bf8_AnB is "AA:2AGTP:Ribo:RNA utr1--lasR:RNase";
  species mw4065c8cd_35ea_436c_9c19_09cf62b005f2_AnB in cell_combined = 0; mw4065c8cd_35ea_436c_9c19_09cf62b005f2_AnB is "term_Ribo:RNA utr1--lasR:RNase";
  species mw0abe9448_6e05_4a9a_b1d3_56ab851b2eb7_AnB in cell_combined = 0; mw0abe9448_6e05_4a9a_b1d3_56ab851b2eb7_AnB is "AA:Ribo:RNA utr1--lasR:RNase";
  species mw54ea6262_72a2_4a0f_bab3_6cb88c47b087_AnB in cell_combined = 0; mw54ea6262_72a2_4a0f_bab3_6cb88c47b087_AnB is "AGTP:RNAP:DNA plac--utr1--luxR";
  species mw75d3a80d_b086_4efc_b8fc_82db3f0138ea_AnB in cell_combined = 0; mw75d3a80d_b086_4efc_b8fc_82db3f0138ea_AnB is "CUTP:RNAP:DNA plac--utr1--luxR";
  species mw45a6eaf0_ef06_4e83_af52_20279748e975_AnB in cell_combined = 0; mw45a6eaf0_ef06_4e83_af52_20279748e975_AnB is "AA:Ribo:RNA utr1--luxR";
  species mw13d2d7ee_f7f2_4653_963c_b7dd514ec7d6_AnB in cell_combined = 0; mw13d2d7ee_f7f2_4653_963c_b7dd514ec7d6_AnB is "RNA utr1--luxR:RNase";
  species mw83fa3b1d_9aa1_498f_be05_3b8f7c042a96_AnB in cell_combined = 0; mw83fa3b1d_9aa1_498f_be05_3b8f7c042a96_AnB is "Ribo:RNA utr1--luxR:RNase";
  species mwdd1eb4aa_c5b9_4f9f_a3b5_7114f5f91833_AnB in cell_combined = 0; mwdd1eb4aa_c5b9_4f9f_a3b5_7114f5f91833_AnB is "AA:2AGTP:Ribo:RNA utr1--luxR:RNase";
  species mw64f8f5a6_a2af_4120_958c_96fca30c4991_AnB in cell_combined = 0; mw64f8f5a6_a2af_4120_958c_96fca30c4991_AnB is "term_Ribo:RNA utr1--luxR:RNase";
  species mw7fd816fa_5fb6_4482_a9db_b8ab9f62c489_AnB in cell_combined = 0; mw7fd816fa_5fb6_4482_a9db_b8ab9f62c489_AnB is "AA:Ribo:RNA utr1--luxR:RNase";
  species mwe5d0239e_246f_4516_b131_a0069d2a429c_AnB in cell_combined = 0; mwe5d0239e_246f_4516_b131_a0069d2a429c_AnB is "AGTP_USED";
  species inputA_1_connected_with_OC6HSL in cell_combined = 500/cell_combined;
  species inputB_1_connected_with_OC12HSL in cell_combined = 500/cell_combined;

  // Parameters:
  mwcdb2be4d_740e_4578_b3b9_e763438ca817_AnB = 0; mwcdb2be4d_740e_4578_b3b9_e763438ca817_AnB is "AGTPdeg_F";

  // Reactions:
  mw7cfa3cd8_d04c_499a_8f2d_7aa1d31eb27f_AnB: mwd65f83fe_728f_4fe0_8e8a_156cac9da854_AnB + 2 mwdb7ddc75_8820_4ba8_87e2_df32424af589_AnB -> mwb817f874_de2e_4ca0_821f_d038a7335217_AnB; TXTL_INDUCER_TETR_ATC_F*mwd65f83fe_728f_4fe0_8e8a_156cac9da854_AnB*mwdb7ddc75_8820_4ba8_87e2_df32424af589_AnB^2 - TXTL_INDUCER_TETR_ATC_R*mwb817f874_de2e_4ca0_821f_d038a7335217_AnB;
    TXTL_INDUCER_TETR_ATC_F = 1e-5; TXTL_INDUCER_TETR_ATC_R = 0.1;
  mw290a3266_581b_48e4_9818_49d1dc30b20d_AnB: 2 mwab9d2159_bf3e_4f3c_baf2_d175b38e1198_AnB -> mwd65f83fe_728f_4fe0_8e8a_156cac9da854_AnB; mw290a3266_581b_48e4_9818_49d1dc30b20d_AnB_kf*mwab9d2159_bf3e_4f3c_baf2_d175b38e1198_AnB^2 - mw290a3266_581b_48e4_9818_49d1dc30b20d_AnB_kr*mwd65f83fe_728f_4fe0_8e8a_156cac9da854_AnB;
    mw290a3266_581b_48e4_9818_49d1dc30b20d_AnB_kf = 1; mw290a3266_581b_48e4_9818_49d1dc30b20d_AnB_kr = 1;
  mwb40803e3_546e_47f3_8216_2ea1a493b120_AnB: mwc43475e1_0130_4c9b_b1da_ba74b5ce8db6_AnB + mw41d4d6ad_adcc_4998_9736_211a8e68d45b_AnB -> mwee983928_d5f9_4fa4_82ae_7674ce11a164_AnB; mwb40803e3_546e_47f3_8216_2ea1a493b120_AnB_TXTL_UTR_UTR1_F*mwc43475e1_0130_4c9b_b1da_ba74b5ce8db6_AnB*mw41d4d6ad_adcc_4998_9736_211a8e68d45b_AnB - mwb40803e3_546e_47f3_8216_2ea1a493b120_AnB_TXTL_UTR_UTR1_R*mwee983928_d5f9_4fa4_82ae_7674ce11a164_AnB;
    mwb40803e3_546e_47f3_8216_2ea1a493b120_AnB_TXTL_UTR_UTR1_F = 0.2; mwb40803e3_546e_47f3_8216_2ea1a493b120_AnB_TXTL_UTR_UTR1_R = 4;
  mw10038995_8cc8_4da1_8801_1dfcf77c7686_AnB: mwb0aee06d_abe2_4c7c_af3e_8f042eb02bc7_AnB + mwb8d95765_e1f7_4557_b5c0_e40b693ebdd1_AnB -> mwba6cfef5_893b_474b_bd35_d0283ca55c91_AnB; TXTL_SIGX_RNAPbound_F*mwb0aee06d_abe2_4c7c_af3e_8f042eb02bc7_AnB*mwb8d95765_e1f7_4557_b5c0_e40b693ebdd1_AnB - TXTL_SIGX_RNAPbound_R*mwba6cfef5_893b_474b_bd35_d0283ca55c91_AnB;
    TXTL_SIGX_RNAPbound_F = 10; TXTL_SIGX_RNAPbound_R = 0.1;
  mw1ec3c015_1f90_4c52_8fba_3c1b017be609_AnB: mw7a9c85d3_d480_4697_8948_c6ecb61ea81d_AnB => mwba6cfef5_893b_474b_bd35_d0283ca55c91_AnB; mw1ec3c015_1f90_4c52_8fba_3c1b017be609_AnB_TXTL_NTP_consumption*mw7a9c85d3_d480_4697_8948_c6ecb61ea81d_AnB;
    mw1ec3c015_1f90_4c52_8fba_3c1b017be609_AnB_TXTL_NTP_consumption = 0.7487705;
  mw6d69dadc_dcaa_49d2_9985_5ee4713429e4_AnB: mwe6d8bbb9_7d32_43f1_b8dd_d20112cc3326_AnB => mwb8d95765_e1f7_4557_b5c0_e40b693ebdd1_AnB + mwb0aee06d_abe2_4c7c_af3e_8f042eb02bc7_AnB; mw6d69dadc_dcaa_49d2_9985_5ee4713429e4_AnB_TXTL_RNAPBOUND_TERMINATION_RATE*mwe6d8bbb9_7d32_43f1_b8dd_d20112cc3326_AnB;
    mw6d69dadc_dcaa_49d2_9985_5ee4713429e4_AnB_TXTL_RNAPBOUND_TERMINATION_RATE = 0.05;
  mwac0f102b_86f8_4538_bfb3_aaa95cbe5472_AnB: mwba6cfef5_893b_474b_bd35_d0283ca55c91_AnB + mwbef4c2a1_39b3_45b9_9560_96f951c1a1bb_AnB -> mw1f3f8d8b_0a4e_40eb_be07_3816154f9919_AnB; mwac0f102b_86f8_4538_bfb3_aaa95cbe5472_AnB_TXTL_NTP_RNAP_F*mwba6cfef5_893b_474b_bd35_d0283ca55c91_AnB*mwbef4c2a1_39b3_45b9_9560_96f951c1a1bb_AnB - mwac0f102b_86f8_4538_bfb3_aaa95cbe5472_AnB_TXTL_NTP_RNAP_R*mw1f3f8d8b_0a4e_40eb_be07_3816154f9919_AnB;
    mwac0f102b_86f8_4538_bfb3_aaa95cbe5472_AnB_TXTL_NTP_RNAP_F = 1000; mwac0f102b_86f8_4538_bfb3_aaa95cbe5472_AnB_TXTL_NTP_RNAP_R = 120000000;
  mwbc84f017_5b95_43e6_ac83_69dcbb9b4cb7_AnB: mwba6cfef5_893b_474b_bd35_d0283ca55c91_AnB + mw14a57bf4_e194_425f_a352_17261719166f_AnB -> mw611af529_0677_427a_838a_015a511313c3_AnB; mwbc84f017_5b95_43e6_ac83_69dcbb9b4cb7_AnB_TXTL_NTP_RNAP_F*mwba6cfef5_893b_474b_bd35_d0283ca55c91_AnB*mw14a57bf4_e194_425f_a352_17261719166f_AnB - mwbc84f017_5b95_43e6_ac83_69dcbb9b4cb7_AnB_TXTL_NTP_RNAP_R*mw611af529_0677_427a_838a_015a511313c3_AnB;
    mwbc84f017_5b95_43e6_ac83_69dcbb9b4cb7_AnB_TXTL_NTP_RNAP_F = 1000; mwbc84f017_5b95_43e6_ac83_69dcbb9b4cb7_AnB_TXTL_NTP_RNAP_R = 120000000;
  mwc57eca14_2c83_4582_94be_f0e48fda7533_AnB: mw1f3f8d8b_0a4e_40eb_be07_3816154f9919_AnB + mw14a57bf4_e194_425f_a352_17261719166f_AnB -> mw7a9c85d3_d480_4697_8948_c6ecb61ea81d_AnB; mwc57eca14_2c83_4582_94be_f0e48fda7533_AnB_TXTL_NTP_RNAP_F*mw1f3f8d8b_0a4e_40eb_be07_3816154f9919_AnB*mw14a57bf4_e194_425f_a352_17261719166f_AnB - mwc57eca14_2c83_4582_94be_f0e48fda7533_AnB_TXTL_NTP_RNAP_R*mw7a9c85d3_d480_4697_8948_c6ecb61ea81d_AnB;
    mwc57eca14_2c83_4582_94be_f0e48fda7533_AnB_TXTL_NTP_RNAP_F = 1; mwc57eca14_2c83_4582_94be_f0e48fda7533_AnB_TXTL_NTP_RNAP_R = 120000;
  mw0bcca4a5_d0c8_4718_a51f_f03e7c2f919a_AnB: mw611af529_0677_427a_838a_015a511313c3_AnB + mwbef4c2a1_39b3_45b9_9560_96f951c1a1bb_AnB -> mw7a9c85d3_d480_4697_8948_c6ecb61ea81d_AnB; mw0bcca4a5_d0c8_4718_a51f_f03e7c2f919a_AnB_TXTL_NTP_RNAP_F*mw611af529_0677_427a_838a_015a511313c3_AnB*mwbef4c2a1_39b3_45b9_9560_96f951c1a1bb_AnB - mw0bcca4a5_d0c8_4718_a51f_f03e7c2f919a_AnB_TXTL_NTP_RNAP_R*mw7a9c85d3_d480_4697_8948_c6ecb61ea81d_AnB;
    mw0bcca4a5_d0c8_4718_a51f_f03e7c2f919a_AnB_TXTL_NTP_RNAP_F = 1; mw0bcca4a5_d0c8_4718_a51f_f03e7c2f919a_AnB_TXTL_NTP_RNAP_R = 120000;
  mw97da7772_2351_4a42_b132_5169e519a6d0_AnB: mw7a9c85d3_d480_4697_8948_c6ecb61ea81d_AnB => mwe6d8bbb9_7d32_43f1_b8dd_d20112cc3326_AnB + mwc43475e1_0130_4c9b_b1da_ba74b5ce8db6_AnB; mw97da7772_2351_4a42_b132_5169e519a6d0_AnB_TXTL_transcription_rate1*mw7a9c85d3_d480_4697_8948_c6ecb61ea81d_AnB;
    mw97da7772_2351_4a42_b132_5169e519a6d0_AnB_TXTL_transcription_rate1 = 0.001229508;
  mw2a87ee5c_b93b_4358_b4b4_24843371b36f_AnB: mwee983928_d5f9_4fa4_82ae_7674ce11a164_AnB + mwfa85abf9_cffb_4957_9678_1c8b4dafd02b_AnB -> mw02164b7e_5bb1_4f94_8475_9adb7994546a_AnB; mw2a87ee5c_b93b_4358_b4b4_24843371b36f_AnB_TL_AA_F*mwee983928_d5f9_4fa4_82ae_7674ce11a164_AnB*mwfa85abf9_cffb_4957_9678_1c8b4dafd02b_AnB - mw2a87ee5c_b93b_4358_b4b4_24843371b36f_AnB_TL_AA_R*mw02164b7e_5bb1_4f94_8475_9adb7994546a_AnB;
    mw2a87ee5c_b93b_4358_b4b4_24843371b36f_AnB_TL_AA_F = 300; mw2a87ee5c_b93b_4358_b4b4_24843371b36f_AnB_TL_AA_R = 0.1;
  mw963f36be_6afa_47ac_8838_9b40d8c32ac1_AnB: mw02164b7e_5bb1_4f94_8475_9adb7994546a_AnB + 2 mwbef4c2a1_39b3_45b9_9560_96f951c1a1bb_AnB -> mw2639d30c_e88d_46f5_a93a_997b65be22c8_AnB; mw963f36be_6afa_47ac_8838_9b40d8c32ac1_AnB_TL_AGTP_F*mw02164b7e_5bb1_4f94_8475_9adb7994546a_AnB*mwbef4c2a1_39b3_45b9_9560_96f951c1a1bb_AnB^2 - mw963f36be_6afa_47ac_8838_9b40d8c32ac1_AnB_TL_AGTP_R*mw2639d30c_e88d_46f5_a93a_997b65be22c8_AnB;
    mw963f36be_6afa_47ac_8838_9b40d8c32ac1_AnB_TL_AGTP_F = 30; mw963f36be_6afa_47ac_8838_9b40d8c32ac1_AnB_TL_AGTP_R = 10;
  mwd8886849_188b_4e02_9bb1_b69da10fa481_AnB: mw2639d30c_e88d_46f5_a93a_997b65be22c8_AnB => mwa9ef0e73_1944_4ec4_9138_9d54f966fcf2_AnB; mwd8886849_188b_4e02_9bb1_b69da10fa481_AnB_TXTL_TL_AA_consumption*mw2639d30c_e88d_46f5_a93a_997b65be22c8_AnB;
    mwd8886849_188b_4e02_9bb1_b69da10fa481_AnB_TXTL_TL_AA_consumption = 0.03;
  mw2b67a1dd_2edb_4178_af1c_dec153b8ebcd_AnB: mw2639d30c_e88d_46f5_a93a_997b65be22c8_AnB => mwa9ef0e73_1944_4ec4_9138_9d54f966fcf2_AnB + mwab9d2159_bf3e_4f3c_baf2_d175b38e1198_AnB; mw2b67a1dd_2edb_4178_af1c_dec153b8ebcd_AnB_TXTL_TL_rate*mw2639d30c_e88d_46f5_a93a_997b65be22c8_AnB;
    mw2b67a1dd_2edb_4178_af1c_dec153b8ebcd_AnB_TXTL_TL_rate = 0.01;
  mw0401d355_6829_4e6f_9d79_2a79d70c3503_AnB: mwa9ef0e73_1944_4ec4_9138_9d54f966fcf2_AnB => mwc43475e1_0130_4c9b_b1da_ba74b5ce8db6_AnB + mw41d4d6ad_adcc_4998_9736_211a8e68d45b_AnB; mw0401d355_6829_4e6f_9d79_2a79d70c3503_AnB_TXTL_RIBOBOUND_TERMINATION_RATE*mwa9ef0e73_1944_4ec4_9138_9d54f966fcf2_AnB;
    mw0401d355_6829_4e6f_9d79_2a79d70c3503_AnB_TXTL_RIBOBOUND_TERMINATION_RATE = 50;
  mw4bfd2eff_5571_435b_8740_80f4fd067b10_AnB: mwc43475e1_0130_4c9b_b1da_ba74b5ce8db6_AnB + mwe269f848_a93f_4ee4_946a_ed61e5a48c84_AnB -> mw51fa9acf_c23c_4e39_9f89_f826e85ef3b0_AnB; mw4bfd2eff_5571_435b_8740_80f4fd067b10_AnB_TXTL_RNAdeg_F*mwc43475e1_0130_4c9b_b1da_ba74b5ce8db6_AnB*mwe269f848_a93f_4ee4_946a_ed61e5a48c84_AnB - mw4bfd2eff_5571_435b_8740_80f4fd067b10_AnB_TXTL_RNAdeg_R*mw51fa9acf_c23c_4e39_9f89_f826e85ef3b0_AnB;
    mw4bfd2eff_5571_435b_8740_80f4fd067b10_AnB_TXTL_RNAdeg_F = 10; mw4bfd2eff_5571_435b_8740_80f4fd067b10_AnB_TXTL_RNAdeg_R = 2000;
  mw5829f26b_7ad8_4c35_889d_78ff0e7e08a4_AnB: mw51fa9acf_c23c_4e39_9f89_f826e85ef3b0_AnB => mwe269f848_a93f_4ee4_946a_ed61e5a48c84_AnB; mw5829f26b_7ad8_4c35_889d_78ff0e7e08a4_AnB_TXTL_RNAdeg_F*mw51fa9acf_c23c_4e39_9f89_f826e85ef3b0_AnB;
    mw5829f26b_7ad8_4c35_889d_78ff0e7e08a4_AnB_TXTL_RNAdeg_F = 0.002777778;
  mw32a323eb_cb86_4385_bd08_14b17101b3ec_AnB: mwee983928_d5f9_4fa4_82ae_7674ce11a164_AnB + mwe269f848_a93f_4ee4_946a_ed61e5a48c84_AnB -> mw69843df9_d3ef_465a_b942_4c87926f87d1_AnB; mw32a323eb_cb86_4385_bd08_14b17101b3ec_AnB_TXTL_RNAdeg_F*mwee983928_d5f9_4fa4_82ae_7674ce11a164_AnB*mwe269f848_a93f_4ee4_946a_ed61e5a48c84_AnB - mw32a323eb_cb86_4385_bd08_14b17101b3ec_AnB_TXTL_RNAdeg_R*mw69843df9_d3ef_465a_b942_4c87926f87d1_AnB;
    mw32a323eb_cb86_4385_bd08_14b17101b3ec_AnB_TXTL_RNAdeg_F = 10; mw32a323eb_cb86_4385_bd08_14b17101b3ec_AnB_TXTL_RNAdeg_R = 2000;
  mwb1e14e8c_038b_49e0_81eb_4ba84e6e87af_AnB: mw69843df9_d3ef_465a_b942_4c87926f87d1_AnB => mwe269f848_a93f_4ee4_946a_ed61e5a48c84_AnB + mw41d4d6ad_adcc_4998_9736_211a8e68d45b_AnB; mwb1e14e8c_038b_49e0_81eb_4ba84e6e87af_AnB_TXTL_RNAdeg_F*mw69843df9_d3ef_465a_b942_4c87926f87d1_AnB;
    mwb1e14e8c_038b_49e0_81eb_4ba84e6e87af_AnB_TXTL_RNAdeg_F = 0.002777778;
  mw51dbba73_4410_481f_9cfc_3e2a27c51560_AnB: mw2639d30c_e88d_46f5_a93a_997b65be22c8_AnB + mwe269f848_a93f_4ee4_946a_ed61e5a48c84_AnB -> mw269395db_d626_48de_a5c4_1e5288fe5910_AnB; mw51dbba73_4410_481f_9cfc_3e2a27c51560_AnB_TXTL_RNAdeg_F*mw2639d30c_e88d_46f5_a93a_997b65be22c8_AnB*mwe269f848_a93f_4ee4_946a_ed61e5a48c84_AnB - mw51dbba73_4410_481f_9cfc_3e2a27c51560_AnB_TXTL_RNAdeg_R*mw269395db_d626_48de_a5c4_1e5288fe5910_AnB;
    mw51dbba73_4410_481f_9cfc_3e2a27c51560_AnB_TXTL_RNAdeg_F = 10; mw51dbba73_4410_481f_9cfc_3e2a27c51560_AnB_TXTL_RNAdeg_R = 2000;
  mw0d49d9cf_dffd_464d_9cd2_d04c928c179a_AnB: mw269395db_d626_48de_a5c4_1e5288fe5910_AnB => mwe269f848_a93f_4ee4_946a_ed61e5a48c84_AnB + mwfa85abf9_cffb_4957_9678_1c8b4dafd02b_AnB + 2 mwbef4c2a1_39b3_45b9_9560_96f951c1a1bb_AnB + mw41d4d6ad_adcc_4998_9736_211a8e68d45b_AnB; mw0d49d9cf_dffd_464d_9cd2_d04c928c179a_AnB_TXTL_RNAdeg_F*mw269395db_d626_48de_a5c4_1e5288fe5910_AnB;
    mw0d49d9cf_dffd_464d_9cd2_d04c928c179a_AnB_TXTL_RNAdeg_F = 0.002777778;
  mwb37500a9_4425_4b09_a3e1_9163121cf403_AnB: mwa9ef0e73_1944_4ec4_9138_9d54f966fcf2_AnB + mwe269f848_a93f_4ee4_946a_ed61e5a48c84_AnB -> mw5fcf676e_d479_41a6_8c92_35c772c5dc37_AnB; mwb37500a9_4425_4b09_a3e1_9163121cf403_AnB_TXTL_RNAdeg_F*mwa9ef0e73_1944_4ec4_9138_9d54f966fcf2_AnB*mwe269f848_a93f_4ee4_946a_ed61e5a48c84_AnB - mwb37500a9_4425_4b09_a3e1_9163121cf403_AnB_TXTL_RNAdeg_R*mw5fcf676e_d479_41a6_8c92_35c772c5dc37_AnB;
    mwb37500a9_4425_4b09_a3e1_9163121cf403_AnB_TXTL_RNAdeg_F = 10; mwb37500a9_4425_4b09_a3e1_9163121cf403_AnB_TXTL_RNAdeg_R = 2000;
  mw900c3c3c_f1a1_4854_a0cd_2f2973edfb57_AnB: mw5fcf676e_d479_41a6_8c92_35c772c5dc37_AnB => mwe269f848_a93f_4ee4_946a_ed61e5a48c84_AnB + mw41d4d6ad_adcc_4998_9736_211a8e68d45b_AnB; mw900c3c3c_f1a1_4854_a0cd_2f2973edfb57_AnB_TXTL_RNAdeg_F*mw5fcf676e_d479_41a6_8c92_35c772c5dc37_AnB;
    mw900c3c3c_f1a1_4854_a0cd_2f2973edfb57_AnB_TXTL_RNAdeg_F = 0.002777778;
  mwda01510b_ba9a_46bb_a04d_f84287927f82_AnB: mw02164b7e_5bb1_4f94_8475_9adb7994546a_AnB + mwe269f848_a93f_4ee4_946a_ed61e5a48c84_AnB -> mwff7ef0b0_0667_4a17_abfe_9e6d0bde01df_AnB; mwda01510b_ba9a_46bb_a04d_f84287927f82_AnB_TXTL_RNAdeg_F*mw02164b7e_5bb1_4f94_8475_9adb7994546a_AnB*mwe269f848_a93f_4ee4_946a_ed61e5a48c84_AnB - mwda01510b_ba9a_46bb_a04d_f84287927f82_AnB_TXTL_RNAdeg_R*mwff7ef0b0_0667_4a17_abfe_9e6d0bde01df_AnB;
    mwda01510b_ba9a_46bb_a04d_f84287927f82_AnB_TXTL_RNAdeg_F = 10; mwda01510b_ba9a_46bb_a04d_f84287927f82_AnB_TXTL_RNAdeg_R = 2000;
  mw9dd2787e_1b1e_4216_bf2a_fea20c2e3b0a_AnB: mwff7ef0b0_0667_4a17_abfe_9e6d0bde01df_AnB => mwe269f848_a93f_4ee4_946a_ed61e5a48c84_AnB + mwfa85abf9_cffb_4957_9678_1c8b4dafd02b_AnB + mw41d4d6ad_adcc_4998_9736_211a8e68d45b_AnB; mw9dd2787e_1b1e_4216_bf2a_fea20c2e3b0a_AnB_TXTL_RNAdeg_F*mwff7ef0b0_0667_4a17_abfe_9e6d0bde01df_AnB;
    mw9dd2787e_1b1e_4216_bf2a_fea20c2e3b0a_AnB_TXTL_RNAdeg_F = 0.002777778;
  mw9352e0ad_7043_441f_a1f8_8f9e195e6a07_AnB: mw5f21ad5e_ed26_4c67_a1ea_7e431ce0ca48_AnB => mw09573132_c9ae_462c_a7c8_6e82bcf624d8_AnB; TXTL_PROT_deGFP_MATURATION*mw5f21ad5e_ed26_4c67_a1ea_7e431ce0ca48_AnB;
    TXTL_PROT_deGFP_MATURATION = 0.002310491;
  mwce7c69c6_6047_486b_bb20_cf8853f21f06_AnB: mw42df642f_d9db_4718_a36f_6bd1ae930719_AnB + mw41d4d6ad_adcc_4998_9736_211a8e68d45b_AnB -> mwef6a699a_8299_45ed_95a1_20c751e272f9_AnB; mwce7c69c6_6047_486b_bb20_cf8853f21f06_AnB_TXTL_UTR_UTR1_F*mw42df642f_d9db_4718_a36f_6bd1ae930719_AnB*mw41d4d6ad_adcc_4998_9736_211a8e68d45b_AnB - mwce7c69c6_6047_486b_bb20_cf8853f21f06_AnB_TXTL_UTR_UTR1_R*mwef6a699a_8299_45ed_95a1_20c751e272f9_AnB;
    mwce7c69c6_6047_486b_bb20_cf8853f21f06_AnB_TXTL_UTR_UTR1_F = 0.2; mwce7c69c6_6047_486b_bb20_cf8853f21f06_AnB_TXTL_UTR_UTR1_R = 4;
  mwddedc00f_89c0_4837_93bc_7baa612ac6a6_AnB: mw262ad616_bfca_4490_b1fe_7c20f2bbe036_AnB + mw404a05a7_dfdf_4ac5_8c65_8c2ec10d852b_AnB -> mwc17f290b_3175_40f8_92f4_3545163c67d6_AnB; TXTL_PTET_RNAPbound_F*mw262ad616_bfca_4490_b1fe_7c20f2bbe036_AnB*mw404a05a7_dfdf_4ac5_8c65_8c2ec10d852b_AnB - TXTL_PTET_RNAPbound_R*mwc17f290b_3175_40f8_92f4_3545163c67d6_AnB;
    TXTL_PTET_RNAPbound_F = 0.006; TXTL_PTET_RNAPbound_R = 5;
  mwb34ef5c4_371c_47dc_b80b_2ce2fbda39f7_AnB: mw262ad616_bfca_4490_b1fe_7c20f2bbe036_AnB + mwd65f83fe_728f_4fe0_8e8a_156cac9da854_AnB -> mwba4ebcf9_ed5e_4b90_b728_941db2b48547_AnB; mwb34ef5c4_371c_47dc_b80b_2ce2fbda39f7_AnB_kf*mw262ad616_bfca_4490_b1fe_7c20f2bbe036_AnB*mwd65f83fe_728f_4fe0_8e8a_156cac9da854_AnB - mwb34ef5c4_371c_47dc_b80b_2ce2fbda39f7_AnB_kr*mwba4ebcf9_ed5e_4b90_b728_941db2b48547_AnB;
    mwb34ef5c4_371c_47dc_b80b_2ce2fbda39f7_AnB_kf = 0.00286; mwb34ef5c4_371c_47dc_b80b_2ce2fbda39f7_AnB_kr = 1.1e-5;
  mw1de2059e_363e_469f_8193_2ff08db6febb_AnB: mwc17f290b_3175_40f8_92f4_3545163c67d6_AnB + mwd65f83fe_728f_4fe0_8e8a_156cac9da854_AnB -> mwcae5b911_5ff1_49a8_98ef_1f8824967c41_AnB; mw1de2059e_363e_469f_8193_2ff08db6febb_AnB_kf*mwc17f290b_3175_40f8_92f4_3545163c67d6_AnB*mwd65f83fe_728f_4fe0_8e8a_156cac9da854_AnB - mw1de2059e_363e_469f_8193_2ff08db6febb_AnB_kr*mwcae5b911_5ff1_49a8_98ef_1f8824967c41_AnB;
    mw1de2059e_363e_469f_8193_2ff08db6febb_AnB_kf = 0.00286; mw1de2059e_363e_469f_8193_2ff08db6febb_AnB_kr = 1.1e-5;
  mw0fd9c4cf_0b4d_44fa_86de_9161cc944d08_AnB: mwba4ebcf9_ed5e_4b90_b728_941db2b48547_AnB + mw404a05a7_dfdf_4ac5_8c65_8c2ec10d852b_AnB -> mwcae5b911_5ff1_49a8_98ef_1f8824967c41_AnB; mw0fd9c4cf_0b4d_44fa_86de_9161cc944d08_AnB_kf*mwba4ebcf9_ed5e_4b90_b728_941db2b48547_AnB*mw404a05a7_dfdf_4ac5_8c65_8c2ec10d852b_AnB - mw0fd9c4cf_0b4d_44fa_86de_9161cc944d08_AnB_kr*mwcae5b911_5ff1_49a8_98ef_1f8824967c41_AnB;
    mw0fd9c4cf_0b4d_44fa_86de_9161cc944d08_AnB_kf = 0.006; mw0fd9c4cf_0b4d_44fa_86de_9161cc944d08_AnB_kr = 5000;
  mwe41ad44a_9bc4_4946_97e3_10e04dbe7746_AnB: mw15176c50_739a_4df7_82be_1cc78d9023eb_AnB => mwc17f290b_3175_40f8_92f4_3545163c67d6_AnB; mwe41ad44a_9bc4_4946_97e3_10e04dbe7746_AnB_TXTL_NTP_consumption*mw15176c50_739a_4df7_82be_1cc78d9023eb_AnB;
    mwe41ad44a_9bc4_4946_97e3_10e04dbe7746_AnB_TXTL_NTP_consumption = 0.7485294;
  mwa5739c14_a4d9_4b7c_8c20_d82a00dfa70a_AnB: mw2c0dd119_44c6_4ef8_9b33_2654073c0d4b_AnB => mw404a05a7_dfdf_4ac5_8c65_8c2ec10d852b_AnB + mw262ad616_bfca_4490_b1fe_7c20f2bbe036_AnB; mwa5739c14_a4d9_4b7c_8c20_d82a00dfa70a_AnB_TXTL_RNAPBOUND_TERMINATION_RATE*mw2c0dd119_44c6_4ef8_9b33_2654073c0d4b_AnB;
    mwa5739c14_a4d9_4b7c_8c20_d82a00dfa70a_AnB_TXTL_RNAPBOUND_TERMINATION_RATE = 0.05;
  mw968986d2_582b_4c40_8986_8ebf173a3c19_AnB: mwc17f290b_3175_40f8_92f4_3545163c67d6_AnB + mwbef4c2a1_39b3_45b9_9560_96f951c1a1bb_AnB -> mwbf10e147_5c0f_48a6_acd1_e15ef968ff52_AnB; mw968986d2_582b_4c40_8986_8ebf173a3c19_AnB_TXTL_NTP_RNAP_F*mwc17f290b_3175_40f8_92f4_3545163c67d6_AnB*mwbef4c2a1_39b3_45b9_9560_96f951c1a1bb_AnB - mw968986d2_582b_4c40_8986_8ebf173a3c19_AnB_TXTL_NTP_RNAP_R*mwbf10e147_5c0f_48a6_acd1_e15ef968ff52_AnB;
    mw968986d2_582b_4c40_8986_8ebf173a3c19_AnB_TXTL_NTP_RNAP_F = 1000; mw968986d2_582b_4c40_8986_8ebf173a3c19_AnB_TXTL_NTP_RNAP_R = 120000000;
  mw57c86b96_c6e3_43ad_94f9_8b253de1d54e_AnB: mwc17f290b_3175_40f8_92f4_3545163c67d6_AnB + mw14a57bf4_e194_425f_a352_17261719166f_AnB -> mw01ca8228_c1ad_4866_a85f_3f52433510dd_AnB; mw57c86b96_c6e3_43ad_94f9_8b253de1d54e_AnB_TXTL_NTP_RNAP_F*mwc17f290b_3175_40f8_92f4_3545163c67d6_AnB*mw14a57bf4_e194_425f_a352_17261719166f_AnB - mw57c86b96_c6e3_43ad_94f9_8b253de1d54e_AnB_TXTL_NTP_RNAP_R*mw01ca8228_c1ad_4866_a85f_3f52433510dd_AnB;
    mw57c86b96_c6e3_43ad_94f9_8b253de1d54e_AnB_TXTL_NTP_RNAP_F = 1000; mw57c86b96_c6e3_43ad_94f9_8b253de1d54e_AnB_TXTL_NTP_RNAP_R = 120000000;
  mw697951bc_1051_4fe1_a957_beef48b3c1d8_AnB: mwbf10e147_5c0f_48a6_acd1_e15ef968ff52_AnB + mw14a57bf4_e194_425f_a352_17261719166f_AnB -> mw15176c50_739a_4df7_82be_1cc78d9023eb_AnB; mw697951bc_1051_4fe1_a957_beef48b3c1d8_AnB_TXTL_NTP_RNAP_F*mwbf10e147_5c0f_48a6_acd1_e15ef968ff52_AnB*mw14a57bf4_e194_425f_a352_17261719166f_AnB - mw697951bc_1051_4fe1_a957_beef48b3c1d8_AnB_TXTL_NTP_RNAP_R*mw15176c50_739a_4df7_82be_1cc78d9023eb_AnB;
    mw697951bc_1051_4fe1_a957_beef48b3c1d8_AnB_TXTL_NTP_RNAP_F = 1; mw697951bc_1051_4fe1_a957_beef48b3c1d8_AnB_TXTL_NTP_RNAP_R = 120000;
  mw416850a1_7604_4c61_abfc_222da5f14a31_AnB: mw01ca8228_c1ad_4866_a85f_3f52433510dd_AnB + mwbef4c2a1_39b3_45b9_9560_96f951c1a1bb_AnB -> mw15176c50_739a_4df7_82be_1cc78d9023eb_AnB; mw416850a1_7604_4c61_abfc_222da5f14a31_AnB_TXTL_NTP_RNAP_F*mw01ca8228_c1ad_4866_a85f_3f52433510dd_AnB*mwbef4c2a1_39b3_45b9_9560_96f951c1a1bb_AnB - mw416850a1_7604_4c61_abfc_222da5f14a31_AnB_TXTL_NTP_RNAP_R*mw15176c50_739a_4df7_82be_1cc78d9023eb_AnB;
    mw416850a1_7604_4c61_abfc_222da5f14a31_AnB_TXTL_NTP_RNAP_F = 1; mw416850a1_7604_4c61_abfc_222da5f14a31_AnB_TXTL_NTP_RNAP_R = 120000;
  mw620c4440_7b1a_485e_a7d9_cae43e38f967_AnB: mw15176c50_739a_4df7_82be_1cc78d9023eb_AnB => mw2c0dd119_44c6_4ef8_9b33_2654073c0d4b_AnB + mw42df642f_d9db_4718_a36f_6bd1ae930719_AnB; mw620c4440_7b1a_485e_a7d9_cae43e38f967_AnB_TXTL_transcription_rate1*mw15176c50_739a_4df7_82be_1cc78d9023eb_AnB;
    mw620c4440_7b1a_485e_a7d9_cae43e38f967_AnB_TXTL_transcription_rate1 = 0.001470588;
  mw713d0e53_c2f3_44e4_a24c_6f76be969b58_AnB: mwfe70ddf6_5ae6_4809_aba0_acae00ac9833_AnB => mwcae5b911_5ff1_49a8_98ef_1f8824967c41_AnB; mw713d0e53_c2f3_44e4_a24c_6f76be969b58_AnB_TXTL_NTP_consumption*mwfe70ddf6_5ae6_4809_aba0_acae00ac9833_AnB;
    mw713d0e53_c2f3_44e4_a24c_6f76be969b58_AnB_TXTL_NTP_consumption = 0.7485294;
  mwa08f0a76_5fb5_4de8_b148_7b6311040777_AnB: mwcdbab810_080b_4e6e_9371_cea3821e8bd7_AnB => mw404a05a7_dfdf_4ac5_8c65_8c2ec10d852b_AnB + mw262ad616_bfca_4490_b1fe_7c20f2bbe036_AnB + mwd65f83fe_728f_4fe0_8e8a_156cac9da854_AnB; mwa08f0a76_5fb5_4de8_b148_7b6311040777_AnB_TXTL_RNAPBOUND_TERMINATION_RATE*mwcdbab810_080b_4e6e_9371_cea3821e8bd7_AnB;
    mwa08f0a76_5fb5_4de8_b148_7b6311040777_AnB_TXTL_RNAPBOUND_TERMINATION_RATE = 0.05;
  mw1c16c33b_3fe0_44a7_a1eb_e0ad5bfeaa43_AnB: mwcae5b911_5ff1_49a8_98ef_1f8824967c41_AnB + mwbef4c2a1_39b3_45b9_9560_96f951c1a1bb_AnB -> mw41ac4ef8_daf5_46c2_9861_190782b6da63_AnB; mw1c16c33b_3fe0_44a7_a1eb_e0ad5bfeaa43_AnB_TXTL_NTP_RNAP_F*mwcae5b911_5ff1_49a8_98ef_1f8824967c41_AnB*mwbef4c2a1_39b3_45b9_9560_96f951c1a1bb_AnB - mw1c16c33b_3fe0_44a7_a1eb_e0ad5bfeaa43_AnB_TXTL_NTP_RNAP_R*mw41ac4ef8_daf5_46c2_9861_190782b6da63_AnB;
    mw1c16c33b_3fe0_44a7_a1eb_e0ad5bfeaa43_AnB_TXTL_NTP_RNAP_F = 1000; mw1c16c33b_3fe0_44a7_a1eb_e0ad5bfeaa43_AnB_TXTL_NTP_RNAP_R = 120000000;
  mwf4a7b671_f5df_4fb1_89a3_35f96ec82161_AnB: mwcae5b911_5ff1_49a8_98ef_1f8824967c41_AnB + mw14a57bf4_e194_425f_a352_17261719166f_AnB -> mw19027fbb_8a62_4f4d_a1d2_9433a98a20f0_AnB; mwf4a7b671_f5df_4fb1_89a3_35f96ec82161_AnB_TXTL_NTP_RNAP_F*mwcae5b911_5ff1_49a8_98ef_1f8824967c41_AnB*mw14a57bf4_e194_425f_a352_17261719166f_AnB - mwf4a7b671_f5df_4fb1_89a3_35f96ec82161_AnB_TXTL_NTP_RNAP_R*mw19027fbb_8a62_4f4d_a1d2_9433a98a20f0_AnB;
    mwf4a7b671_f5df_4fb1_89a3_35f96ec82161_AnB_TXTL_NTP_RNAP_F = 1000; mwf4a7b671_f5df_4fb1_89a3_35f96ec82161_AnB_TXTL_NTP_RNAP_R = 120000000;
  mwfda7812e_b902_4e4c_9ee7_461a36ceb969_AnB: mw41ac4ef8_daf5_46c2_9861_190782b6da63_AnB + mw14a57bf4_e194_425f_a352_17261719166f_AnB -> mwfe70ddf6_5ae6_4809_aba0_acae00ac9833_AnB; mwfda7812e_b902_4e4c_9ee7_461a36ceb969_AnB_TXTL_NTP_RNAP_F*mw41ac4ef8_daf5_46c2_9861_190782b6da63_AnB*mw14a57bf4_e194_425f_a352_17261719166f_AnB - mwfda7812e_b902_4e4c_9ee7_461a36ceb969_AnB_TXTL_NTP_RNAP_R*mwfe70ddf6_5ae6_4809_aba0_acae00ac9833_AnB;
    mwfda7812e_b902_4e4c_9ee7_461a36ceb969_AnB_TXTL_NTP_RNAP_F = 1; mwfda7812e_b902_4e4c_9ee7_461a36ceb969_AnB_TXTL_NTP_RNAP_R = 120000;
  mw78311910_ec65_45a1_bd1b_feb4328fd35e_AnB: mw19027fbb_8a62_4f4d_a1d2_9433a98a20f0_AnB + mwbef4c2a1_39b3_45b9_9560_96f951c1a1bb_AnB -> mwfe70ddf6_5ae6_4809_aba0_acae00ac9833_AnB; mw78311910_ec65_45a1_bd1b_feb4328fd35e_AnB_TXTL_NTP_RNAP_F*mw19027fbb_8a62_4f4d_a1d2_9433a98a20f0_AnB*mwbef4c2a1_39b3_45b9_9560_96f951c1a1bb_AnB - mw78311910_ec65_45a1_bd1b_feb4328fd35e_AnB_TXTL_NTP_RNAP_R*mwfe70ddf6_5ae6_4809_aba0_acae00ac9833_AnB;
    mw78311910_ec65_45a1_bd1b_feb4328fd35e_AnB_TXTL_NTP_RNAP_F = 1; mw78311910_ec65_45a1_bd1b_feb4328fd35e_AnB_TXTL_NTP_RNAP_R = 120000;
  mw63c13790_bca9_4ffd_b516_be9e05260a59_AnB: mwfe70ddf6_5ae6_4809_aba0_acae00ac9833_AnB => mwcdbab810_080b_4e6e_9371_cea3821e8bd7_AnB + mw42df642f_d9db_4718_a36f_6bd1ae930719_AnB; mw63c13790_bca9_4ffd_b516_be9e05260a59_AnB_TXTL_transcription_rate1*mwfe70ddf6_5ae6_4809_aba0_acae00ac9833_AnB;
    mw63c13790_bca9_4ffd_b516_be9e05260a59_AnB_TXTL_transcription_rate1 = 0.001470588;
  mwe1235212_c3e1_49da_9fe2_af2404d276a1_AnB: mwef6a699a_8299_45ed_95a1_20c751e272f9_AnB + mwfa85abf9_cffb_4957_9678_1c8b4dafd02b_AnB -> mw97c037b4_f017_45d6_9b5c_4e1bc4e1eb26_AnB; mwe1235212_c3e1_49da_9fe2_af2404d276a1_AnB_TL_AA_F*mwef6a699a_8299_45ed_95a1_20c751e272f9_AnB*mwfa85abf9_cffb_4957_9678_1c8b4dafd02b_AnB - mwe1235212_c3e1_49da_9fe2_af2404d276a1_AnB_TL_AA_R*mw97c037b4_f017_45d6_9b5c_4e1bc4e1eb26_AnB;
    mwe1235212_c3e1_49da_9fe2_af2404d276a1_AnB_TL_AA_F = 300; mwe1235212_c3e1_49da_9fe2_af2404d276a1_AnB_TL_AA_R = 0.1;
  mwf6f81fc7_74eb_4292_88e6_fdf52c94852c_AnB: mw97c037b4_f017_45d6_9b5c_4e1bc4e1eb26_AnB + 2 mwbef4c2a1_39b3_45b9_9560_96f951c1a1bb_AnB -> mw54fe4092_6d73_4f63_b697_f6e98aae19fa_AnB; mwf6f81fc7_74eb_4292_88e6_fdf52c94852c_AnB_TL_AGTP_F*mw97c037b4_f017_45d6_9b5c_4e1bc4e1eb26_AnB*mwbef4c2a1_39b3_45b9_9560_96f951c1a1bb_AnB^2 - mwf6f81fc7_74eb_4292_88e6_fdf52c94852c_AnB_TL_AGTP_R*mw54fe4092_6d73_4f63_b697_f6e98aae19fa_AnB;
    mwf6f81fc7_74eb_4292_88e6_fdf52c94852c_AnB_TL_AGTP_F = 30; mwf6f81fc7_74eb_4292_88e6_fdf52c94852c_AnB_TL_AGTP_R = 10;
  mw026d10d2_796e_4015_992f_7e7fb6266064_AnB: mw54fe4092_6d73_4f63_b697_f6e98aae19fa_AnB => mwfb6fa50e_844e_40ff_a108_c5c0fa27e01f_AnB; mw026d10d2_796e_4015_992f_7e7fb6266064_AnB_TXTL_TL_AA_consumption*mw54fe4092_6d73_4f63_b697_f6e98aae19fa_AnB;
    mw026d10d2_796e_4015_992f_7e7fb6266064_AnB_TXTL_TL_AA_consumption = 0.024;
  mwf35b358d_cac1_488c_8f59_2df0bddeb8e7_AnB: mw54fe4092_6d73_4f63_b697_f6e98aae19fa_AnB => mwfb6fa50e_844e_40ff_a108_c5c0fa27e01f_AnB + mw5f21ad5e_ed26_4c67_a1ea_7e431ce0ca48_AnB; mwf35b358d_cac1_488c_8f59_2df0bddeb8e7_AnB_TXTL_TL_rate*mw54fe4092_6d73_4f63_b697_f6e98aae19fa_AnB;
    mwf35b358d_cac1_488c_8f59_2df0bddeb8e7_AnB_TXTL_TL_rate = 0.012;
  mwa2fdfe7e_439f_4b03_92e6_7f2bc32c3c27_AnB: mwfb6fa50e_844e_40ff_a108_c5c0fa27e01f_AnB => mw42df642f_d9db_4718_a36f_6bd1ae930719_AnB + mw41d4d6ad_adcc_4998_9736_211a8e68d45b_AnB; mwa2fdfe7e_439f_4b03_92e6_7f2bc32c3c27_AnB_TXTL_RIBOBOUND_TERMINATION_RATE*mwfb6fa50e_844e_40ff_a108_c5c0fa27e01f_AnB;
    mwa2fdfe7e_439f_4b03_92e6_7f2bc32c3c27_AnB_TXTL_RIBOBOUND_TERMINATION_RATE = 50;
  mw145ace2a_6a32_4e4a_b5e5_ceddada1f039_AnB: mw42df642f_d9db_4718_a36f_6bd1ae930719_AnB + mwe269f848_a93f_4ee4_946a_ed61e5a48c84_AnB -> mw359b08c7_1126_4f9b_9128_63c54bcb39cf_AnB; mw145ace2a_6a32_4e4a_b5e5_ceddada1f039_AnB_TXTL_RNAdeg_F*mw42df642f_d9db_4718_a36f_6bd1ae930719_AnB*mwe269f848_a93f_4ee4_946a_ed61e5a48c84_AnB - mw145ace2a_6a32_4e4a_b5e5_ceddada1f039_AnB_TXTL_RNAdeg_R*mw359b08c7_1126_4f9b_9128_63c54bcb39cf_AnB;
    mw145ace2a_6a32_4e4a_b5e5_ceddada1f039_AnB_TXTL_RNAdeg_F = 10; mw145ace2a_6a32_4e4a_b5e5_ceddada1f039_AnB_TXTL_RNAdeg_R = 2000;
  mwc151b981_5192_49ab_a18d_8fd9107811c2_AnB: mw359b08c7_1126_4f9b_9128_63c54bcb39cf_AnB => mwe269f848_a93f_4ee4_946a_ed61e5a48c84_AnB; mwc151b981_5192_49ab_a18d_8fd9107811c2_AnB_TXTL_RNAdeg_F*mw359b08c7_1126_4f9b_9128_63c54bcb39cf_AnB;
    mwc151b981_5192_49ab_a18d_8fd9107811c2_AnB_TXTL_RNAdeg_F = 0.002777778;
  mw96b599be_a2bc_4249_b2cf_24cf9c1b08fc_AnB: mwef6a699a_8299_45ed_95a1_20c751e272f9_AnB + mwe269f848_a93f_4ee4_946a_ed61e5a48c84_AnB -> mw0f1e582d_ef0c_46ea_b204_99cfd1dc8e31_AnB; mw96b599be_a2bc_4249_b2cf_24cf9c1b08fc_AnB_TXTL_RNAdeg_F*mwef6a699a_8299_45ed_95a1_20c751e272f9_AnB*mwe269f848_a93f_4ee4_946a_ed61e5a48c84_AnB - mw96b599be_a2bc_4249_b2cf_24cf9c1b08fc_AnB_TXTL_RNAdeg_R*mw0f1e582d_ef0c_46ea_b204_99cfd1dc8e31_AnB;
    mw96b599be_a2bc_4249_b2cf_24cf9c1b08fc_AnB_TXTL_RNAdeg_F = 10; mw96b599be_a2bc_4249_b2cf_24cf9c1b08fc_AnB_TXTL_RNAdeg_R = 2000;
  mw5e1030f5_3441_4df8_b8f3_afcdbc9bcbd1_AnB: mw0f1e582d_ef0c_46ea_b204_99cfd1dc8e31_AnB => mwe269f848_a93f_4ee4_946a_ed61e5a48c84_AnB + mw41d4d6ad_adcc_4998_9736_211a8e68d45b_AnB; mw5e1030f5_3441_4df8_b8f3_afcdbc9bcbd1_AnB_TXTL_RNAdeg_F*mw0f1e582d_ef0c_46ea_b204_99cfd1dc8e31_AnB;
    mw5e1030f5_3441_4df8_b8f3_afcdbc9bcbd1_AnB_TXTL_RNAdeg_F = 0.002777778;
  mwcea26665_cadb_41d3_b583_bb2e94de99f9_AnB: mw54fe4092_6d73_4f63_b697_f6e98aae19fa_AnB + mwe269f848_a93f_4ee4_946a_ed61e5a48c84_AnB -> mw1b6c9a5c_598c_43c1_9d99_157c36bebe7a_AnB; mwcea26665_cadb_41d3_b583_bb2e94de99f9_AnB_TXTL_RNAdeg_F*mw54fe4092_6d73_4f63_b697_f6e98aae19fa_AnB*mwe269f848_a93f_4ee4_946a_ed61e5a48c84_AnB - mwcea26665_cadb_41d3_b583_bb2e94de99f9_AnB_TXTL_RNAdeg_R*mw1b6c9a5c_598c_43c1_9d99_157c36bebe7a_AnB;
    mwcea26665_cadb_41d3_b583_bb2e94de99f9_AnB_TXTL_RNAdeg_F = 10; mwcea26665_cadb_41d3_b583_bb2e94de99f9_AnB_TXTL_RNAdeg_R = 2000;
  mweef65743_8da6_43a6_b41d_b69b15b9df51_AnB: mw1b6c9a5c_598c_43c1_9d99_157c36bebe7a_AnB => mwe269f848_a93f_4ee4_946a_ed61e5a48c84_AnB + mwfa85abf9_cffb_4957_9678_1c8b4dafd02b_AnB + 2 mwbef4c2a1_39b3_45b9_9560_96f951c1a1bb_AnB + mw41d4d6ad_adcc_4998_9736_211a8e68d45b_AnB; mweef65743_8da6_43a6_b41d_b69b15b9df51_AnB_TXTL_RNAdeg_F*mw1b6c9a5c_598c_43c1_9d99_157c36bebe7a_AnB;
    mweef65743_8da6_43a6_b41d_b69b15b9df51_AnB_TXTL_RNAdeg_F = 0.002777778;
  mwff871fe0_d6c9_4d0b_aa83_c29f74adc31a_AnB: mwfb6fa50e_844e_40ff_a108_c5c0fa27e01f_AnB + mwe269f848_a93f_4ee4_946a_ed61e5a48c84_AnB -> mw2dece0fe_c9e6_459b_a0cc_fb71184dafef_AnB; mwff871fe0_d6c9_4d0b_aa83_c29f74adc31a_AnB_TXTL_RNAdeg_F*mwfb6fa50e_844e_40ff_a108_c5c0fa27e01f_AnB*mwe269f848_a93f_4ee4_946a_ed61e5a48c84_AnB - mwff871fe0_d6c9_4d0b_aa83_c29f74adc31a_AnB_TXTL_RNAdeg_R*mw2dece0fe_c9e6_459b_a0cc_fb71184dafef_AnB;
    mwff871fe0_d6c9_4d0b_aa83_c29f74adc31a_AnB_TXTL_RNAdeg_F = 10; mwff871fe0_d6c9_4d0b_aa83_c29f74adc31a_AnB_TXTL_RNAdeg_R = 2000;
  mwef6c01be_2a14_48f9_ba1a_c25b4aaf2f4e_AnB: mw2dece0fe_c9e6_459b_a0cc_fb71184dafef_AnB => mwe269f848_a93f_4ee4_946a_ed61e5a48c84_AnB + mw41d4d6ad_adcc_4998_9736_211a8e68d45b_AnB; mwef6c01be_2a14_48f9_ba1a_c25b4aaf2f4e_AnB_TXTL_RNAdeg_F*mw2dece0fe_c9e6_459b_a0cc_fb71184dafef_AnB;
    mwef6c01be_2a14_48f9_ba1a_c25b4aaf2f4e_AnB_TXTL_RNAdeg_F = 0.002777778;
  mwefab0f10_8dff_4382_9d42_8bde2dbde1e7_AnB: mw97c037b4_f017_45d6_9b5c_4e1bc4e1eb26_AnB + mwe269f848_a93f_4ee4_946a_ed61e5a48c84_AnB -> mw8c5c7f7a_5416_469a_8efc_85c6e5bfefb5_AnB; mwefab0f10_8dff_4382_9d42_8bde2dbde1e7_AnB_TXTL_RNAdeg_F*mw97c037b4_f017_45d6_9b5c_4e1bc4e1eb26_AnB*mwe269f848_a93f_4ee4_946a_ed61e5a48c84_AnB - mwefab0f10_8dff_4382_9d42_8bde2dbde1e7_AnB_TXTL_RNAdeg_R*mw8c5c7f7a_5416_469a_8efc_85c6e5bfefb5_AnB;
    mwefab0f10_8dff_4382_9d42_8bde2dbde1e7_AnB_TXTL_RNAdeg_F = 10; mwefab0f10_8dff_4382_9d42_8bde2dbde1e7_AnB_TXTL_RNAdeg_R = 2000;
  mw8dac3a3e_1643_4d5e_a69a_d728e4fb45df_AnB: mw8c5c7f7a_5416_469a_8efc_85c6e5bfefb5_AnB => mwe269f848_a93f_4ee4_946a_ed61e5a48c84_AnB + mwfa85abf9_cffb_4957_9678_1c8b4dafd02b_AnB + mw41d4d6ad_adcc_4998_9736_211a8e68d45b_AnB; mw8dac3a3e_1643_4d5e_a69a_d728e4fb45df_AnB_TXTL_RNAdeg_F*mw8c5c7f7a_5416_469a_8efc_85c6e5bfefb5_AnB;
    mw8dac3a3e_1643_4d5e_a69a_d728e4fb45df_AnB_TXTL_RNAdeg_F = 0.002777778;
  mw5c9bd275_9804_451a_bf93_ad7b51ee3499_AnB: mwe26f1cb1_86e9_4e5e_9114_02970551aeb9_AnB + mwcea5300b_7ddc_42ab_925c_87b55beab50b_AnB -> mwb8d95765_e1f7_4557_b5c0_e40b693ebdd1_AnB; SigmaX_RNAP_F*mwe26f1cb1_86e9_4e5e_9114_02970551aeb9_AnB*mwcea5300b_7ddc_42ab_925c_87b55beab50b_AnB - SigmaX_RNAP_R*mwb8d95765_e1f7_4557_b5c0_e40b693ebdd1_AnB;
    SigmaX_RNAP_F = 100; SigmaX_RNAP_R = 0.1;
  mw1ce70882_d129_490b_80a9_54c32b4bf54b_AnB: mwa07cfc4d_c5f7_49d1_adcb_d24c80d37745_AnB + mw41d4d6ad_adcc_4998_9736_211a8e68d45b_AnB -> mw065bf04a_6b4d_4ffe_bcfe_f72e58d1e9db_AnB; mw1ce70882_d129_490b_80a9_54c32b4bf54b_AnB_TXTL_UTR_UTR1_F*mwa07cfc4d_c5f7_49d1_adcb_d24c80d37745_AnB*mw41d4d6ad_adcc_4998_9736_211a8e68d45b_AnB - mw1ce70882_d129_490b_80a9_54c32b4bf54b_AnB_TXTL_UTR_UTR1_R*mw065bf04a_6b4d_4ffe_bcfe_f72e58d1e9db_AnB;
    mw1ce70882_d129_490b_80a9_54c32b4bf54b_AnB_TXTL_UTR_UTR1_F = 0.2; mw1ce70882_d129_490b_80a9_54c32b4bf54b_AnB_TXTL_UTR_UTR1_R = 4;
  mw1e96c3b4_41f9_48af_95f2_f3f62127ec62_AnB: mwe156cca0_16b9_4b52_b889_6b7b6d7152d5_AnB + mwe26f1cb1_86e9_4e5e_9114_02970551aeb9_AnB -> mw5bfd941c_66e6_4a4c_b6bb_157ad14105c7_AnB; TXTL_PLAS_RNAPbound_F*mwe156cca0_16b9_4b52_b889_6b7b6d7152d5_AnB*mwe26f1cb1_86e9_4e5e_9114_02970551aeb9_AnB - TXTL_PLAS_RNAPbound_R*mw5bfd941c_66e6_4a4c_b6bb_157ad14105c7_AnB;
    TXTL_PLAS_RNAPbound_F = 0; TXTL_PLAS_RNAPbound_R = 10;
  mw981705dd_d4be_4e88_9542_20756a6ad41a_AnB: mwe156cca0_16b9_4b52_b889_6b7b6d7152d5_AnB + mw8545f0a9_d5b7_41ae_8631_f8133e6e48e3_AnB -> mw4c7ae5a4_8f05_44c9_bfc2_1e58523b8fba_AnB; mw981705dd_d4be_4e88_9542_20756a6ad41a_AnB_TXTL_PLAS_TFBIND_F*mwe156cca0_16b9_4b52_b889_6b7b6d7152d5_AnB*mw8545f0a9_d5b7_41ae_8631_f8133e6e48e3_AnB - mw981705dd_d4be_4e88_9542_20756a6ad41a_AnB_TXTL_PLAS_TFBIND_R*mw4c7ae5a4_8f05_44c9_bfc2_1e58523b8fba_AnB;
    mw981705dd_d4be_4e88_9542_20756a6ad41a_AnB_TXTL_PLAS_TFBIND_F = 1; mw981705dd_d4be_4e88_9542_20756a6ad41a_AnB_TXTL_PLAS_TFBIND_R = 0.02;
  mw0fef55be_5c06_4ac6_a06a_ea1c8a380c59_AnB: mw4c7ae5a4_8f05_44c9_bfc2_1e58523b8fba_AnB + mwe26f1cb1_86e9_4e5e_9114_02970551aeb9_AnB -> mw10d7141c_27b0_46e0_9d6f_817f6df9d9cb_AnB; TXTL_PLAS_TFRNAPbound_F*mw4c7ae5a4_8f05_44c9_bfc2_1e58523b8fba_AnB*mwe26f1cb1_86e9_4e5e_9114_02970551aeb9_AnB - TXTL_PLAS_TFRNAPbound_R*mw10d7141c_27b0_46e0_9d6f_817f6df9d9cb_AnB;
    TXTL_PLAS_TFRNAPbound_F = 20; TXTL_PLAS_TFRNAPbound_R = 400;
  mw5ef4a00d_39af_4348_be97_364292ffed56_AnB: mw5bfd941c_66e6_4a4c_b6bb_157ad14105c7_AnB + mw8545f0a9_d5b7_41ae_8631_f8133e6e48e3_AnB -> mw10d7141c_27b0_46e0_9d6f_817f6df9d9cb_AnB; mw5ef4a00d_39af_4348_be97_364292ffed56_AnB_TXTL_PLAS_TFBIND_F*mw5bfd941c_66e6_4a4c_b6bb_157ad14105c7_AnB*mw8545f0a9_d5b7_41ae_8631_f8133e6e48e3_AnB - mw5ef4a00d_39af_4348_be97_364292ffed56_AnB_TXTL_PLAS_TFBIND_R*mw10d7141c_27b0_46e0_9d6f_817f6df9d9cb_AnB;
    mw5ef4a00d_39af_4348_be97_364292ffed56_AnB_TXTL_PLAS_TFBIND_F = 1; mw5ef4a00d_39af_4348_be97_364292ffed56_AnB_TXTL_PLAS_TFBIND_R = 0.02;
  mw8fef3668_85f8_482e_a9ba_02899afc7028_AnB: mw39fac11d_2ddc_4355_b06d_6acd20ee2548_AnB => mw5bfd941c_66e6_4a4c_b6bb_157ad14105c7_AnB; mw8fef3668_85f8_482e_a9ba_02899afc7028_AnB_TXTL_NTP_consumption*mw39fac11d_2ddc_4355_b06d_6acd20ee2548_AnB;
    mw8fef3668_85f8_482e_a9ba_02899afc7028_AnB_TXTL_NTP_consumption = 0.7485294;
  mw0da08229_2d3c_47e6_bf9e_80b7ce2560d3_AnB: mwa8dbf2cc_00c8_4948_888b_94b2435bbc60_AnB => mwe26f1cb1_86e9_4e5e_9114_02970551aeb9_AnB + mwe156cca0_16b9_4b52_b889_6b7b6d7152d5_AnB; mw0da08229_2d3c_47e6_bf9e_80b7ce2560d3_AnB_TXTL_RNAPBOUND_TERMINATION_RATE*mwa8dbf2cc_00c8_4948_888b_94b2435bbc60_AnB;
    mw0da08229_2d3c_47e6_bf9e_80b7ce2560d3_AnB_TXTL_RNAPBOUND_TERMINATION_RATE = 0.05;
  mw6b99f712_9ac4_4dd7_8aea_f3094361c16d_AnB: mw5bfd941c_66e6_4a4c_b6bb_157ad14105c7_AnB + mwbef4c2a1_39b3_45b9_9560_96f951c1a1bb_AnB -> mw6d94f91d_6103_4445_9478_8b0c9ac939be_AnB; mw6b99f712_9ac4_4dd7_8aea_f3094361c16d_AnB_TXTL_NTP_RNAP_F*mw5bfd941c_66e6_4a4c_b6bb_157ad14105c7_AnB*mwbef4c2a1_39b3_45b9_9560_96f951c1a1bb_AnB - mw6b99f712_9ac4_4dd7_8aea_f3094361c16d_AnB_TXTL_NTP_RNAP_R*mw6d94f91d_6103_4445_9478_8b0c9ac939be_AnB;
    mw6b99f712_9ac4_4dd7_8aea_f3094361c16d_AnB_TXTL_NTP_RNAP_F = 1000; mw6b99f712_9ac4_4dd7_8aea_f3094361c16d_AnB_TXTL_NTP_RNAP_R = 120000000;
  mw13a2bf4b_a988_447e_bb27_9c0734b33bc1_AnB: mw5bfd941c_66e6_4a4c_b6bb_157ad14105c7_AnB + mw14a57bf4_e194_425f_a352_17261719166f_AnB -> mw944cf215_e510_4f3e_8c6b_2cdc80bae3bb_AnB; mw13a2bf4b_a988_447e_bb27_9c0734b33bc1_AnB_TXTL_NTP_RNAP_F*mw5bfd941c_66e6_4a4c_b6bb_157ad14105c7_AnB*mw14a57bf4_e194_425f_a352_17261719166f_AnB - mw13a2bf4b_a988_447e_bb27_9c0734b33bc1_AnB_TXTL_NTP_RNAP_R*mw944cf215_e510_4f3e_8c6b_2cdc80bae3bb_AnB;
    mw13a2bf4b_a988_447e_bb27_9c0734b33bc1_AnB_TXTL_NTP_RNAP_F = 1000; mw13a2bf4b_a988_447e_bb27_9c0734b33bc1_AnB_TXTL_NTP_RNAP_R = 120000000;
  mw091ed958_eea4_469e_98af_e5e2fdd998a9_AnB: mw6d94f91d_6103_4445_9478_8b0c9ac939be_AnB + mw14a57bf4_e194_425f_a352_17261719166f_AnB -> mw39fac11d_2ddc_4355_b06d_6acd20ee2548_AnB; mw091ed958_eea4_469e_98af_e5e2fdd998a9_AnB_TXTL_NTP_RNAP_F*mw6d94f91d_6103_4445_9478_8b0c9ac939be_AnB*mw14a57bf4_e194_425f_a352_17261719166f_AnB - mw091ed958_eea4_469e_98af_e5e2fdd998a9_AnB_TXTL_NTP_RNAP_R*mw39fac11d_2ddc_4355_b06d_6acd20ee2548_AnB;
    mw091ed958_eea4_469e_98af_e5e2fdd998a9_AnB_TXTL_NTP_RNAP_F = 1; mw091ed958_eea4_469e_98af_e5e2fdd998a9_AnB_TXTL_NTP_RNAP_R = 120000;
  mw25f1ac07_5547_499f_93eb_0d655ae97f89_AnB: mw944cf215_e510_4f3e_8c6b_2cdc80bae3bb_AnB + mwbef4c2a1_39b3_45b9_9560_96f951c1a1bb_AnB -> mw39fac11d_2ddc_4355_b06d_6acd20ee2548_AnB; mw25f1ac07_5547_499f_93eb_0d655ae97f89_AnB_TXTL_NTP_RNAP_F*mw944cf215_e510_4f3e_8c6b_2cdc80bae3bb_AnB*mwbef4c2a1_39b3_45b9_9560_96f951c1a1bb_AnB - mw25f1ac07_5547_499f_93eb_0d655ae97f89_AnB_TXTL_NTP_RNAP_R*mw39fac11d_2ddc_4355_b06d_6acd20ee2548_AnB;
    mw25f1ac07_5547_499f_93eb_0d655ae97f89_AnB_TXTL_NTP_RNAP_F = 1; mw25f1ac07_5547_499f_93eb_0d655ae97f89_AnB_TXTL_NTP_RNAP_R = 120000;
  mw5d375a53_0a61_4b4b_94d5_45c25a7a8933_AnB: mw39fac11d_2ddc_4355_b06d_6acd20ee2548_AnB => mwa8dbf2cc_00c8_4948_888b_94b2435bbc60_AnB + mwa07cfc4d_c5f7_49d1_adcb_d24c80d37745_AnB; mw5d375a53_0a61_4b4b_94d5_45c25a7a8933_AnB_TXTL_transcription_rate1*mw39fac11d_2ddc_4355_b06d_6acd20ee2548_AnB;
    mw5d375a53_0a61_4b4b_94d5_45c25a7a8933_AnB_TXTL_transcription_rate1 = 0.001470588;
  mwe011103e_68cf_43ab_b254_cb5d1539fe8d_AnB: mw73b59de8_b54e_4f3f_85aa_2f0a31ef99a3_AnB => mw10d7141c_27b0_46e0_9d6f_817f6df9d9cb_AnB; mwe011103e_68cf_43ab_b254_cb5d1539fe8d_AnB_TXTL_NTP_consumption*mw73b59de8_b54e_4f3f_85aa_2f0a31ef99a3_AnB;
    mwe011103e_68cf_43ab_b254_cb5d1539fe8d_AnB_TXTL_NTP_consumption = 0.7485294;
  mwb5f534bd_e6b8_4508_91a5_7090757ef4b1_AnB: mw7b75872b_b85d_4551_86db_cce9a9eab6cf_AnB => mwe26f1cb1_86e9_4e5e_9114_02970551aeb9_AnB + mwe156cca0_16b9_4b52_b889_6b7b6d7152d5_AnB + mw8545f0a9_d5b7_41ae_8631_f8133e6e48e3_AnB; mwb5f534bd_e6b8_4508_91a5_7090757ef4b1_AnB_TXTL_RNAPBOUND_TERMINATION_RATE*mw7b75872b_b85d_4551_86db_cce9a9eab6cf_AnB;
    mwb5f534bd_e6b8_4508_91a5_7090757ef4b1_AnB_TXTL_RNAPBOUND_TERMINATION_RATE = 0.05;
  mw590bac39_f912_452b_bb22_dfe2087462d3_AnB: mw10d7141c_27b0_46e0_9d6f_817f6df9d9cb_AnB + mwbef4c2a1_39b3_45b9_9560_96f951c1a1bb_AnB -> mwf652ea52_d5bd_4f86_824d_76847703008d_AnB; mw590bac39_f912_452b_bb22_dfe2087462d3_AnB_TXTL_NTP_RNAP_F*mw10d7141c_27b0_46e0_9d6f_817f6df9d9cb_AnB*mwbef4c2a1_39b3_45b9_9560_96f951c1a1bb_AnB - mw590bac39_f912_452b_bb22_dfe2087462d3_AnB_TXTL_NTP_RNAP_R*mwf652ea52_d5bd_4f86_824d_76847703008d_AnB;
    mw590bac39_f912_452b_bb22_dfe2087462d3_AnB_TXTL_NTP_RNAP_F = 1000; mw590bac39_f912_452b_bb22_dfe2087462d3_AnB_TXTL_NTP_RNAP_R = 120000000;
  mw6c196710_a87d_4fbb_89e4_ebf8cddea8bf_AnB: mw10d7141c_27b0_46e0_9d6f_817f6df9d9cb_AnB + mw14a57bf4_e194_425f_a352_17261719166f_AnB -> mwb96830e3_3baa_413e_a014_494bfc8742f7_AnB; mw6c196710_a87d_4fbb_89e4_ebf8cddea8bf_AnB_TXTL_NTP_RNAP_F*mw10d7141c_27b0_46e0_9d6f_817f6df9d9cb_AnB*mw14a57bf4_e194_425f_a352_17261719166f_AnB - mw6c196710_a87d_4fbb_89e4_ebf8cddea8bf_AnB_TXTL_NTP_RNAP_R*mwb96830e3_3baa_413e_a014_494bfc8742f7_AnB;
    mw6c196710_a87d_4fbb_89e4_ebf8cddea8bf_AnB_TXTL_NTP_RNAP_F = 1000; mw6c196710_a87d_4fbb_89e4_ebf8cddea8bf_AnB_TXTL_NTP_RNAP_R = 120000000;
  mwf6a076a5_b0ca_4ce9_8baf_cd8e072b6d5c_AnB: mwf652ea52_d5bd_4f86_824d_76847703008d_AnB + mw14a57bf4_e194_425f_a352_17261719166f_AnB -> mw73b59de8_b54e_4f3f_85aa_2f0a31ef99a3_AnB; mwf6a076a5_b0ca_4ce9_8baf_cd8e072b6d5c_AnB_TXTL_NTP_RNAP_F*mwf652ea52_d5bd_4f86_824d_76847703008d_AnB*mw14a57bf4_e194_425f_a352_17261719166f_AnB - mwf6a076a5_b0ca_4ce9_8baf_cd8e072b6d5c_AnB_TXTL_NTP_RNAP_R*mw73b59de8_b54e_4f3f_85aa_2f0a31ef99a3_AnB;
    mwf6a076a5_b0ca_4ce9_8baf_cd8e072b6d5c_AnB_TXTL_NTP_RNAP_F = 1; mwf6a076a5_b0ca_4ce9_8baf_cd8e072b6d5c_AnB_TXTL_NTP_RNAP_R = 120000;
  mwfd2e290f_c406_4bde_beda_18aad8850a64_AnB: mwb96830e3_3baa_413e_a014_494bfc8742f7_AnB + mwbef4c2a1_39b3_45b9_9560_96f951c1a1bb_AnB -> mw73b59de8_b54e_4f3f_85aa_2f0a31ef99a3_AnB; mwfd2e290f_c406_4bde_beda_18aad8850a64_AnB_TXTL_NTP_RNAP_F*mwb96830e3_3baa_413e_a014_494bfc8742f7_AnB*mwbef4c2a1_39b3_45b9_9560_96f951c1a1bb_AnB - mwfd2e290f_c406_4bde_beda_18aad8850a64_AnB_TXTL_NTP_RNAP_R*mw73b59de8_b54e_4f3f_85aa_2f0a31ef99a3_AnB;
    mwfd2e290f_c406_4bde_beda_18aad8850a64_AnB_TXTL_NTP_RNAP_F = 1; mwfd2e290f_c406_4bde_beda_18aad8850a64_AnB_TXTL_NTP_RNAP_R = 120000;
  mw6ae142ef_f4d9_4e7d_b714_60d6f9ac9c0c_AnB: mw73b59de8_b54e_4f3f_85aa_2f0a31ef99a3_AnB => mw7b75872b_b85d_4551_86db_cce9a9eab6cf_AnB + mwa07cfc4d_c5f7_49d1_adcb_d24c80d37745_AnB; mw6ae142ef_f4d9_4e7d_b714_60d6f9ac9c0c_AnB_TXTL_transcription_rate1*mw73b59de8_b54e_4f3f_85aa_2f0a31ef99a3_AnB;
    mw6ae142ef_f4d9_4e7d_b714_60d6f9ac9c0c_AnB_TXTL_transcription_rate1 = 0.001470588;
  mweda4f310_dd1f_4978_91ad_8f8df938d71b_AnB: mw065bf04a_6b4d_4ffe_bcfe_f72e58d1e9db_AnB + mwfa85abf9_cffb_4957_9678_1c8b4dafd02b_AnB -> mwd65841ba_96c2_4d96_88d0_f17c86887dee_AnB; mweda4f310_dd1f_4978_91ad_8f8df938d71b_AnB_TL_AA_F*mw065bf04a_6b4d_4ffe_bcfe_f72e58d1e9db_AnB*mwfa85abf9_cffb_4957_9678_1c8b4dafd02b_AnB - mweda4f310_dd1f_4978_91ad_8f8df938d71b_AnB_TL_AA_R*mwd65841ba_96c2_4d96_88d0_f17c86887dee_AnB;
    mweda4f310_dd1f_4978_91ad_8f8df938d71b_AnB_TL_AA_F = 300; mweda4f310_dd1f_4978_91ad_8f8df938d71b_AnB_TL_AA_R = 0.1;
  mwe7fb6e72_75ac_4281_b296_9043306af5d8_AnB: mwd65841ba_96c2_4d96_88d0_f17c86887dee_AnB + 2 mwbef4c2a1_39b3_45b9_9560_96f951c1a1bb_AnB -> mwf7d21f13_7c61_4c7a_b4b9_08280255ab19_AnB; mwe7fb6e72_75ac_4281_b296_9043306af5d8_AnB_TL_AGTP_F*mwd65841ba_96c2_4d96_88d0_f17c86887dee_AnB*mwbef4c2a1_39b3_45b9_9560_96f951c1a1bb_AnB^2 - mwe7fb6e72_75ac_4281_b296_9043306af5d8_AnB_TL_AGTP_R*mwf7d21f13_7c61_4c7a_b4b9_08280255ab19_AnB;
    mwe7fb6e72_75ac_4281_b296_9043306af5d8_AnB_TL_AGTP_F = 30; mwe7fb6e72_75ac_4281_b296_9043306af5d8_AnB_TL_AGTP_R = 10;
  mw5773fa08_2b08_4e6e_9bb7_1b14a6dccccb_AnB: mwf7d21f13_7c61_4c7a_b4b9_08280255ab19_AnB => mw1fd81d8c_23e4_4079_bc65_7691b70d3544_AnB; mw5773fa08_2b08_4e6e_9bb7_1b14a6dccccb_AnB_TXTL_TL_AA_consumption*mwf7d21f13_7c61_4c7a_b4b9_08280255ab19_AnB;
    mw5773fa08_2b08_4e6e_9bb7_1b14a6dccccb_AnB_TXTL_TL_AA_consumption = 0.024;
  mw74ffd462_e8e9_4d13_8088_913d8c7517bd_AnB: mwf7d21f13_7c61_4c7a_b4b9_08280255ab19_AnB => mw1fd81d8c_23e4_4079_bc65_7691b70d3544_AnB + mwcea5300b_7ddc_42ab_925c_87b55beab50b_AnB; mw74ffd462_e8e9_4d13_8088_913d8c7517bd_AnB_TXTL_TL_rate*mwf7d21f13_7c61_4c7a_b4b9_08280255ab19_AnB;
    mw74ffd462_e8e9_4d13_8088_913d8c7517bd_AnB_TXTL_TL_rate = 0.012;
  mwf7c5282e_3c1a_4048_81a8_8acfa7da60be_AnB: mw1fd81d8c_23e4_4079_bc65_7691b70d3544_AnB => mwa07cfc4d_c5f7_49d1_adcb_d24c80d37745_AnB + mw41d4d6ad_adcc_4998_9736_211a8e68d45b_AnB; mwf7c5282e_3c1a_4048_81a8_8acfa7da60be_AnB_TXTL_RIBOBOUND_TERMINATION_RATE*mw1fd81d8c_23e4_4079_bc65_7691b70d3544_AnB;
    mwf7c5282e_3c1a_4048_81a8_8acfa7da60be_AnB_TXTL_RIBOBOUND_TERMINATION_RATE = 50;
  mwaad867b3_eb58_4d38_9ceb_45f3308ed248_AnB: mwa07cfc4d_c5f7_49d1_adcb_d24c80d37745_AnB + mwe269f848_a93f_4ee4_946a_ed61e5a48c84_AnB -> mw9a36698b_94e3_48d1_9316_34a3638c802c_AnB; mwaad867b3_eb58_4d38_9ceb_45f3308ed248_AnB_TXTL_RNAdeg_F*mwa07cfc4d_c5f7_49d1_adcb_d24c80d37745_AnB*mwe269f848_a93f_4ee4_946a_ed61e5a48c84_AnB - mwaad867b3_eb58_4d38_9ceb_45f3308ed248_AnB_TXTL_RNAdeg_R*mw9a36698b_94e3_48d1_9316_34a3638c802c_AnB;
    mwaad867b3_eb58_4d38_9ceb_45f3308ed248_AnB_TXTL_RNAdeg_F = 10; mwaad867b3_eb58_4d38_9ceb_45f3308ed248_AnB_TXTL_RNAdeg_R = 2000;
  mw074a841a_423e_4363_be1f_57771085b5bc_AnB: mw9a36698b_94e3_48d1_9316_34a3638c802c_AnB => mwe269f848_a93f_4ee4_946a_ed61e5a48c84_AnB; mw074a841a_423e_4363_be1f_57771085b5bc_AnB_TXTL_RNAdeg_F*mw9a36698b_94e3_48d1_9316_34a3638c802c_AnB;
    mw074a841a_423e_4363_be1f_57771085b5bc_AnB_TXTL_RNAdeg_F = 0.002777778;
  mwad6890c4_4051_4fff_aa09_9f6485397c24_AnB: mw065bf04a_6b4d_4ffe_bcfe_f72e58d1e9db_AnB + mwe269f848_a93f_4ee4_946a_ed61e5a48c84_AnB -> mw4c863164_fb03_4865_a5f0_0ad2338ed993_AnB; mwad6890c4_4051_4fff_aa09_9f6485397c24_AnB_TXTL_RNAdeg_F*mw065bf04a_6b4d_4ffe_bcfe_f72e58d1e9db_AnB*mwe269f848_a93f_4ee4_946a_ed61e5a48c84_AnB - mwad6890c4_4051_4fff_aa09_9f6485397c24_AnB_TXTL_RNAdeg_R*mw4c863164_fb03_4865_a5f0_0ad2338ed993_AnB;
    mwad6890c4_4051_4fff_aa09_9f6485397c24_AnB_TXTL_RNAdeg_F = 10; mwad6890c4_4051_4fff_aa09_9f6485397c24_AnB_TXTL_RNAdeg_R = 2000;
  mw61149f55_2454_4c7f_bf39_f32b37111bd4_AnB: mw4c863164_fb03_4865_a5f0_0ad2338ed993_AnB => mwe269f848_a93f_4ee4_946a_ed61e5a48c84_AnB + mw41d4d6ad_adcc_4998_9736_211a8e68d45b_AnB; mw61149f55_2454_4c7f_bf39_f32b37111bd4_AnB_TXTL_RNAdeg_F*mw4c863164_fb03_4865_a5f0_0ad2338ed993_AnB;
    mw61149f55_2454_4c7f_bf39_f32b37111bd4_AnB_TXTL_RNAdeg_F = 0.002777778;
  mw9ea92896_483e_4f6a_ab30_1011564221ff_AnB: mwf7d21f13_7c61_4c7a_b4b9_08280255ab19_AnB + mwe269f848_a93f_4ee4_946a_ed61e5a48c84_AnB -> mw7bfb7ac7_522d_4003_8d74_2f8398e00159_AnB; mw9ea92896_483e_4f6a_ab30_1011564221ff_AnB_TXTL_RNAdeg_F*mwf7d21f13_7c61_4c7a_b4b9_08280255ab19_AnB*mwe269f848_a93f_4ee4_946a_ed61e5a48c84_AnB - mw9ea92896_483e_4f6a_ab30_1011564221ff_AnB_TXTL_RNAdeg_R*mw7bfb7ac7_522d_4003_8d74_2f8398e00159_AnB;
    mw9ea92896_483e_4f6a_ab30_1011564221ff_AnB_TXTL_RNAdeg_F = 10; mw9ea92896_483e_4f6a_ab30_1011564221ff_AnB_TXTL_RNAdeg_R = 2000;
  mw2edeb8a3_4bb3_4d35_ab0a_3e8fa6b4bcaa_AnB: mw7bfb7ac7_522d_4003_8d74_2f8398e00159_AnB => mwe269f848_a93f_4ee4_946a_ed61e5a48c84_AnB + mwfa85abf9_cffb_4957_9678_1c8b4dafd02b_AnB + 2 mwbef4c2a1_39b3_45b9_9560_96f951c1a1bb_AnB + mw41d4d6ad_adcc_4998_9736_211a8e68d45b_AnB; mw2edeb8a3_4bb3_4d35_ab0a_3e8fa6b4bcaa_AnB_TXTL_RNAdeg_F*mw7bfb7ac7_522d_4003_8d74_2f8398e00159_AnB;
    mw2edeb8a3_4bb3_4d35_ab0a_3e8fa6b4bcaa_AnB_TXTL_RNAdeg_F = 0.002777778;
  mw4c8eafde_8602_43a0_93f7_bbc0cea9190d_AnB: mw1fd81d8c_23e4_4079_bc65_7691b70d3544_AnB + mwe269f848_a93f_4ee4_946a_ed61e5a48c84_AnB -> mw9bb808dd_2401_45af_8c5a_b6daeb4f274e_AnB; mw4c8eafde_8602_43a0_93f7_bbc0cea9190d_AnB_TXTL_RNAdeg_F*mw1fd81d8c_23e4_4079_bc65_7691b70d3544_AnB*mwe269f848_a93f_4ee4_946a_ed61e5a48c84_AnB - mw4c8eafde_8602_43a0_93f7_bbc0cea9190d_AnB_TXTL_RNAdeg_R*mw9bb808dd_2401_45af_8c5a_b6daeb4f274e_AnB;
    mw4c8eafde_8602_43a0_93f7_bbc0cea9190d_AnB_TXTL_RNAdeg_F = 10; mw4c8eafde_8602_43a0_93f7_bbc0cea9190d_AnB_TXTL_RNAdeg_R = 2000;
  mwa52ed879_a2ee_4400_8c88_6fd5b42c71da_AnB: mw9bb808dd_2401_45af_8c5a_b6daeb4f274e_AnB => mwe269f848_a93f_4ee4_946a_ed61e5a48c84_AnB + mw41d4d6ad_adcc_4998_9736_211a8e68d45b_AnB; mwa52ed879_a2ee_4400_8c88_6fd5b42c71da_AnB_TXTL_RNAdeg_F*mw9bb808dd_2401_45af_8c5a_b6daeb4f274e_AnB;
    mwa52ed879_a2ee_4400_8c88_6fd5b42c71da_AnB_TXTL_RNAdeg_F = 0.002777778;
  mw80a18869_0804_4f6b_9df5_4b5e2597c311_AnB: mwd65841ba_96c2_4d96_88d0_f17c86887dee_AnB + mwe269f848_a93f_4ee4_946a_ed61e5a48c84_AnB -> mw1d8add78_72ad_4d08_9f44_ed2089d752da_AnB; mw80a18869_0804_4f6b_9df5_4b5e2597c311_AnB_TXTL_RNAdeg_F*mwd65841ba_96c2_4d96_88d0_f17c86887dee_AnB*mwe269f848_a93f_4ee4_946a_ed61e5a48c84_AnB - mw80a18869_0804_4f6b_9df5_4b5e2597c311_AnB_TXTL_RNAdeg_R*mw1d8add78_72ad_4d08_9f44_ed2089d752da_AnB;
    mw80a18869_0804_4f6b_9df5_4b5e2597c311_AnB_TXTL_RNAdeg_F = 10; mw80a18869_0804_4f6b_9df5_4b5e2597c311_AnB_TXTL_RNAdeg_R = 2000;
  mw9c1c6d34_e8d4_4832_87e8_1728a5914b94_AnB: mw1d8add78_72ad_4d08_9f44_ed2089d752da_AnB => mwe269f848_a93f_4ee4_946a_ed61e5a48c84_AnB + mwfa85abf9_cffb_4957_9678_1c8b4dafd02b_AnB + mw41d4d6ad_adcc_4998_9736_211a8e68d45b_AnB; mw9c1c6d34_e8d4_4832_87e8_1728a5914b94_AnB_TXTL_RNAdeg_F*mw1d8add78_72ad_4d08_9f44_ed2089d752da_AnB;
    mw9c1c6d34_e8d4_4832_87e8_1728a5914b94_AnB_TXTL_RNAdeg_F = 0.002777778;
  mw2dc316ee_45b5_4a6f_a0f8_7eb159281173_AnB: mwe26f1cb1_86e9_4e5e_9114_02970551aeb9_AnB + mw7a2929bf_23db_4c0d_b6f5_bf69bb477bcb_AnB -> mw404a05a7_dfdf_4ac5_8c65_8c2ec10d852b_AnB; Sigma28_RNAP_F*mwe26f1cb1_86e9_4e5e_9114_02970551aeb9_AnB*mw7a2929bf_23db_4c0d_b6f5_bf69bb477bcb_AnB - Sigma28_RNAP_R*mw404a05a7_dfdf_4ac5_8c65_8c2ec10d852b_AnB;
    Sigma28_RNAP_F = 100; Sigma28_RNAP_R = 0.1;
  mw71fb143e_acf5_47bc_a818_7c33926fed69_AnB: mw533eb5b8_8b8e_4dac_9a4b_71d6eb3a3b87_AnB + mw41d4d6ad_adcc_4998_9736_211a8e68d45b_AnB -> mw4d455df1_e8ff_4b24_a734_72d8e842f12f_AnB; mw71fb143e_acf5_47bc_a818_7c33926fed69_AnB_TXTL_UTR_UTR1_F*mw533eb5b8_8b8e_4dac_9a4b_71d6eb3a3b87_AnB*mw41d4d6ad_adcc_4998_9736_211a8e68d45b_AnB - mw71fb143e_acf5_47bc_a818_7c33926fed69_AnB_TXTL_UTR_UTR1_R*mw4d455df1_e8ff_4b24_a734_72d8e842f12f_AnB;
    mw71fb143e_acf5_47bc_a818_7c33926fed69_AnB_TXTL_UTR_UTR1_F = 0.2; mw71fb143e_acf5_47bc_a818_7c33926fed69_AnB_TXTL_UTR_UTR1_R = 4;
  mw34bfdc51_12ca_4b09_878c_26cb13b67888_AnB: mwcef0e140_c962_4d8d_8a59_e568667c674c_AnB + mwe26f1cb1_86e9_4e5e_9114_02970551aeb9_AnB -> mwe82cef39_2326_4877_8bef_dafc36b43da4_AnB; TXTL_PLUX_RNAPbound_F*mwcef0e140_c962_4d8d_8a59_e568667c674c_AnB*mwe26f1cb1_86e9_4e5e_9114_02970551aeb9_AnB - TXTL_PLUX_RNAPbound_R*mwe82cef39_2326_4877_8bef_dafc36b43da4_AnB;
    TXTL_PLUX_RNAPbound_F = 0; TXTL_PLUX_RNAPbound_R = 5;
  mw412b82a7_fea5_4db3_83d7_a23d1b91b755_AnB: mwcef0e140_c962_4d8d_8a59_e568667c674c_AnB + mw51f6b144_881b_4e9b_a2c5_386db0664590_AnB -> mw57a0e349_0621_49d7_ba49_55473e600658_AnB; mw412b82a7_fea5_4db3_83d7_a23d1b91b755_AnB_TXTL_PLUX_TFBIND_F*mwcef0e140_c962_4d8d_8a59_e568667c674c_AnB*mw51f6b144_881b_4e9b_a2c5_386db0664590_AnB - mw412b82a7_fea5_4db3_83d7_a23d1b91b755_AnB_TXTL_PLUX_TFBIND_R*mw57a0e349_0621_49d7_ba49_55473e600658_AnB;
    mw412b82a7_fea5_4db3_83d7_a23d1b91b755_AnB_TXTL_PLUX_TFBIND_F = 0.00286; mw412b82a7_fea5_4db3_83d7_a23d1b91b755_AnB_TXTL_PLUX_TFBIND_R = 1.1e-5;
  mwcb6d0282_a0a4_45bb_817d_db93c45bc951_AnB: mw57a0e349_0621_49d7_ba49_55473e600658_AnB + mwe26f1cb1_86e9_4e5e_9114_02970551aeb9_AnB -> mwf1d9cbb0_c7e6_45e7_a3e3_fdc0d39c7987_AnB; TXTL_PLUX_TFRNAPbound_F*mw57a0e349_0621_49d7_ba49_55473e600658_AnB*mwe26f1cb1_86e9_4e5e_9114_02970551aeb9_AnB - TXTL_PLUX_TFRNAPbound_R*mwf1d9cbb0_c7e6_45e7_a3e3_fdc0d39c7987_AnB;
    TXTL_PLUX_TFRNAPbound_F = 0.3; TXTL_PLUX_TFRNAPbound_R = 5;
  mwbc84cb5e_e99f_4742_b5bf_bb52e53cf32f_AnB: mw144ed4b2_02d6_447b_9dd2_4d3b780c9113_AnB -> mwf1d9cbb0_c7e6_45e7_a3e3_fdc0d39c7987_AnB; mwbc84cb5e_e99f_4742_b5bf_bb52e53cf32f_AnB_TXTL_PLUX_TFBIND_F*mw144ed4b2_02d6_447b_9dd2_4d3b780c9113_AnB - mwbc84cb5e_e99f_4742_b5bf_bb52e53cf32f_AnB_TXTL_PLUX_TFBIND_R*mwf1d9cbb0_c7e6_45e7_a3e3_fdc0d39c7987_AnB;
    mwbc84cb5e_e99f_4742_b5bf_bb52e53cf32f_AnB_TXTL_PLUX_TFBIND_F = 0.00286; mwbc84cb5e_e99f_4742_b5bf_bb52e53cf32f_AnB_TXTL_PLUX_TFBIND_R = 1.1e-5;
  mwddffa7a3_3d8a_4bbf_853e_da14b58c6a0e_AnB: mwb55741ab_8f7e_4a41_b875_0b15d345b89e_AnB => mwe82cef39_2326_4877_8bef_dafc36b43da4_AnB; mwddffa7a3_3d8a_4bbf_853e_da14b58c6a0e_AnB_TXTL_NTP_consumption*mwb55741ab_8f7e_4a41_b875_0b15d345b89e_AnB;
    mwddffa7a3_3d8a_4bbf_853e_da14b58c6a0e_AnB_TXTL_NTP_consumption = 0.7487705;
  mw019ac8a5_82cd_4aef_a2e9_20f7f98a5aec_AnB: mw1bb453d2_f6db_44a1_b44d_ed93fef360cd_AnB => mwe26f1cb1_86e9_4e5e_9114_02970551aeb9_AnB + mwcef0e140_c962_4d8d_8a59_e568667c674c_AnB; mw019ac8a5_82cd_4aef_a2e9_20f7f98a5aec_AnB_TXTL_RNAPBOUND_TERMINATION_RATE*mw1bb453d2_f6db_44a1_b44d_ed93fef360cd_AnB;
    mw019ac8a5_82cd_4aef_a2e9_20f7f98a5aec_AnB_TXTL_RNAPBOUND_TERMINATION_RATE = 0.05;
  mw4106690f_e611_456f_8dec_9b235e434979_AnB: mwe82cef39_2326_4877_8bef_dafc36b43da4_AnB + mwbef4c2a1_39b3_45b9_9560_96f951c1a1bb_AnB -> mw1eaf957b_c28c_438d_a2ab_bce712628e77_AnB; mw4106690f_e611_456f_8dec_9b235e434979_AnB_TXTL_NTP_RNAP_F*mwe82cef39_2326_4877_8bef_dafc36b43da4_AnB*mwbef4c2a1_39b3_45b9_9560_96f951c1a1bb_AnB - mw4106690f_e611_456f_8dec_9b235e434979_AnB_TXTL_NTP_RNAP_R*mw1eaf957b_c28c_438d_a2ab_bce712628e77_AnB;
    mw4106690f_e611_456f_8dec_9b235e434979_AnB_TXTL_NTP_RNAP_F = 1000; mw4106690f_e611_456f_8dec_9b235e434979_AnB_TXTL_NTP_RNAP_R = 120000000;
  mw97ed863e_b389_4b2a_ac8c_5afc59d2ae94_AnB: mwe82cef39_2326_4877_8bef_dafc36b43da4_AnB + mw14a57bf4_e194_425f_a352_17261719166f_AnB -> mw57048240_4f4b_4790_8d46_86a4c0ee6f1c_AnB; mw97ed863e_b389_4b2a_ac8c_5afc59d2ae94_AnB_TXTL_NTP_RNAP_F*mwe82cef39_2326_4877_8bef_dafc36b43da4_AnB*mw14a57bf4_e194_425f_a352_17261719166f_AnB - mw97ed863e_b389_4b2a_ac8c_5afc59d2ae94_AnB_TXTL_NTP_RNAP_R*mw57048240_4f4b_4790_8d46_86a4c0ee6f1c_AnB;
    mw97ed863e_b389_4b2a_ac8c_5afc59d2ae94_AnB_TXTL_NTP_RNAP_F = 1000; mw97ed863e_b389_4b2a_ac8c_5afc59d2ae94_AnB_TXTL_NTP_RNAP_R = 120000000;
  mw1130fc82_d04c_4ece_9769_d75443adf208_AnB: mw1eaf957b_c28c_438d_a2ab_bce712628e77_AnB + mw14a57bf4_e194_425f_a352_17261719166f_AnB -> mwb55741ab_8f7e_4a41_b875_0b15d345b89e_AnB; mw1130fc82_d04c_4ece_9769_d75443adf208_AnB_TXTL_NTP_RNAP_F*mw1eaf957b_c28c_438d_a2ab_bce712628e77_AnB*mw14a57bf4_e194_425f_a352_17261719166f_AnB - mw1130fc82_d04c_4ece_9769_d75443adf208_AnB_TXTL_NTP_RNAP_R*mwb55741ab_8f7e_4a41_b875_0b15d345b89e_AnB;
    mw1130fc82_d04c_4ece_9769_d75443adf208_AnB_TXTL_NTP_RNAP_F = 1; mw1130fc82_d04c_4ece_9769_d75443adf208_AnB_TXTL_NTP_RNAP_R = 120000;
  mw1890d11e_9607_404a_b576_1919c8ada491_AnB: mw57048240_4f4b_4790_8d46_86a4c0ee6f1c_AnB + mwbef4c2a1_39b3_45b9_9560_96f951c1a1bb_AnB -> mwb55741ab_8f7e_4a41_b875_0b15d345b89e_AnB; mw1890d11e_9607_404a_b576_1919c8ada491_AnB_TXTL_NTP_RNAP_F*mw57048240_4f4b_4790_8d46_86a4c0ee6f1c_AnB*mwbef4c2a1_39b3_45b9_9560_96f951c1a1bb_AnB - mw1890d11e_9607_404a_b576_1919c8ada491_AnB_TXTL_NTP_RNAP_R*mwb55741ab_8f7e_4a41_b875_0b15d345b89e_AnB;
    mw1890d11e_9607_404a_b576_1919c8ada491_AnB_TXTL_NTP_RNAP_F = 1; mw1890d11e_9607_404a_b576_1919c8ada491_AnB_TXTL_NTP_RNAP_R = 120000;
  mw997a3155_9586_4d30_89b2_05a04bc92d3f_AnB: mwb55741ab_8f7e_4a41_b875_0b15d345b89e_AnB => mw1bb453d2_f6db_44a1_b44d_ed93fef360cd_AnB + mw533eb5b8_8b8e_4dac_9a4b_71d6eb3a3b87_AnB; mw997a3155_9586_4d30_89b2_05a04bc92d3f_AnB_TXTL_transcription_rate1*mwb55741ab_8f7e_4a41_b875_0b15d345b89e_AnB;
    mw997a3155_9586_4d30_89b2_05a04bc92d3f_AnB_TXTL_transcription_rate1 = 0.001229508;
  mwd8e04aa7_83ab_4038_b956_b5fb476ea65a_AnB: mw9c6826e6_be3e_4d75_a70b_7386b6505939_AnB => mwf1d9cbb0_c7e6_45e7_a3e3_fdc0d39c7987_AnB; mwd8e04aa7_83ab_4038_b956_b5fb476ea65a_AnB_TXTL_NTP_consumption*mw9c6826e6_be3e_4d75_a70b_7386b6505939_AnB;
    mwd8e04aa7_83ab_4038_b956_b5fb476ea65a_AnB_TXTL_NTP_consumption = 0.7487705;
  mw72c0eb63_b2b5_47ad_8ac2_062b66693afb_AnB: mwb62257b8_b7b5_4af1_8d8e_355c03e5a7b9_AnB => mwe26f1cb1_86e9_4e5e_9114_02970551aeb9_AnB + mwcef0e140_c962_4d8d_8a59_e568667c674c_AnB + mw51f6b144_881b_4e9b_a2c5_386db0664590_AnB; mw72c0eb63_b2b5_47ad_8ac2_062b66693afb_AnB_TXTL_RNAPBOUND_TERMINATION_RATE*mwb62257b8_b7b5_4af1_8d8e_355c03e5a7b9_AnB;
    mw72c0eb63_b2b5_47ad_8ac2_062b66693afb_AnB_TXTL_RNAPBOUND_TERMINATION_RATE = 0.05;
  mw9f357063_18eb_4857_aa32_694ec30999f1_AnB: mwf1d9cbb0_c7e6_45e7_a3e3_fdc0d39c7987_AnB + mwbef4c2a1_39b3_45b9_9560_96f951c1a1bb_AnB -> mwefff14e2_0a63_41d8_aab2_e4f368bd83e8_AnB; mw9f357063_18eb_4857_aa32_694ec30999f1_AnB_TXTL_NTP_RNAP_F*mwf1d9cbb0_c7e6_45e7_a3e3_fdc0d39c7987_AnB*mwbef4c2a1_39b3_45b9_9560_96f951c1a1bb_AnB - mw9f357063_18eb_4857_aa32_694ec30999f1_AnB_TXTL_NTP_RNAP_R*mwefff14e2_0a63_41d8_aab2_e4f368bd83e8_AnB;
    mw9f357063_18eb_4857_aa32_694ec30999f1_AnB_TXTL_NTP_RNAP_F = 1000; mw9f357063_18eb_4857_aa32_694ec30999f1_AnB_TXTL_NTP_RNAP_R = 120000000;
  mw1cc80c0d_5efc_4a09_a1a0_7bd65f91e874_AnB: mwf1d9cbb0_c7e6_45e7_a3e3_fdc0d39c7987_AnB + mw14a57bf4_e194_425f_a352_17261719166f_AnB -> mw94b5be2e_9dec_4a65_abd1_521865cfc9fb_AnB; mw1cc80c0d_5efc_4a09_a1a0_7bd65f91e874_AnB_TXTL_NTP_RNAP_F*mwf1d9cbb0_c7e6_45e7_a3e3_fdc0d39c7987_AnB*mw14a57bf4_e194_425f_a352_17261719166f_AnB - mw1cc80c0d_5efc_4a09_a1a0_7bd65f91e874_AnB_TXTL_NTP_RNAP_R*mw94b5be2e_9dec_4a65_abd1_521865cfc9fb_AnB;
    mw1cc80c0d_5efc_4a09_a1a0_7bd65f91e874_AnB_TXTL_NTP_RNAP_F = 1000; mw1cc80c0d_5efc_4a09_a1a0_7bd65f91e874_AnB_TXTL_NTP_RNAP_R = 120000000;
  mw643c9bd1_12ff_4813_b8de_228f056f9a33_AnB: mwefff14e2_0a63_41d8_aab2_e4f368bd83e8_AnB + mw14a57bf4_e194_425f_a352_17261719166f_AnB -> mw9c6826e6_be3e_4d75_a70b_7386b6505939_AnB; mw643c9bd1_12ff_4813_b8de_228f056f9a33_AnB_TXTL_NTP_RNAP_F*mwefff14e2_0a63_41d8_aab2_e4f368bd83e8_AnB*mw14a57bf4_e194_425f_a352_17261719166f_AnB - mw643c9bd1_12ff_4813_b8de_228f056f9a33_AnB_TXTL_NTP_RNAP_R*mw9c6826e6_be3e_4d75_a70b_7386b6505939_AnB;
    mw643c9bd1_12ff_4813_b8de_228f056f9a33_AnB_TXTL_NTP_RNAP_F = 1; mw643c9bd1_12ff_4813_b8de_228f056f9a33_AnB_TXTL_NTP_RNAP_R = 120000;
  mw4336a222_726f_4304_8160_737f699a43ab_AnB: mw94b5be2e_9dec_4a65_abd1_521865cfc9fb_AnB + mwbef4c2a1_39b3_45b9_9560_96f951c1a1bb_AnB -> mw9c6826e6_be3e_4d75_a70b_7386b6505939_AnB; mw4336a222_726f_4304_8160_737f699a43ab_AnB_TXTL_NTP_RNAP_F*mw94b5be2e_9dec_4a65_abd1_521865cfc9fb_AnB*mwbef4c2a1_39b3_45b9_9560_96f951c1a1bb_AnB - mw4336a222_726f_4304_8160_737f699a43ab_AnB_TXTL_NTP_RNAP_R*mw9c6826e6_be3e_4d75_a70b_7386b6505939_AnB;
    mw4336a222_726f_4304_8160_737f699a43ab_AnB_TXTL_NTP_RNAP_F = 1; mw4336a222_726f_4304_8160_737f699a43ab_AnB_TXTL_NTP_RNAP_R = 120000;
  mw33d1689d_16a7_40d2_abf5_438b3f33904e_AnB: mw9c6826e6_be3e_4d75_a70b_7386b6505939_AnB => mwb62257b8_b7b5_4af1_8d8e_355c03e5a7b9_AnB + mw533eb5b8_8b8e_4dac_9a4b_71d6eb3a3b87_AnB; mw33d1689d_16a7_40d2_abf5_438b3f33904e_AnB_TXTL_transcription_rate1*mw9c6826e6_be3e_4d75_a70b_7386b6505939_AnB;
    mw33d1689d_16a7_40d2_abf5_438b3f33904e_AnB_TXTL_transcription_rate1 = 0.001229508;
  mw23439539_9ae3_40fb_9eae_baff2762a6eb_AnB: mw4d455df1_e8ff_4b24_a734_72d8e842f12f_AnB + mwfa85abf9_cffb_4957_9678_1c8b4dafd02b_AnB -> mw95dac394_f5f9_493e_beb1_2955219fd03e_AnB; mw23439539_9ae3_40fb_9eae_baff2762a6eb_AnB_TL_AA_F*mw4d455df1_e8ff_4b24_a734_72d8e842f12f_AnB*mwfa85abf9_cffb_4957_9678_1c8b4dafd02b_AnB - mw23439539_9ae3_40fb_9eae_baff2762a6eb_AnB_TL_AA_R*mw95dac394_f5f9_493e_beb1_2955219fd03e_AnB;
    mw23439539_9ae3_40fb_9eae_baff2762a6eb_AnB_TL_AA_F = 300; mw23439539_9ae3_40fb_9eae_baff2762a6eb_AnB_TL_AA_R = 0.1;
  mwb045b0fa_330b_4359_8608_3f0b6161fdef_AnB: mw95dac394_f5f9_493e_beb1_2955219fd03e_AnB + 2 mwbef4c2a1_39b3_45b9_9560_96f951c1a1bb_AnB -> mw4fedd4e5_85f3_41dc_b57d_0122030c7cb7_AnB; mwb045b0fa_330b_4359_8608_3f0b6161fdef_AnB_TL_AGTP_F*mw95dac394_f5f9_493e_beb1_2955219fd03e_AnB*mwbef4c2a1_39b3_45b9_9560_96f951c1a1bb_AnB^2 - mwb045b0fa_330b_4359_8608_3f0b6161fdef_AnB_TL_AGTP_R*mw4fedd4e5_85f3_41dc_b57d_0122030c7cb7_AnB;
    mwb045b0fa_330b_4359_8608_3f0b6161fdef_AnB_TL_AGTP_F = 30; mwb045b0fa_330b_4359_8608_3f0b6161fdef_AnB_TL_AGTP_R = 10;
  mwabd3c2ad_d2d6_4da7_8b62_420e207d66e7_AnB: mw4fedd4e5_85f3_41dc_b57d_0122030c7cb7_AnB => mw52913b82_e0ca_41b9_8b31_b67a4c98ba41_AnB; mwabd3c2ad_d2d6_4da7_8b62_420e207d66e7_AnB_TXTL_TL_AA_consumption*mw4fedd4e5_85f3_41dc_b57d_0122030c7cb7_AnB;
    mwabd3c2ad_d2d6_4da7_8b62_420e207d66e7_AnB_TXTL_TL_AA_consumption = 0.03;
  mw8e480caf_7fa8_478e_8dda_0ad2052e564d_AnB: mw4fedd4e5_85f3_41dc_b57d_0122030c7cb7_AnB => mw52913b82_e0ca_41b9_8b31_b67a4c98ba41_AnB + mw7a2929bf_23db_4c0d_b6f5_bf69bb477bcb_AnB; mw8e480caf_7fa8_478e_8dda_0ad2052e564d_AnB_TXTL_TL_rate*mw4fedd4e5_85f3_41dc_b57d_0122030c7cb7_AnB;
    mw8e480caf_7fa8_478e_8dda_0ad2052e564d_AnB_TXTL_TL_rate = 0.01;
  mwba433159_8d3d_445c_a0fc_f881d9de7935_AnB: mw52913b82_e0ca_41b9_8b31_b67a4c98ba41_AnB => mw533eb5b8_8b8e_4dac_9a4b_71d6eb3a3b87_AnB + mw41d4d6ad_adcc_4998_9736_211a8e68d45b_AnB; mwba433159_8d3d_445c_a0fc_f881d9de7935_AnB_TXTL_RIBOBOUND_TERMINATION_RATE*mw52913b82_e0ca_41b9_8b31_b67a4c98ba41_AnB;
    mwba433159_8d3d_445c_a0fc_f881d9de7935_AnB_TXTL_RIBOBOUND_TERMINATION_RATE = 50;
  mwfe4a71ab_b01a_4b12_9f7b_1439f949f4c2_AnB: mw533eb5b8_8b8e_4dac_9a4b_71d6eb3a3b87_AnB + mwe269f848_a93f_4ee4_946a_ed61e5a48c84_AnB -> mwfb99e7c0_7171_4cfc_a118_b2630e51d21a_AnB; mwfe4a71ab_b01a_4b12_9f7b_1439f949f4c2_AnB_TXTL_RNAdeg_F*mw533eb5b8_8b8e_4dac_9a4b_71d6eb3a3b87_AnB*mwe269f848_a93f_4ee4_946a_ed61e5a48c84_AnB - mwfe4a71ab_b01a_4b12_9f7b_1439f949f4c2_AnB_TXTL_RNAdeg_R*mwfb99e7c0_7171_4cfc_a118_b2630e51d21a_AnB;
    mwfe4a71ab_b01a_4b12_9f7b_1439f949f4c2_AnB_TXTL_RNAdeg_F = 10; mwfe4a71ab_b01a_4b12_9f7b_1439f949f4c2_AnB_TXTL_RNAdeg_R = 2000;
  mw90e93c6f_eb18_40dd_adfc_a45c16df3c0e_AnB: mwfb99e7c0_7171_4cfc_a118_b2630e51d21a_AnB => mwe269f848_a93f_4ee4_946a_ed61e5a48c84_AnB; mw90e93c6f_eb18_40dd_adfc_a45c16df3c0e_AnB_TXTL_RNAdeg_F*mwfb99e7c0_7171_4cfc_a118_b2630e51d21a_AnB;
    mw90e93c6f_eb18_40dd_adfc_a45c16df3c0e_AnB_TXTL_RNAdeg_F = 0.002777778;
  mwce14e708_96ad_4990_bee2_c64c785d4191_AnB: mw4d455df1_e8ff_4b24_a734_72d8e842f12f_AnB + mwe269f848_a93f_4ee4_946a_ed61e5a48c84_AnB -> mwe45b5988_ada6_46e1_9875_d925ea218fc3_AnB; mwce14e708_96ad_4990_bee2_c64c785d4191_AnB_TXTL_RNAdeg_F*mw4d455df1_e8ff_4b24_a734_72d8e842f12f_AnB*mwe269f848_a93f_4ee4_946a_ed61e5a48c84_AnB - mwce14e708_96ad_4990_bee2_c64c785d4191_AnB_TXTL_RNAdeg_R*mwe45b5988_ada6_46e1_9875_d925ea218fc3_AnB;
    mwce14e708_96ad_4990_bee2_c64c785d4191_AnB_TXTL_RNAdeg_F = 10; mwce14e708_96ad_4990_bee2_c64c785d4191_AnB_TXTL_RNAdeg_R = 2000;
  mw6f82da77_9243_40c2_999f_0492645b8046_AnB: mwe45b5988_ada6_46e1_9875_d925ea218fc3_AnB => mwe269f848_a93f_4ee4_946a_ed61e5a48c84_AnB + mw41d4d6ad_adcc_4998_9736_211a8e68d45b_AnB; mw6f82da77_9243_40c2_999f_0492645b8046_AnB_TXTL_RNAdeg_F*mwe45b5988_ada6_46e1_9875_d925ea218fc3_AnB;
    mw6f82da77_9243_40c2_999f_0492645b8046_AnB_TXTL_RNAdeg_F = 0.002777778;
  mw24f049b9_8349_4753_8276_f485fbf7ac66_AnB: mw4fedd4e5_85f3_41dc_b57d_0122030c7cb7_AnB + mwe269f848_a93f_4ee4_946a_ed61e5a48c84_AnB -> mw702213e9_e07f_4047_a4ef_46198134819f_AnB; mw24f049b9_8349_4753_8276_f485fbf7ac66_AnB_TXTL_RNAdeg_F*mw4fedd4e5_85f3_41dc_b57d_0122030c7cb7_AnB*mwe269f848_a93f_4ee4_946a_ed61e5a48c84_AnB - mw24f049b9_8349_4753_8276_f485fbf7ac66_AnB_TXTL_RNAdeg_R*mw702213e9_e07f_4047_a4ef_46198134819f_AnB;
    mw24f049b9_8349_4753_8276_f485fbf7ac66_AnB_TXTL_RNAdeg_F = 10; mw24f049b9_8349_4753_8276_f485fbf7ac66_AnB_TXTL_RNAdeg_R = 2000;
  mw997c0a0e_cfbf_470d_b5d0_f6bc505db120_AnB: mw702213e9_e07f_4047_a4ef_46198134819f_AnB => mwe269f848_a93f_4ee4_946a_ed61e5a48c84_AnB + mwfa85abf9_cffb_4957_9678_1c8b4dafd02b_AnB + 2 mwbef4c2a1_39b3_45b9_9560_96f951c1a1bb_AnB + mw41d4d6ad_adcc_4998_9736_211a8e68d45b_AnB; mw997c0a0e_cfbf_470d_b5d0_f6bc505db120_AnB_TXTL_RNAdeg_F*mw702213e9_e07f_4047_a4ef_46198134819f_AnB;
    mw997c0a0e_cfbf_470d_b5d0_f6bc505db120_AnB_TXTL_RNAdeg_F = 0.002777778;
  mwc9968fff_397e_4815_9871_cb96d73c7608_AnB: mw52913b82_e0ca_41b9_8b31_b67a4c98ba41_AnB + mwe269f848_a93f_4ee4_946a_ed61e5a48c84_AnB -> mw4d1b0f9e_7105_4e17_8bf7_386aafded37d_AnB; mwc9968fff_397e_4815_9871_cb96d73c7608_AnB_TXTL_RNAdeg_F*mw52913b82_e0ca_41b9_8b31_b67a4c98ba41_AnB*mwe269f848_a93f_4ee4_946a_ed61e5a48c84_AnB - mwc9968fff_397e_4815_9871_cb96d73c7608_AnB_TXTL_RNAdeg_R*mw4d1b0f9e_7105_4e17_8bf7_386aafded37d_AnB;
    mwc9968fff_397e_4815_9871_cb96d73c7608_AnB_TXTL_RNAdeg_F = 10; mwc9968fff_397e_4815_9871_cb96d73c7608_AnB_TXTL_RNAdeg_R = 2000;
  mwcbe83029_b0b3_467e_bb4a_9df5e3c84456_AnB: mw4d1b0f9e_7105_4e17_8bf7_386aafded37d_AnB => mwe269f848_a93f_4ee4_946a_ed61e5a48c84_AnB + mw41d4d6ad_adcc_4998_9736_211a8e68d45b_AnB; mwcbe83029_b0b3_467e_bb4a_9df5e3c84456_AnB_TXTL_RNAdeg_F*mw4d1b0f9e_7105_4e17_8bf7_386aafded37d_AnB;
    mwcbe83029_b0b3_467e_bb4a_9df5e3c84456_AnB_TXTL_RNAdeg_F = 0.002777778;
  mw99a5fc42_3cb8_4a71_b767_c3e45a79ae0d_AnB: mw95dac394_f5f9_493e_beb1_2955219fd03e_AnB + mwe269f848_a93f_4ee4_946a_ed61e5a48c84_AnB -> mwdfac0584_fa3a_4ac3_b147_8cbb10a2d488_AnB; mw99a5fc42_3cb8_4a71_b767_c3e45a79ae0d_AnB_TXTL_RNAdeg_F*mw95dac394_f5f9_493e_beb1_2955219fd03e_AnB*mwe269f848_a93f_4ee4_946a_ed61e5a48c84_AnB - mw99a5fc42_3cb8_4a71_b767_c3e45a79ae0d_AnB_TXTL_RNAdeg_R*mwdfac0584_fa3a_4ac3_b147_8cbb10a2d488_AnB;
    mw99a5fc42_3cb8_4a71_b767_c3e45a79ae0d_AnB_TXTL_RNAdeg_F = 10; mw99a5fc42_3cb8_4a71_b767_c3e45a79ae0d_AnB_TXTL_RNAdeg_R = 2000;
  mw5dcadd21_9fc1_4987_aef1_1c50238c3aac_AnB: mwdfac0584_fa3a_4ac3_b147_8cbb10a2d488_AnB => mwe269f848_a93f_4ee4_946a_ed61e5a48c84_AnB + mwfa85abf9_cffb_4957_9678_1c8b4dafd02b_AnB + mw41d4d6ad_adcc_4998_9736_211a8e68d45b_AnB; mw5dcadd21_9fc1_4987_aef1_1c50238c3aac_AnB_TXTL_RNAdeg_F*mwdfac0584_fa3a_4ac3_b147_8cbb10a2d488_AnB;
    mw5dcadd21_9fc1_4987_aef1_1c50238c3aac_AnB_TXTL_RNAdeg_F = 0.002777778;
  mw0d0d153b_b7e3_467a_b185_80eea4583ee6_AnB: mw7da19d87_d0e3_49ef_9f7f_ee08ddb4a65b_AnB + inputB_1_connected_with_OC12HSL -> mw8545f0a9_d5b7_41ae_8631_f8133e6e48e3_AnB; mw0d0d153b_b7e3_467a_b185_80eea4583ee6_AnB_TXTL_INDUCER_LUXR_AHL_F*mw7da19d87_d0e3_49ef_9f7f_ee08ddb4a65b_AnB*inputB_1_connected_with_OC12HSL - mw0d0d153b_b7e3_467a_b185_80eea4583ee6_AnB_TXTL_INDUCER_LUXR_AHL_R*mw8545f0a9_d5b7_41ae_8631_f8133e6e48e3_AnB;
    mw0d0d153b_b7e3_467a_b185_80eea4583ee6_AnB_TXTL_INDUCER_LUXR_AHL_F = 0.2; mw0d0d153b_b7e3_467a_b185_80eea4583ee6_AnB_TXTL_INDUCER_LUXR_AHL_R = 0.05;
  mw55fba0be_43c5_42e5_ab2d_97dd6debd38a_AnB: mwe7299c8b_c978_499c_b659_a7cf679423bf_AnB + mw41d4d6ad_adcc_4998_9736_211a8e68d45b_AnB -> mw821f961f_3e9f_45d8_beb3_fa53c31cf200_AnB; mw55fba0be_43c5_42e5_ab2d_97dd6debd38a_AnB_TXTL_UTR_UTR1_F*mwe7299c8b_c978_499c_b659_a7cf679423bf_AnB*mw41d4d6ad_adcc_4998_9736_211a8e68d45b_AnB - mw55fba0be_43c5_42e5_ab2d_97dd6debd38a_AnB_TXTL_UTR_UTR1_R*mw821f961f_3e9f_45d8_beb3_fa53c31cf200_AnB;
    mw55fba0be_43c5_42e5_ab2d_97dd6debd38a_AnB_TXTL_UTR_UTR1_F = 0.2; mw55fba0be_43c5_42e5_ab2d_97dd6debd38a_AnB_TXTL_UTR_UTR1_R = 4;
  mw14698dcf_34d1_4717_922e_ef1e2e55f63d_AnB: mw7f5e74ca_cee2_4996_b0ba_f02a03354e44_AnB + mwe26f1cb1_86e9_4e5e_9114_02970551aeb9_AnB -> mw9b510f28_acd6_4394_bf9a_56c412aeaeea_AnB; mw14698dcf_34d1_4717_922e_ef1e2e55f63d_AnB_TXTL_PLAC_RNAPbound_F*mw7f5e74ca_cee2_4996_b0ba_f02a03354e44_AnB*mwe26f1cb1_86e9_4e5e_9114_02970551aeb9_AnB - mw14698dcf_34d1_4717_922e_ef1e2e55f63d_AnB_TXTL_PLAC_RNAPbound_R*mw9b510f28_acd6_4394_bf9a_56c412aeaeea_AnB;
    mw14698dcf_34d1_4717_922e_ef1e2e55f63d_AnB_TXTL_PLAC_RNAPbound_F = 20; mw14698dcf_34d1_4717_922e_ef1e2e55f63d_AnB_TXTL_PLAC_RNAPbound_R = 400;
  mwb16189fa_0e86_4560_bac3_98ffb04c7acd_AnB: mwbb071b24_8a84_4473_8060_5972bd8b23d7_AnB => mw9b510f28_acd6_4394_bf9a_56c412aeaeea_AnB; mwb16189fa_0e86_4560_bac3_98ffb04c7acd_AnB_TXTL_NTP_consumption*mwbb071b24_8a84_4473_8060_5972bd8b23d7_AnB;
    mwb16189fa_0e86_4560_bac3_98ffb04c7acd_AnB_TXTL_NTP_consumption = 0.7485294;
  mwec6f170f_0f4a_4444_8369_216dcff3d54e_AnB: mw9757e80e_20c7_45a6_a253_04a843cc9d6c_AnB => mwe26f1cb1_86e9_4e5e_9114_02970551aeb9_AnB + mw7f5e74ca_cee2_4996_b0ba_f02a03354e44_AnB; mwec6f170f_0f4a_4444_8369_216dcff3d54e_AnB_TXTL_RNAPBOUND_TERMINATION_RATE*mw9757e80e_20c7_45a6_a253_04a843cc9d6c_AnB;
    mwec6f170f_0f4a_4444_8369_216dcff3d54e_AnB_TXTL_RNAPBOUND_TERMINATION_RATE = 0.05;
  mw5312adff_bb3b_4376_a269_08ff1b09eb25_AnB: mw9b510f28_acd6_4394_bf9a_56c412aeaeea_AnB + mwbef4c2a1_39b3_45b9_9560_96f951c1a1bb_AnB -> mwdd88c8b3_1ace_4ffb_9665_bacb309abaf4_AnB; mw5312adff_bb3b_4376_a269_08ff1b09eb25_AnB_TXTL_NTP_RNAP_F*mw9b510f28_acd6_4394_bf9a_56c412aeaeea_AnB*mwbef4c2a1_39b3_45b9_9560_96f951c1a1bb_AnB - mw5312adff_bb3b_4376_a269_08ff1b09eb25_AnB_TXTL_NTP_RNAP_R*mwdd88c8b3_1ace_4ffb_9665_bacb309abaf4_AnB;
    mw5312adff_bb3b_4376_a269_08ff1b09eb25_AnB_TXTL_NTP_RNAP_F = 1000; mw5312adff_bb3b_4376_a269_08ff1b09eb25_AnB_TXTL_NTP_RNAP_R = 120000000;
  mw0b7bd1e6_a21e_4601_b0a1_4629bd0e76dc_AnB: mw9b510f28_acd6_4394_bf9a_56c412aeaeea_AnB + mw14a57bf4_e194_425f_a352_17261719166f_AnB -> mw8273af67_e7e7_49b6_88e8_5317e18838c8_AnB; mw0b7bd1e6_a21e_4601_b0a1_4629bd0e76dc_AnB_TXTL_NTP_RNAP_F*mw9b510f28_acd6_4394_bf9a_56c412aeaeea_AnB*mw14a57bf4_e194_425f_a352_17261719166f_AnB - mw0b7bd1e6_a21e_4601_b0a1_4629bd0e76dc_AnB_TXTL_NTP_RNAP_R*mw8273af67_e7e7_49b6_88e8_5317e18838c8_AnB;
    mw0b7bd1e6_a21e_4601_b0a1_4629bd0e76dc_AnB_TXTL_NTP_RNAP_F = 1000; mw0b7bd1e6_a21e_4601_b0a1_4629bd0e76dc_AnB_TXTL_NTP_RNAP_R = 120000000;
  mwcac406bf_4992_442d_92bb_f1e2061959f8_AnB: mwdd88c8b3_1ace_4ffb_9665_bacb309abaf4_AnB + mw14a57bf4_e194_425f_a352_17261719166f_AnB -> mwbb071b24_8a84_4473_8060_5972bd8b23d7_AnB; mwcac406bf_4992_442d_92bb_f1e2061959f8_AnB_TXTL_NTP_RNAP_F*mwdd88c8b3_1ace_4ffb_9665_bacb309abaf4_AnB*mw14a57bf4_e194_425f_a352_17261719166f_AnB - mwcac406bf_4992_442d_92bb_f1e2061959f8_AnB_TXTL_NTP_RNAP_R*mwbb071b24_8a84_4473_8060_5972bd8b23d7_AnB;
    mwcac406bf_4992_442d_92bb_f1e2061959f8_AnB_TXTL_NTP_RNAP_F = 1; mwcac406bf_4992_442d_92bb_f1e2061959f8_AnB_TXTL_NTP_RNAP_R = 120000;
  mwab4fa077_df82_4f78_a686_3dedfc333359_AnB: mw8273af67_e7e7_49b6_88e8_5317e18838c8_AnB + mwbef4c2a1_39b3_45b9_9560_96f951c1a1bb_AnB -> mwbb071b24_8a84_4473_8060_5972bd8b23d7_AnB; mwab4fa077_df82_4f78_a686_3dedfc333359_AnB_TXTL_NTP_RNAP_F*mw8273af67_e7e7_49b6_88e8_5317e18838c8_AnB*mwbef4c2a1_39b3_45b9_9560_96f951c1a1bb_AnB - mwab4fa077_df82_4f78_a686_3dedfc333359_AnB_TXTL_NTP_RNAP_R*mwbb071b24_8a84_4473_8060_5972bd8b23d7_AnB;
    mwab4fa077_df82_4f78_a686_3dedfc333359_AnB_TXTL_NTP_RNAP_F = 1; mwab4fa077_df82_4f78_a686_3dedfc333359_AnB_TXTL_NTP_RNAP_R = 120000;
  mw3034a7d8_3207_440d_862c_6b70de395052_AnB: mwbb071b24_8a84_4473_8060_5972bd8b23d7_AnB => mw9757e80e_20c7_45a6_a253_04a843cc9d6c_AnB + mwe7299c8b_c978_499c_b659_a7cf679423bf_AnB; mw3034a7d8_3207_440d_862c_6b70de395052_AnB_TXTL_transcription_rate1*mwbb071b24_8a84_4473_8060_5972bd8b23d7_AnB;
    mw3034a7d8_3207_440d_862c_6b70de395052_AnB_TXTL_transcription_rate1 = 0.001470588;
  mw9b76a44b_b0be_4e46_80a4_02ad1d2f950b_AnB: mw821f961f_3e9f_45d8_beb3_fa53c31cf200_AnB + mwfa85abf9_cffb_4957_9678_1c8b4dafd02b_AnB -> mwdb8c4048_92db_46d6_b90f_42dedc72532e_AnB; mw9b76a44b_b0be_4e46_80a4_02ad1d2f950b_AnB_TL_AA_F*mw821f961f_3e9f_45d8_beb3_fa53c31cf200_AnB*mwfa85abf9_cffb_4957_9678_1c8b4dafd02b_AnB - mw9b76a44b_b0be_4e46_80a4_02ad1d2f950b_AnB_TL_AA_R*mwdb8c4048_92db_46d6_b90f_42dedc72532e_AnB;
    mw9b76a44b_b0be_4e46_80a4_02ad1d2f950b_AnB_TL_AA_F = 300; mw9b76a44b_b0be_4e46_80a4_02ad1d2f950b_AnB_TL_AA_R = 0.1;
  mw60b10e7a_dd03_4e76_b895_5149614517c0_AnB: mwdb8c4048_92db_46d6_b90f_42dedc72532e_AnB + 2 mwbef4c2a1_39b3_45b9_9560_96f951c1a1bb_AnB -> mwf3aa8744_d349_4acd_b6a3_a126d39f0b78_AnB; mw60b10e7a_dd03_4e76_b895_5149614517c0_AnB_TL_AGTP_F*mwdb8c4048_92db_46d6_b90f_42dedc72532e_AnB*mwbef4c2a1_39b3_45b9_9560_96f951c1a1bb_AnB^2 - mw60b10e7a_dd03_4e76_b895_5149614517c0_AnB_TL_AGTP_R*mwf3aa8744_d349_4acd_b6a3_a126d39f0b78_AnB;
    mw60b10e7a_dd03_4e76_b895_5149614517c0_AnB_TL_AGTP_F = 30; mw60b10e7a_dd03_4e76_b895_5149614517c0_AnB_TL_AGTP_R = 10;
  mwc09ad3cf_d262_467b_8e9f_f3abef195791_AnB: mwf3aa8744_d349_4acd_b6a3_a126d39f0b78_AnB => mw4db62297_5f1a_4cd2_b49a_612c4ec9b288_AnB; mwc09ad3cf_d262_467b_8e9f_f3abef195791_AnB_TXTL_TL_AA_consumption*mwf3aa8744_d349_4acd_b6a3_a126d39f0b78_AnB;
    mwc09ad3cf_d262_467b_8e9f_f3abef195791_AnB_TXTL_TL_AA_consumption = 0.024;
  mwcd8ea72e_e796_46cc_bf6b_950bfea95cc3_AnB: mwf3aa8744_d349_4acd_b6a3_a126d39f0b78_AnB => mw4db62297_5f1a_4cd2_b49a_612c4ec9b288_AnB + mw7da19d87_d0e3_49ef_9f7f_ee08ddb4a65b_AnB; mwcd8ea72e_e796_46cc_bf6b_950bfea95cc3_AnB_TXTL_TL_rate*mwf3aa8744_d349_4acd_b6a3_a126d39f0b78_AnB;
    mwcd8ea72e_e796_46cc_bf6b_950bfea95cc3_AnB_TXTL_TL_rate = 0.012;
  mw60797f6a_92b8_41e3_864b_800bd095c7b4_AnB: mw4db62297_5f1a_4cd2_b49a_612c4ec9b288_AnB => mwe7299c8b_c978_499c_b659_a7cf679423bf_AnB + mw41d4d6ad_adcc_4998_9736_211a8e68d45b_AnB; mw60797f6a_92b8_41e3_864b_800bd095c7b4_AnB_TXTL_RIBOBOUND_TERMINATION_RATE*mw4db62297_5f1a_4cd2_b49a_612c4ec9b288_AnB;
    mw60797f6a_92b8_41e3_864b_800bd095c7b4_AnB_TXTL_RIBOBOUND_TERMINATION_RATE = 50;
  mw43cf6639_544f_4f41_bf79_f3e7cf6bd2d6_AnB: mwe7299c8b_c978_499c_b659_a7cf679423bf_AnB + mwe269f848_a93f_4ee4_946a_ed61e5a48c84_AnB -> mw4b013c16_fbca_4bb2_89ce_2237fa9fe2fe_AnB; mw43cf6639_544f_4f41_bf79_f3e7cf6bd2d6_AnB_TXTL_RNAdeg_F*mwe7299c8b_c978_499c_b659_a7cf679423bf_AnB*mwe269f848_a93f_4ee4_946a_ed61e5a48c84_AnB - mw43cf6639_544f_4f41_bf79_f3e7cf6bd2d6_AnB_TXTL_RNAdeg_R*mw4b013c16_fbca_4bb2_89ce_2237fa9fe2fe_AnB;
    mw43cf6639_544f_4f41_bf79_f3e7cf6bd2d6_AnB_TXTL_RNAdeg_F = 10; mw43cf6639_544f_4f41_bf79_f3e7cf6bd2d6_AnB_TXTL_RNAdeg_R = 2000;
  mwb7287d21_af16_4e96_800b_476547d58bef_AnB: mw4b013c16_fbca_4bb2_89ce_2237fa9fe2fe_AnB => mwe269f848_a93f_4ee4_946a_ed61e5a48c84_AnB; mwb7287d21_af16_4e96_800b_476547d58bef_AnB_TXTL_RNAdeg_F*mw4b013c16_fbca_4bb2_89ce_2237fa9fe2fe_AnB;
    mwb7287d21_af16_4e96_800b_476547d58bef_AnB_TXTL_RNAdeg_F = 0.002777778;
  mw56492254_051b_4cfe_be2f_8d37b7624ca5_AnB: mw821f961f_3e9f_45d8_beb3_fa53c31cf200_AnB + mwe269f848_a93f_4ee4_946a_ed61e5a48c84_AnB -> mw30e3a809_45c5_47da_86da_07d1826f7092_AnB; mw56492254_051b_4cfe_be2f_8d37b7624ca5_AnB_TXTL_RNAdeg_F*mw821f961f_3e9f_45d8_beb3_fa53c31cf200_AnB*mwe269f848_a93f_4ee4_946a_ed61e5a48c84_AnB - mw56492254_051b_4cfe_be2f_8d37b7624ca5_AnB_TXTL_RNAdeg_R*mw30e3a809_45c5_47da_86da_07d1826f7092_AnB;
    mw56492254_051b_4cfe_be2f_8d37b7624ca5_AnB_TXTL_RNAdeg_F = 10; mw56492254_051b_4cfe_be2f_8d37b7624ca5_AnB_TXTL_RNAdeg_R = 2000;
  mw20366d43_ae97_4a31_b858_87b9638a0fd5_AnB: mw30e3a809_45c5_47da_86da_07d1826f7092_AnB => mwe269f848_a93f_4ee4_946a_ed61e5a48c84_AnB + mw41d4d6ad_adcc_4998_9736_211a8e68d45b_AnB; mw20366d43_ae97_4a31_b858_87b9638a0fd5_AnB_TXTL_RNAdeg_F*mw30e3a809_45c5_47da_86da_07d1826f7092_AnB;
    mw20366d43_ae97_4a31_b858_87b9638a0fd5_AnB_TXTL_RNAdeg_F = 0.002777778;
  mw559e678e_a499_49e1_9cf5_e470eea51590_AnB: mwf3aa8744_d349_4acd_b6a3_a126d39f0b78_AnB + mwe269f848_a93f_4ee4_946a_ed61e5a48c84_AnB -> mw9d4996bf_1fd0_402a_85e1_1ec6341b1bf8_AnB; mw559e678e_a499_49e1_9cf5_e470eea51590_AnB_TXTL_RNAdeg_F*mwf3aa8744_d349_4acd_b6a3_a126d39f0b78_AnB*mwe269f848_a93f_4ee4_946a_ed61e5a48c84_AnB - mw559e678e_a499_49e1_9cf5_e470eea51590_AnB_TXTL_RNAdeg_R*mw9d4996bf_1fd0_402a_85e1_1ec6341b1bf8_AnB;
    mw559e678e_a499_49e1_9cf5_e470eea51590_AnB_TXTL_RNAdeg_F = 10; mw559e678e_a499_49e1_9cf5_e470eea51590_AnB_TXTL_RNAdeg_R = 2000;
  mw807969c4_e5be_46e3_8a99_d0fb92bcc69f_AnB: mw9d4996bf_1fd0_402a_85e1_1ec6341b1bf8_AnB => mwe269f848_a93f_4ee4_946a_ed61e5a48c84_AnB + mwfa85abf9_cffb_4957_9678_1c8b4dafd02b_AnB + 2 mwbef4c2a1_39b3_45b9_9560_96f951c1a1bb_AnB + mw41d4d6ad_adcc_4998_9736_211a8e68d45b_AnB; mw807969c4_e5be_46e3_8a99_d0fb92bcc69f_AnB_TXTL_RNAdeg_F*mw9d4996bf_1fd0_402a_85e1_1ec6341b1bf8_AnB;
    mw807969c4_e5be_46e3_8a99_d0fb92bcc69f_AnB_TXTL_RNAdeg_F = 0.002777778;
  mw36e529f2_17f9_42ff_825a_f3bc62afef01_AnB: mw4db62297_5f1a_4cd2_b49a_612c4ec9b288_AnB + mwe269f848_a93f_4ee4_946a_ed61e5a48c84_AnB -> mw4065c8cd_35ea_436c_9c19_09cf62b005f2_AnB; mw36e529f2_17f9_42ff_825a_f3bc62afef01_AnB_TXTL_RNAdeg_F*mw4db62297_5f1a_4cd2_b49a_612c4ec9b288_AnB*mwe269f848_a93f_4ee4_946a_ed61e5a48c84_AnB - mw36e529f2_17f9_42ff_825a_f3bc62afef01_AnB_TXTL_RNAdeg_R*mw4065c8cd_35ea_436c_9c19_09cf62b005f2_AnB;
    mw36e529f2_17f9_42ff_825a_f3bc62afef01_AnB_TXTL_RNAdeg_F = 10; mw36e529f2_17f9_42ff_825a_f3bc62afef01_AnB_TXTL_RNAdeg_R = 2000;
  mw2b48dca0_695a_4d53_887d_04219007785b_AnB: mw4065c8cd_35ea_436c_9c19_09cf62b005f2_AnB => mwe269f848_a93f_4ee4_946a_ed61e5a48c84_AnB + mw41d4d6ad_adcc_4998_9736_211a8e68d45b_AnB; mw2b48dca0_695a_4d53_887d_04219007785b_AnB_TXTL_RNAdeg_F*mw4065c8cd_35ea_436c_9c19_09cf62b005f2_AnB;
    mw2b48dca0_695a_4d53_887d_04219007785b_AnB_TXTL_RNAdeg_F = 0.002777778;
  mw24ad6f3f_ff5c_4c7f_886a_0185cb346ea0_AnB: mwdb8c4048_92db_46d6_b90f_42dedc72532e_AnB + mwe269f848_a93f_4ee4_946a_ed61e5a48c84_AnB -> mw0abe9448_6e05_4a9a_b1d3_56ab851b2eb7_AnB; mw24ad6f3f_ff5c_4c7f_886a_0185cb346ea0_AnB_TXTL_RNAdeg_F*mwdb8c4048_92db_46d6_b90f_42dedc72532e_AnB*mwe269f848_a93f_4ee4_946a_ed61e5a48c84_AnB - mw24ad6f3f_ff5c_4c7f_886a_0185cb346ea0_AnB_TXTL_RNAdeg_R*mw0abe9448_6e05_4a9a_b1d3_56ab851b2eb7_AnB;
    mw24ad6f3f_ff5c_4c7f_886a_0185cb346ea0_AnB_TXTL_RNAdeg_F = 10; mw24ad6f3f_ff5c_4c7f_886a_0185cb346ea0_AnB_TXTL_RNAdeg_R = 2000;
  mw7f52084e_7995_4327_8607_da521df46fb1_AnB: mw0abe9448_6e05_4a9a_b1d3_56ab851b2eb7_AnB => mwe269f848_a93f_4ee4_946a_ed61e5a48c84_AnB + mwfa85abf9_cffb_4957_9678_1c8b4dafd02b_AnB + mw41d4d6ad_adcc_4998_9736_211a8e68d45b_AnB; mw7f52084e_7995_4327_8607_da521df46fb1_AnB_TXTL_RNAdeg_F*mw0abe9448_6e05_4a9a_b1d3_56ab851b2eb7_AnB;
    mw7f52084e_7995_4327_8607_da521df46fb1_AnB_TXTL_RNAdeg_F = 0.002777778;
  mwb37f8939_ec31_439a_bdac_6a0252b64ce0_AnB: mw7a9edb37_bb57_4176_9eca_4757d50b96ff_AnB + inputA_1_connected_with_OC6HSL -> mw51f6b144_881b_4e9b_a2c5_386db0664590_AnB; mwb37f8939_ec31_439a_bdac_6a0252b64ce0_AnB_TXTL_INDUCER_LUXR_AHL_F*mw7a9edb37_bb57_4176_9eca_4757d50b96ff_AnB*inputA_1_connected_with_OC6HSL - mwb37f8939_ec31_439a_bdac_6a0252b64ce0_AnB_TXTL_INDUCER_LUXR_AHL_R*mw51f6b144_881b_4e9b_a2c5_386db0664590_AnB;
    mwb37f8939_ec31_439a_bdac_6a0252b64ce0_AnB_TXTL_INDUCER_LUXR_AHL_F = 0.002; mwb37f8939_ec31_439a_bdac_6a0252b64ce0_AnB_TXTL_INDUCER_LUXR_AHL_R = 0.001;
  mw98ff735b_4641_42c8_be24_6a43512b58cf_AnB: mwd2a45846_560b_4fbe_8a44_9101f1712765_AnB + mw41d4d6ad_adcc_4998_9736_211a8e68d45b_AnB -> mw3357fe24_7969_4a9a_9203_7c48c8260e4e_AnB; mw98ff735b_4641_42c8_be24_6a43512b58cf_AnB_TXTL_UTR_UTR1_F*mwd2a45846_560b_4fbe_8a44_9101f1712765_AnB*mw41d4d6ad_adcc_4998_9736_211a8e68d45b_AnB - mw98ff735b_4641_42c8_be24_6a43512b58cf_AnB_TXTL_UTR_UTR1_R*mw3357fe24_7969_4a9a_9203_7c48c8260e4e_AnB;
    mw98ff735b_4641_42c8_be24_6a43512b58cf_AnB_TXTL_UTR_UTR1_F = 0.2; mw98ff735b_4641_42c8_be24_6a43512b58cf_AnB_TXTL_UTR_UTR1_R = 4;
  mwa5bef4bf_0187_406c_9e90_00fcec6e8639_AnB: mw91be3320_3991_452b_8af2_257c30d8742b_AnB + mwe26f1cb1_86e9_4e5e_9114_02970551aeb9_AnB -> mwa7ee4873_d2be_47b6_a496_0b07019fe526_AnB; mwa5bef4bf_0187_406c_9e90_00fcec6e8639_AnB_TXTL_PLAC_RNAPbound_F*mw91be3320_3991_452b_8af2_257c30d8742b_AnB*mwe26f1cb1_86e9_4e5e_9114_02970551aeb9_AnB - mwa5bef4bf_0187_406c_9e90_00fcec6e8639_AnB_TXTL_PLAC_RNAPbound_R*mwa7ee4873_d2be_47b6_a496_0b07019fe526_AnB;
    mwa5bef4bf_0187_406c_9e90_00fcec6e8639_AnB_TXTL_PLAC_RNAPbound_F = 20; mwa5bef4bf_0187_406c_9e90_00fcec6e8639_AnB_TXTL_PLAC_RNAPbound_R = 400;
  mw47d7d02b_e928_4397_849e_385894fd35dd_AnB: mw3ee67edf_053f_4ba0_a5de_653ae744a91b_AnB => mwa7ee4873_d2be_47b6_a496_0b07019fe526_AnB; mw47d7d02b_e928_4397_849e_385894fd35dd_AnB_TXTL_NTP_consumption*mw3ee67edf_053f_4ba0_a5de_653ae744a91b_AnB;
    mw47d7d02b_e928_4397_849e_385894fd35dd_AnB_TXTL_NTP_consumption = 0.7487705;
  mwe3a1eb23_7c3d_4777_b7ce_a379379e6966_AnB: mw9ce5c506_f78b_4996_af0a_4367b22a4d17_AnB => mwe26f1cb1_86e9_4e5e_9114_02970551aeb9_AnB + mw91be3320_3991_452b_8af2_257c30d8742b_AnB; mwe3a1eb23_7c3d_4777_b7ce_a379379e6966_AnB_TXTL_RNAPBOUND_TERMINATION_RATE*mw9ce5c506_f78b_4996_af0a_4367b22a4d17_AnB;
    mwe3a1eb23_7c3d_4777_b7ce_a379379e6966_AnB_TXTL_RNAPBOUND_TERMINATION_RATE = 0.05;
  mw24cbc313_828e_4a3d_adc4_6c0c8dd13730_AnB: mwa7ee4873_d2be_47b6_a496_0b07019fe526_AnB + mwbef4c2a1_39b3_45b9_9560_96f951c1a1bb_AnB -> mw54ea6262_72a2_4a0f_bab3_6cb88c47b087_AnB; mw24cbc313_828e_4a3d_adc4_6c0c8dd13730_AnB_TXTL_NTP_RNAP_F*mwa7ee4873_d2be_47b6_a496_0b07019fe526_AnB*mwbef4c2a1_39b3_45b9_9560_96f951c1a1bb_AnB - mw24cbc313_828e_4a3d_adc4_6c0c8dd13730_AnB_TXTL_NTP_RNAP_R*mw54ea6262_72a2_4a0f_bab3_6cb88c47b087_AnB;
    mw24cbc313_828e_4a3d_adc4_6c0c8dd13730_AnB_TXTL_NTP_RNAP_F = 1000; mw24cbc313_828e_4a3d_adc4_6c0c8dd13730_AnB_TXTL_NTP_RNAP_R = 120000000;
  mwb22e0762_3068_424b_96d9_0c7909428c6d_AnB: mwa7ee4873_d2be_47b6_a496_0b07019fe526_AnB + mw14a57bf4_e194_425f_a352_17261719166f_AnB -> mw75d3a80d_b086_4efc_b8fc_82db3f0138ea_AnB; mwb22e0762_3068_424b_96d9_0c7909428c6d_AnB_TXTL_NTP_RNAP_F*mwa7ee4873_d2be_47b6_a496_0b07019fe526_AnB*mw14a57bf4_e194_425f_a352_17261719166f_AnB - mwb22e0762_3068_424b_96d9_0c7909428c6d_AnB_TXTL_NTP_RNAP_R*mw75d3a80d_b086_4efc_b8fc_82db3f0138ea_AnB;
    mwb22e0762_3068_424b_96d9_0c7909428c6d_AnB_TXTL_NTP_RNAP_F = 1000; mwb22e0762_3068_424b_96d9_0c7909428c6d_AnB_TXTL_NTP_RNAP_R = 120000000;
  mwe694aaf2_1585_4c73_8332_e27fa099fb5b_AnB: mw54ea6262_72a2_4a0f_bab3_6cb88c47b087_AnB + mw14a57bf4_e194_425f_a352_17261719166f_AnB -> mw3ee67edf_053f_4ba0_a5de_653ae744a91b_AnB; mwe694aaf2_1585_4c73_8332_e27fa099fb5b_AnB_TXTL_NTP_RNAP_F*mw54ea6262_72a2_4a0f_bab3_6cb88c47b087_AnB*mw14a57bf4_e194_425f_a352_17261719166f_AnB - mwe694aaf2_1585_4c73_8332_e27fa099fb5b_AnB_TXTL_NTP_RNAP_R*mw3ee67edf_053f_4ba0_a5de_653ae744a91b_AnB;
    mwe694aaf2_1585_4c73_8332_e27fa099fb5b_AnB_TXTL_NTP_RNAP_F = 1; mwe694aaf2_1585_4c73_8332_e27fa099fb5b_AnB_TXTL_NTP_RNAP_R = 120000;
  mw799a175a_5eb1_45b8_9487_cfabcefa1b19_AnB: mw75d3a80d_b086_4efc_b8fc_82db3f0138ea_AnB + mwbef4c2a1_39b3_45b9_9560_96f951c1a1bb_AnB -> mw3ee67edf_053f_4ba0_a5de_653ae744a91b_AnB; mw799a175a_5eb1_45b8_9487_cfabcefa1b19_AnB_TXTL_NTP_RNAP_F*mw75d3a80d_b086_4efc_b8fc_82db3f0138ea_AnB*mwbef4c2a1_39b3_45b9_9560_96f951c1a1bb_AnB - mw799a175a_5eb1_45b8_9487_cfabcefa1b19_AnB_TXTL_NTP_RNAP_R*mw3ee67edf_053f_4ba0_a5de_653ae744a91b_AnB;
    mw799a175a_5eb1_45b8_9487_cfabcefa1b19_AnB_TXTL_NTP_RNAP_F = 1; mw799a175a_5eb1_45b8_9487_cfabcefa1b19_AnB_TXTL_NTP_RNAP_R = 120000;
  mw03e8846b_d654_4b81_a96c_9eea27956d4e_AnB: mw3ee67edf_053f_4ba0_a5de_653ae744a91b_AnB => mw9ce5c506_f78b_4996_af0a_4367b22a4d17_AnB + mwd2a45846_560b_4fbe_8a44_9101f1712765_AnB; mw03e8846b_d654_4b81_a96c_9eea27956d4e_AnB_TXTL_transcription_rate1*mw3ee67edf_053f_4ba0_a5de_653ae744a91b_AnB;
    mw03e8846b_d654_4b81_a96c_9eea27956d4e_AnB_TXTL_transcription_rate1 = 0.001229508;
  mw2a5d814e_093d_4bd5_9db5_eb9adc09f6b6_AnB: mw3357fe24_7969_4a9a_9203_7c48c8260e4e_AnB + mwfa85abf9_cffb_4957_9678_1c8b4dafd02b_AnB -> mw45a6eaf0_ef06_4e83_af52_20279748e975_AnB; mw2a5d814e_093d_4bd5_9db5_eb9adc09f6b6_AnB_TL_AA_F*mw3357fe24_7969_4a9a_9203_7c48c8260e4e_AnB*mwfa85abf9_cffb_4957_9678_1c8b4dafd02b_AnB - mw2a5d814e_093d_4bd5_9db5_eb9adc09f6b6_AnB_TL_AA_R*mw45a6eaf0_ef06_4e83_af52_20279748e975_AnB;
    mw2a5d814e_093d_4bd5_9db5_eb9adc09f6b6_AnB_TL_AA_F = 300; mw2a5d814e_093d_4bd5_9db5_eb9adc09f6b6_AnB_TL_AA_R = 0.1;
  mw98be0ec3_3baf_4cd1_86c1_520f5b6afca3_AnB: mw45a6eaf0_ef06_4e83_af52_20279748e975_AnB + 2 mwbef4c2a1_39b3_45b9_9560_96f951c1a1bb_AnB -> mwb87869ec_add0_408b_b524_b2a6e1406571_AnB; mw98be0ec3_3baf_4cd1_86c1_520f5b6afca3_AnB_TL_AGTP_F*mw45a6eaf0_ef06_4e83_af52_20279748e975_AnB*mwbef4c2a1_39b3_45b9_9560_96f951c1a1bb_AnB^2 - mw98be0ec3_3baf_4cd1_86c1_520f5b6afca3_AnB_TL_AGTP_R*mwb87869ec_add0_408b_b524_b2a6e1406571_AnB;
    mw98be0ec3_3baf_4cd1_86c1_520f5b6afca3_AnB_TL_AGTP_F = 30; mw98be0ec3_3baf_4cd1_86c1_520f5b6afca3_AnB_TL_AGTP_R = 10;
  mwc786aca1_f2de_44a6_bc54_dcf33ea0a002_AnB: mwb87869ec_add0_408b_b524_b2a6e1406571_AnB => mwa51f73ea_14f8_422d_a377_1d5d002ef22d_AnB; mwc786aca1_f2de_44a6_bc54_dcf33ea0a002_AnB_TXTL_TL_AA_consumption*mwb87869ec_add0_408b_b524_b2a6e1406571_AnB;
    mwc786aca1_f2de_44a6_bc54_dcf33ea0a002_AnB_TXTL_TL_AA_consumption = 0.03;
  mw8a959850_d46c_4795_9793_01c75e5b2cdf_AnB: mwb87869ec_add0_408b_b524_b2a6e1406571_AnB => mwa51f73ea_14f8_422d_a377_1d5d002ef22d_AnB + mw7a9edb37_bb57_4176_9eca_4757d50b96ff_AnB; mw8a959850_d46c_4795_9793_01c75e5b2cdf_AnB_TXTL_TL_rate*mwb87869ec_add0_408b_b524_b2a6e1406571_AnB;
    mw8a959850_d46c_4795_9793_01c75e5b2cdf_AnB_TXTL_TL_rate = 0.01;
  mw7f61b8fd_4f2e_4067_99b1_170c7cd9c397_AnB: mwa51f73ea_14f8_422d_a377_1d5d002ef22d_AnB => mwd2a45846_560b_4fbe_8a44_9101f1712765_AnB + mw41d4d6ad_adcc_4998_9736_211a8e68d45b_AnB; mw7f61b8fd_4f2e_4067_99b1_170c7cd9c397_AnB_TXTL_RIBOBOUND_TERMINATION_RATE*mwa51f73ea_14f8_422d_a377_1d5d002ef22d_AnB;
    mw7f61b8fd_4f2e_4067_99b1_170c7cd9c397_AnB_TXTL_RIBOBOUND_TERMINATION_RATE = 50;
  mwc3087944_c309_4fb0_8a25_1a22fcb09a37_AnB: mwd2a45846_560b_4fbe_8a44_9101f1712765_AnB + mwe269f848_a93f_4ee4_946a_ed61e5a48c84_AnB -> mw13d2d7ee_f7f2_4653_963c_b7dd514ec7d6_AnB; mwc3087944_c309_4fb0_8a25_1a22fcb09a37_AnB_TXTL_RNAdeg_F*mwd2a45846_560b_4fbe_8a44_9101f1712765_AnB*mwe269f848_a93f_4ee4_946a_ed61e5a48c84_AnB - mwc3087944_c309_4fb0_8a25_1a22fcb09a37_AnB_TXTL_RNAdeg_R*mw13d2d7ee_f7f2_4653_963c_b7dd514ec7d6_AnB;
    mwc3087944_c309_4fb0_8a25_1a22fcb09a37_AnB_TXTL_RNAdeg_F = 10; mwc3087944_c309_4fb0_8a25_1a22fcb09a37_AnB_TXTL_RNAdeg_R = 2000;
  mwb5757fa3_57a7_43bc_97f0_ce7ddd93686f_AnB: mw13d2d7ee_f7f2_4653_963c_b7dd514ec7d6_AnB => mwe269f848_a93f_4ee4_946a_ed61e5a48c84_AnB; mwb5757fa3_57a7_43bc_97f0_ce7ddd93686f_AnB_TXTL_RNAdeg_F*mw13d2d7ee_f7f2_4653_963c_b7dd514ec7d6_AnB;
    mwb5757fa3_57a7_43bc_97f0_ce7ddd93686f_AnB_TXTL_RNAdeg_F = 0.002777778;
  mw66fd7e14_4fab_480e_ada7_c4eef7f8d20e_AnB: mw3357fe24_7969_4a9a_9203_7c48c8260e4e_AnB + mwe269f848_a93f_4ee4_946a_ed61e5a48c84_AnB -> mw83fa3b1d_9aa1_498f_be05_3b8f7c042a96_AnB; mw66fd7e14_4fab_480e_ada7_c4eef7f8d20e_AnB_TXTL_RNAdeg_F*mw3357fe24_7969_4a9a_9203_7c48c8260e4e_AnB*mwe269f848_a93f_4ee4_946a_ed61e5a48c84_AnB - mw66fd7e14_4fab_480e_ada7_c4eef7f8d20e_AnB_TXTL_RNAdeg_R*mw83fa3b1d_9aa1_498f_be05_3b8f7c042a96_AnB;
    mw66fd7e14_4fab_480e_ada7_c4eef7f8d20e_AnB_TXTL_RNAdeg_F = 10; mw66fd7e14_4fab_480e_ada7_c4eef7f8d20e_AnB_TXTL_RNAdeg_R = 2000;
  mw7e3121da_0e74_4c33_b551_c1aee1721a68_AnB: mw83fa3b1d_9aa1_498f_be05_3b8f7c042a96_AnB => mwe269f848_a93f_4ee4_946a_ed61e5a48c84_AnB + mw41d4d6ad_adcc_4998_9736_211a8e68d45b_AnB; mw7e3121da_0e74_4c33_b551_c1aee1721a68_AnB_TXTL_RNAdeg_F*mw83fa3b1d_9aa1_498f_be05_3b8f7c042a96_AnB;
    mw7e3121da_0e74_4c33_b551_c1aee1721a68_AnB_TXTL_RNAdeg_F = 0.002777778;
  mweb44c306_4087_4dee_8155_57ed32c4fe88_AnB: mwb87869ec_add0_408b_b524_b2a6e1406571_AnB + mwe269f848_a93f_4ee4_946a_ed61e5a48c84_AnB -> mwdd1eb4aa_c5b9_4f9f_a3b5_7114f5f91833_AnB; mweb44c306_4087_4dee_8155_57ed32c4fe88_AnB_TXTL_RNAdeg_F*mwb87869ec_add0_408b_b524_b2a6e1406571_AnB*mwe269f848_a93f_4ee4_946a_ed61e5a48c84_AnB - mweb44c306_4087_4dee_8155_57ed32c4fe88_AnB_TXTL_RNAdeg_R*mwdd1eb4aa_c5b9_4f9f_a3b5_7114f5f91833_AnB;
    mweb44c306_4087_4dee_8155_57ed32c4fe88_AnB_TXTL_RNAdeg_F = 10; mweb44c306_4087_4dee_8155_57ed32c4fe88_AnB_TXTL_RNAdeg_R = 2000;
  mw5905a66a_1914_4a13_aa24_b7f87cf9456a_AnB: mwdd1eb4aa_c5b9_4f9f_a3b5_7114f5f91833_AnB => mwe269f848_a93f_4ee4_946a_ed61e5a48c84_AnB + mwfa85abf9_cffb_4957_9678_1c8b4dafd02b_AnB + 2 mwbef4c2a1_39b3_45b9_9560_96f951c1a1bb_AnB + mw41d4d6ad_adcc_4998_9736_211a8e68d45b_AnB; mw5905a66a_1914_4a13_aa24_b7f87cf9456a_AnB_TXTL_RNAdeg_F*mwdd1eb4aa_c5b9_4f9f_a3b5_7114f5f91833_AnB;
    mw5905a66a_1914_4a13_aa24_b7f87cf9456a_AnB_TXTL_RNAdeg_F = 0.002777778;
  mw9523057b_a009_4b04_954a_d41a60dc7d43_AnB: mwa51f73ea_14f8_422d_a377_1d5d002ef22d_AnB + mwe269f848_a93f_4ee4_946a_ed61e5a48c84_AnB -> mw64f8f5a6_a2af_4120_958c_96fca30c4991_AnB; mw9523057b_a009_4b04_954a_d41a60dc7d43_AnB_TXTL_RNAdeg_F*mwa51f73ea_14f8_422d_a377_1d5d002ef22d_AnB*mwe269f848_a93f_4ee4_946a_ed61e5a48c84_AnB - mw9523057b_a009_4b04_954a_d41a60dc7d43_AnB_TXTL_RNAdeg_R*mw64f8f5a6_a2af_4120_958c_96fca30c4991_AnB;
    mw9523057b_a009_4b04_954a_d41a60dc7d43_AnB_TXTL_RNAdeg_F = 10; mw9523057b_a009_4b04_954a_d41a60dc7d43_AnB_TXTL_RNAdeg_R = 2000;
  mwbfba0498_9475_4213_bf1d_7481e1df535e_AnB: mw64f8f5a6_a2af_4120_958c_96fca30c4991_AnB => mwe269f848_a93f_4ee4_946a_ed61e5a48c84_AnB + mw41d4d6ad_adcc_4998_9736_211a8e68d45b_AnB; mwbfba0498_9475_4213_bf1d_7481e1df535e_AnB_TXTL_RNAdeg_F*mw64f8f5a6_a2af_4120_958c_96fca30c4991_AnB;
    mwbfba0498_9475_4213_bf1d_7481e1df535e_AnB_TXTL_RNAdeg_F = 0.002777778;
  mw51e9225a_1963_495f_9d6c_0553995c86e3_AnB: mw45a6eaf0_ef06_4e83_af52_20279748e975_AnB + mwe269f848_a93f_4ee4_946a_ed61e5a48c84_AnB -> mw7fd816fa_5fb6_4482_a9db_b8ab9f62c489_AnB; mw51e9225a_1963_495f_9d6c_0553995c86e3_AnB_TXTL_RNAdeg_F*mw45a6eaf0_ef06_4e83_af52_20279748e975_AnB*mwe269f848_a93f_4ee4_946a_ed61e5a48c84_AnB - mw51e9225a_1963_495f_9d6c_0553995c86e3_AnB_TXTL_RNAdeg_R*mw7fd816fa_5fb6_4482_a9db_b8ab9f62c489_AnB;
    mw51e9225a_1963_495f_9d6c_0553995c86e3_AnB_TXTL_RNAdeg_F = 10; mw51e9225a_1963_495f_9d6c_0553995c86e3_AnB_TXTL_RNAdeg_R = 2000;
  mwa4819d78_0d49_473f_b29a_5f49eb7525cd_AnB: mw7fd816fa_5fb6_4482_a9db_b8ab9f62c489_AnB => mwe269f848_a93f_4ee4_946a_ed61e5a48c84_AnB + mwfa85abf9_cffb_4957_9678_1c8b4dafd02b_AnB + mw41d4d6ad_adcc_4998_9736_211a8e68d45b_AnB; mwa4819d78_0d49_473f_b29a_5f49eb7525cd_AnB_TXTL_RNAdeg_F*mw7fd816fa_5fb6_4482_a9db_b8ab9f62c489_AnB;
    mwa4819d78_0d49_473f_b29a_5f49eb7525cd_AnB_TXTL_RNAdeg_F = 0.002777778;
  mw8e3f98bf_90be_4076_a5a5_be8b66eb4b87_AnB: mwbef4c2a1_39b3_45b9_9560_96f951c1a1bb_AnB => mwe5d0239e_246f_4516_b131_a0069d2a429c_AnB; mwcdb2be4d_740e_4578_b3b9_e763438ca817_AnB*mwbef4c2a1_39b3_45b9_9560_96f951c1a1bb_AnB;

  // Events:
  event_325: at (time <= 5400): mwcdb2be4d_740e_4578_b3b9_e763438ca817_AnB = 0;
  event_326: at (time > 5400): mwcdb2be4d_740e_4578_b3b9_e763438ca817_AnB = 0.0002;

  // Unit definitions:
  unit volume = litre;
  unit substance = mole;
  unit area = metre^2;
  unit count = dimensionless;
  unit per_second = 1 / second;
end
