// SBML level 3 version 2

model mw7604a264_1d1b_4426_acc5_061d8d17b628_AnB()
  // mix_of_E30VNPRL_E30VNPRL_gene_expression
  // model units - substance: substance, time: second, volume: volume, area: area, length: metre, extent: substance

  // Compartments:
  compartment cell = 1 volume;

  // Species:
  species mwb0343236_d8ee_47a3_911c_d22c042081af_AnB in cell = 100.0001/cell; mwb0343236_d8ee_47a3_911c_d22c042081af_AnB is "RNAP";
  species mw6f001bb3_24e7_4c91_8082_bada566d4832_AnB in cell = 30.00002/cell; mw6f001bb3_24e7_4c91_8082_bada566d4832_AnB is "Ribo";
  species mwf32a3198_2ed5_41ac_98f0_3cd4dcd02e75_AnB in cell = 5.000003/cell; mwf32a3198_2ed5_41ac_98f0_3cd4dcd02e75_AnB is "RecBCD";
  species mw0ba92b06_a96b_4b93_801c_b589b9715ad4_AnB in cell = 100.0001/cell; mw0ba92b06_a96b_4b93_801c_b589b9715ad4_AnB is "RNase";
  species mwf647df8e_575b_47cf_a794_3b55a6d29079_AnB in cell = 3180048/cell; mwf647df8e_575b_47cf_a794_3b55a6d29079_AnB is "AGTP";
  species mwa1abaec4_a028_468a_83dd_9b06410bb615_AnB in cell = 1908029/cell; mwa1abaec4_a028_468a_83dd_9b06410bb615_AnB is "CUTP";
  species mwf5ed5ed1_b9a2_47a0_b2df_6763250cc3ad_AnB in cell = 3.180048e7/cell; mwf5ed5ed1_b9a2_47a0_b2df_6763250cc3ad_AnB is "AA";
  species mw49c21de4_0b59_4f47_8af1_82355423dcf0_AnB in cell = 0; mw49c21de4_0b59_4f47_8af1_82355423dcf0_AnB is "protein tetR";
  species mw4c59b806_0829_4faf_a31c_1adefc23c608_AnB in cell = 0; mw4c59b806_0829_4faf_a31c_1adefc23c608_AnB is "aTc";
  species mw696a0244_c288_4a57_906a_efc8dffb5fcb_AnB in cell = 0; mw696a0244_c288_4a57_906a_efc8dffb5fcb_AnB is "protein tetRdimer";
  species mwef1c66a1_7386_4d4e_b5cb_3c9c89e3f6cb_AnB in cell = 0; mwef1c66a1_7386_4d4e_b5cb_3c9c89e3f6cb_AnB is "RNA utr1--tetR";
  species mw54bdb506_9b7c_49ae_95a1_3bd35036e693_AnB in cell = 0; mw54bdb506_9b7c_49ae_95a1_3bd35036e693_AnB is "Ribo:RNA utr1--tetR";
  species mw5e98d576_2983_452a_a8ff_bbb5a4bac325_AnB in cell = 5.000003/cell; mw5e98d576_2983_452a_a8ff_bbb5a4bac325_AnB is "DNA psigX--utr1--tetR";
  species mwbbc0a90c_74dc_42c2_ae48_aa4f1010c329_AnB in cell = 0; mwbbc0a90c_74dc_42c2_ae48_aa4f1010c329_AnB is "RNAPSIGX";
  species mwa6c1c9f4_ac52_4119_8ff5_7347871ed857_AnB in cell = 0; mwa6c1c9f4_ac52_4119_8ff5_7347871ed857_AnB is "RNAPSIGX:DNA psigX--utr1--tetR";
  species mwe28c9001_17af_4edc_8b61_0cf700af125c_AnB in cell = 0; mwe28c9001_17af_4edc_8b61_0cf700af125c_AnB is "AA:2AGTP:Ribo:RNA utr1--tetR";
  species mwe807dcb4_42cb_4f60_b448_036fe65bc13d_AnB in cell = 0; mwe807dcb4_42cb_4f60_b448_036fe65bc13d_AnB is "term_Ribo:RNA utr1--tetR";
  species mw3dabd164_87ea_4f0d_b56b_035a047766d1_AnB in cell = 0; mw3dabd164_87ea_4f0d_b56b_035a047766d1_AnB is "protein deGFP";
  species mwa34af442_496e_44f6_8bea_a57f283df25b_AnB in cell = 0; mwa34af442_496e_44f6_8bea_a57f283df25b_AnB is "protein deGFP*";
  species mwe3156279_9eea_43b6_a446_259d020cea0d_AnB in cell = 0; mwe3156279_9eea_43b6_a446_259d020cea0d_AnB is "RNA utr1--deGFP";
  species mwa6ef4fa8_a9ad_4b35_88aa_1b6d4fcfb612_AnB in cell = 0; mwa6ef4fa8_a9ad_4b35_88aa_1b6d4fcfb612_AnB is "Ribo:RNA utr1--deGFP";
  species mwa506c1f8_04f3_401a_8180_9658d026891f_AnB in cell = 5.000003/cell; mwa506c1f8_04f3_401a_8180_9658d026891f_AnB is "DNA p28_ptet--utr1--deGFP";
  species mwd6d6d9b4_86de_46ea_aca6_e3586590afd0_AnB in cell = 0; mwd6d6d9b4_86de_46ea_aca6_e3586590afd0_AnB is "RNAP28";
  species mw79fd3fd6_4163_405d_b9a9_af23d6b094e6_AnB in cell = 0; mw79fd3fd6_4163_405d_b9a9_af23d6b094e6_AnB is "RNAP28:DNA p28_ptet--utr1--deGFP";
  species mwae7438d6_bdde_41b3_b31a_dd19d0d3e747_AnB in cell = 0; mwae7438d6_bdde_41b3_b31a_dd19d0d3e747_AnB is "protein sigma28";
  species mw4e5dbe2b_2560_4e52_a1b2_d05188ec403d_AnB in cell = 0; mw4e5dbe2b_2560_4e52_a1b2_d05188ec403d_AnB is "CUTP:AGTP:RNAP28:DNA p28_ptet--utr1--deGFP";
  species mwb3f21652_5cc4_42da_846f_ff648baac3f3_AnB in cell = 0; mwb3f21652_5cc4_42da_846f_ff648baac3f3_AnB is "term_RNAP28:DNA p28_ptet--utr1--deGFP";
  species mw46cc4c92_3ee2_4712_8b1f_97044ea5c6e4_AnB in cell = 0; mw46cc4c92_3ee2_4712_8b1f_97044ea5c6e4_AnB is "RNAP28:DNA p28_ptet--utr1--deGFP:protein tetRdimer";
  species mw71b42a67_e162_4e10_b157_5bdd04885ac1_AnB in cell = 0; mw71b42a67_e162_4e10_b157_5bdd04885ac1_AnB is "CUTP:AGTP:RNAP28:DNA p28_ptet--utr1--deGFP:protein tetRdimer";
  species mw67add5c4_6af7_44a4_94a6_68ce8cedb6b2_AnB in cell = 0; mw67add5c4_6af7_44a4_94a6_68ce8cedb6b2_AnB is "term_RNAP28:DNA p28_ptet--utr1--deGFP:protein tetRdimer";
  species mwf27c2cef_fd98_45a9_a676_c4cfc3bfee9f_AnB in cell = 0; mwf27c2cef_fd98_45a9_a676_c4cfc3bfee9f_AnB is "AA:2AGTP:Ribo:RNA utr1--deGFP";
  species mw8fea26fd_a005_4d1a_8a94_9bc4f4509b9b_AnB in cell = 0; mw8fea26fd_a005_4d1a_8a94_9bc4f4509b9b_AnB is "term_Ribo:RNA utr1--deGFP";
  species mw1002e515_6ba8_481d_aaa9_89647b90f29f_AnB in cell = 0; mw1002e515_6ba8_481d_aaa9_89647b90f29f_AnB is "protein sigmaX";
  species mw0915efe7_1341_49ab_a8ef_0eb7fee30bc1_AnB in cell = 0; mw0915efe7_1341_49ab_a8ef_0eb7fee30bc1_AnB is "RNA utr1--sigmaX";
  species mw8905d669_d482_4967_9c6f_f69677ea0794_AnB in cell = 0; mw8905d669_d482_4967_9c6f_f69677ea0794_AnB is "Ribo:RNA utr1--sigmaX";
  species mw4d8333a7_ce38_45b7_a707_b13dff7fe0ee_AnB in cell = 5.000003/cell; mw4d8333a7_ce38_45b7_a707_b13dff7fe0ee_AnB is "DNA plac--utr1--sigmaX";
  species mwffb8d502_f884_4483_85e9_2071d6311ffe_AnB in cell = 0; mwffb8d502_f884_4483_85e9_2071d6311ffe_AnB is "RNAP:DNA plac--utr1--sigmaX";
  species mw01e10fb5_a2f0_4d9e_a7d4_6184b5c73c36_AnB in cell = 0; mw01e10fb5_a2f0_4d9e_a7d4_6184b5c73c36_AnB is "CUTP:AGTP:RNAP:DNA plac--utr1--sigmaX";
  species mw32bf80c0_91e6_4c1a_9e9a_76a2c9ab2862_AnB in cell = 0; mw32bf80c0_91e6_4c1a_9e9a_76a2c9ab2862_AnB is "term_RNAP:DNA plac--utr1--sigmaX";
  species mw03911c10_ff33_48bc_8941_67dd809dbfb1_AnB in cell = 0; mw03911c10_ff33_48bc_8941_67dd809dbfb1_AnB is "AA:2AGTP:Ribo:RNA utr1--sigmaX";
  species mw64f68b39_4419_4660_9c74_c83ce83b8b49_AnB in cell = 0; mw64f68b39_4419_4660_9c74_c83ce83b8b49_AnB is "term_Ribo:RNA utr1--sigmaX";
  species mw94981671_7083_4440_8e82_63ca06f9d455_AnB in cell = 0; mw94981671_7083_4440_8e82_63ca06f9d455_AnB is "RNA utr1--sigma28";
  species mw01a17d68_e849_4648_9303_7614457aa3ae_AnB in cell = 0; mw01a17d68_e849_4648_9303_7614457aa3ae_AnB is "Ribo:RNA utr1--sigma28";
  species mwc97b4dee_90db_42fb_bee2_0d78d764af26_AnB in cell = 5.000003/cell; mwc97b4dee_90db_42fb_bee2_0d78d764af26_AnB is "DNA plac--utr1--sigma28";
  species mwf72ff6eb_c3b5_4e87_82e0_f62c88a256a3_AnB in cell = 0; mwf72ff6eb_c3b5_4e87_82e0_f62c88a256a3_AnB is "RNAP:DNA plac--utr1--sigma28";
  species mw289f18db_bdf0_4329_a3bd_8c2cbb880e62_AnB in cell = 0; mw289f18db_bdf0_4329_a3bd_8c2cbb880e62_AnB is "CUTP:AGTP:RNAP:DNA plac--utr1--sigma28";
  species mwbf5884bf_d2f0_4af1_b95c_416abe1c97bb_AnB in cell = 0; mwbf5884bf_d2f0_4af1_b95c_416abe1c97bb_AnB is "term_RNAP:DNA plac--utr1--sigma28";
  species mw81108bd5_3dc6_4990_8ace_139d7e9bf2d7_AnB in cell = 0; mw81108bd5_3dc6_4990_8ace_139d7e9bf2d7_AnB is "AA:2AGTP:Ribo:RNA utr1--sigma28";
  species mwb5b249fa_3a1f_4ece_8b1e_5ce0f68b0e2a_AnB in cell = 0; mwb5b249fa_3a1f_4ece_8b1e_5ce0f68b0e2a_AnB is "term_Ribo:RNA utr1--sigma28";
  species mw53efbe4b_ae0f_47cf_805e_3f18156d1229_AnB in cell = 0; mw53efbe4b_ae0f_47cf_805e_3f18156d1229_AnB is "2 aTc:protein tetRdimer";
  species mwe673fe9e_0e05_4daf_b207_b189b2cc70b2_AnB in cell = 0; mwe673fe9e_0e05_4daf_b207_b189b2cc70b2_AnB is "CUTP:AGTP:RNAPSIGX:DNA psigX--utr1--tetR";
  species mwffdfeea9_51e5_4903_ae88_d9cdee0273f0_AnB in cell = 0; mwffdfeea9_51e5_4903_ae88_d9cdee0273f0_AnB is "term_RNAPSIGX:DNA psigX--utr1--tetR";
  species mwdf972817_4cee_424a_b843_e616734a728d_AnB in cell = 0; mwdf972817_4cee_424a_b843_e616734a728d_AnB is "AGTP:RNAPSIGX:DNA psigX--utr1--tetR";
  species mw10cb0763_5016_4dbe_ad45_b4300050538f_AnB in cell = 0; mw10cb0763_5016_4dbe_ad45_b4300050538f_AnB is "CUTP:RNAPSIGX:DNA psigX--utr1--tetR";
  species mw8a7149c1_031d_4c57_846a_494ec2fd52b7_AnB in cell = 0; mw8a7149c1_031d_4c57_846a_494ec2fd52b7_AnB is "AA:Ribo:RNA utr1--tetR";
  species mwe6f6c2db_6474_4e56_ba3b_b7b72536d986_AnB in cell = 0; mwe6f6c2db_6474_4e56_ba3b_b7b72536d986_AnB is "RNA utr1--tetR:RNase";
  species mwa53e01c7_b2ea_4d0e_8be1_5da5f0545026_AnB in cell = 0; mwa53e01c7_b2ea_4d0e_8be1_5da5f0545026_AnB is "Ribo:RNA utr1--tetR:RNase";
  species mw55530e0d_a990_408c_9f12_42b31bd54bf6_AnB in cell = 0; mw55530e0d_a990_408c_9f12_42b31bd54bf6_AnB is "AA:2AGTP:Ribo:RNA utr1--tetR:RNase";
  species mw7ae54144_44f9_4cf8_8405_54ddd0f26253_AnB in cell = 0; mw7ae54144_44f9_4cf8_8405_54ddd0f26253_AnB is "term_Ribo:RNA utr1--tetR:RNase";
  species mw8cad2fd0_f45e_4e7a_9063_9ff5aa9ff281_AnB in cell = 0; mw8cad2fd0_f45e_4e7a_9063_9ff5aa9ff281_AnB is "AA:Ribo:RNA utr1--tetR:RNase";
  species mw8f74b51c_3aaa_44e2_9fa7_628cdec6769e_AnB in cell = 0; mw8f74b51c_3aaa_44e2_9fa7_628cdec6769e_AnB is "DNA p28_ptet--utr1--deGFP:protein tetRdimer";
  species mw328100f5_a74c_40bc_a5be_48eae5f21d2e_AnB in cell = 0; mw328100f5_a74c_40bc_a5be_48eae5f21d2e_AnB is "AGTP:RNAP28:DNA p28_ptet--utr1--deGFP";
  species mwa9dcfcc7_c348_4f3b_9309_b52a28004b38_AnB in cell = 0; mwa9dcfcc7_c348_4f3b_9309_b52a28004b38_AnB is "CUTP:RNAP28:DNA p28_ptet--utr1--deGFP";
  species mw6df6ff4c_2088_46c1_9bdb_a459b5f3b562_AnB in cell = 0; mw6df6ff4c_2088_46c1_9bdb_a459b5f3b562_AnB is "AGTP:RNAP28:DNA p28_ptet--utr1--deGFP:protein tetRdimer";
  species mw3267f942_0277_4ba7_87f4_b8cce339cca8_AnB in cell = 0; mw3267f942_0277_4ba7_87f4_b8cce339cca8_AnB is "CUTP:RNAP28:DNA p28_ptet--utr1--deGFP:protein tetRdimer";
  species mwa486bc01_66c4_4756_9b85_cdbcf260be38_AnB in cell = 0; mwa486bc01_66c4_4756_9b85_cdbcf260be38_AnB is "AA:Ribo:RNA utr1--deGFP";
  species mweddfabff_f95e_47d3_a383_083f3b3732fc_AnB in cell = 0; mweddfabff_f95e_47d3_a383_083f3b3732fc_AnB is "RNA utr1--deGFP:RNase";
  species mw00efdfb2_142d_4f4f_87b8_fa0d5655b7bf_AnB in cell = 0; mw00efdfb2_142d_4f4f_87b8_fa0d5655b7bf_AnB is "Ribo:RNA utr1--deGFP:RNase";
  species mw85f2d6bd_2ccf_46d9_893e_9c4c8074a611_AnB in cell = 0; mw85f2d6bd_2ccf_46d9_893e_9c4c8074a611_AnB is "AA:2AGTP:Ribo:RNA utr1--deGFP:RNase";
  species mw3b1431cc_b80d_47bf_84bc_b70bb55cd38c_AnB in cell = 0; mw3b1431cc_b80d_47bf_84bc_b70bb55cd38c_AnB is "term_Ribo:RNA utr1--deGFP:RNase";
  species mwd7650a50_28e8_4b5e_bdf4_e13712258519_AnB in cell = 0; mwd7650a50_28e8_4b5e_bdf4_e13712258519_AnB is "AA:Ribo:RNA utr1--deGFP:RNase";
  species mwf0e02418_a1a1_4c34_ac37_b00c1d93e783_AnB in cell = 0; mwf0e02418_a1a1_4c34_ac37_b00c1d93e783_AnB is "AGTP:RNAP:DNA plac--utr1--sigmaX";
  species mw4cf760ff_4a6f_4101_9592_7fea1e24a539_AnB in cell = 0; mw4cf760ff_4a6f_4101_9592_7fea1e24a539_AnB is "CUTP:RNAP:DNA plac--utr1--sigmaX";
  species mw06d6ab53_bdfd_4580_9f4d_5d34dd8cec54_AnB in cell = 0; mw06d6ab53_bdfd_4580_9f4d_5d34dd8cec54_AnB is "AA:Ribo:RNA utr1--sigmaX";
  species mw9b6766dc_a71e_473a_bc70_66fb66cab180_AnB in cell = 0; mw9b6766dc_a71e_473a_bc70_66fb66cab180_AnB is "RNA utr1--sigmaX:RNase";
  species mw457838f0_4f38_475f_b39e_af87507949ca_AnB in cell = 0; mw457838f0_4f38_475f_b39e_af87507949ca_AnB is "Ribo:RNA utr1--sigmaX:RNase";
  species mw9207e17d_6f37_430a_9d7e_9b616b612e57_AnB in cell = 0; mw9207e17d_6f37_430a_9d7e_9b616b612e57_AnB is "AA:2AGTP:Ribo:RNA utr1--sigmaX:RNase";
  species mw67db745d_ed07_4716_bb41_0117c710e1a7_AnB in cell = 0; mw67db745d_ed07_4716_bb41_0117c710e1a7_AnB is "term_Ribo:RNA utr1--sigmaX:RNase";
  species mw367403bf_e154_43e2_a7f7_6fe0f70aa5b0_AnB in cell = 0; mw367403bf_e154_43e2_a7f7_6fe0f70aa5b0_AnB is "AA:Ribo:RNA utr1--sigmaX:RNase";
  species mwcc85e235_850f_49c4_993b_ed7a29834d65_AnB in cell = 0; mwcc85e235_850f_49c4_993b_ed7a29834d65_AnB is "AGTP:RNAP:DNA plac--utr1--sigma28";
  species mw00e1225c_9093_4a2f_800b_490b69f71a46_AnB in cell = 0; mw00e1225c_9093_4a2f_800b_490b69f71a46_AnB is "CUTP:RNAP:DNA plac--utr1--sigma28";
  species mw04d084c6_3e64_481b_82f2_8dbbd5f7f071_AnB in cell = 0; mw04d084c6_3e64_481b_82f2_8dbbd5f7f071_AnB is "AA:Ribo:RNA utr1--sigma28";
  species mw5d7f31c9_fcfa_43be_ad67_8fb65cd7fa37_AnB in cell = 0; mw5d7f31c9_fcfa_43be_ad67_8fb65cd7fa37_AnB is "RNA utr1--sigma28:RNase";
  species mw9dba7279_e0c9_48e6_ad52_a235ea58f439_AnB in cell = 0; mw9dba7279_e0c9_48e6_ad52_a235ea58f439_AnB is "Ribo:RNA utr1--sigma28:RNase";
  species mw7b9170d5_423b_4e8f_892e_4d196b1484b5_AnB in cell = 0; mw7b9170d5_423b_4e8f_892e_4d196b1484b5_AnB is "AA:2AGTP:Ribo:RNA utr1--sigma28:RNase";
  species mw77bd724a_07e9_485b_af15_1b91761e8481_AnB in cell = 0; mw77bd724a_07e9_485b_af15_1b91761e8481_AnB is "term_Ribo:RNA utr1--sigma28:RNase";
  species mw387556e3_bc1c_4873_8ad7_810e472e230b_AnB in cell = 0; mw387556e3_bc1c_4873_8ad7_810e472e230b_AnB is "AA:Ribo:RNA utr1--sigma28:RNase";
  species mw1c60740a_9b26_49db_a02d_f9e424215ab8_AnB in cell = 0; mw1c60740a_9b26_49db_a02d_f9e424215ab8_AnB is "AGTP_USED";

  // Parameters:
  mw7362d43e_23e2_4a10_b8fd_20940f881307_AnB = 0; mw7362d43e_23e2_4a10_b8fd_20940f881307_AnB is "AGTPdeg_F";

  // Reactions:
  mw88c56807_c06f_4b65_a8bf_343da5343507_AnB: mw696a0244_c288_4a57_906a_efc8dffb5fcb_AnB + 2 mw4c59b806_0829_4faf_a31c_1adefc23c608_AnB -> mw53efbe4b_ae0f_47cf_805e_3f18156d1229_AnB; TXTL_INDUCER_TETR_ATC_F*mw696a0244_c288_4a57_906a_efc8dffb5fcb_AnB*mw4c59b806_0829_4faf_a31c_1adefc23c608_AnB^2 - TXTL_INDUCER_TETR_ATC_R*mw53efbe4b_ae0f_47cf_805e_3f18156d1229_AnB;
    TXTL_INDUCER_TETR_ATC_F = 1e-5; TXTL_INDUCER_TETR_ATC_R = 0.1;
  mwfacda61a_1285_49ae_9c45_6e1368cb85a2_AnB: 2 mw49c21de4_0b59_4f47_8af1_82355423dcf0_AnB -> mw696a0244_c288_4a57_906a_efc8dffb5fcb_AnB; mwfacda61a_1285_49ae_9c45_6e1368cb85a2_AnB_kf*mw49c21de4_0b59_4f47_8af1_82355423dcf0_AnB^2 - mwfacda61a_1285_49ae_9c45_6e1368cb85a2_AnB_kr*mw696a0244_c288_4a57_906a_efc8dffb5fcb_AnB;
    mwfacda61a_1285_49ae_9c45_6e1368cb85a2_AnB_kf = 1; mwfacda61a_1285_49ae_9c45_6e1368cb85a2_AnB_kr = 1;
  mwee731618_f791_4212_8731_13447e95827f_AnB: mwef1c66a1_7386_4d4e_b5cb_3c9c89e3f6cb_AnB + mw6f001bb3_24e7_4c91_8082_bada566d4832_AnB -> mw54bdb506_9b7c_49ae_95a1_3bd35036e693_AnB; mwee731618_f791_4212_8731_13447e95827f_AnB_TXTL_UTR_UTR1_F*mwef1c66a1_7386_4d4e_b5cb_3c9c89e3f6cb_AnB*mw6f001bb3_24e7_4c91_8082_bada566d4832_AnB - mwee731618_f791_4212_8731_13447e95827f_AnB_TXTL_UTR_UTR1_R*mw54bdb506_9b7c_49ae_95a1_3bd35036e693_AnB;
    mwee731618_f791_4212_8731_13447e95827f_AnB_TXTL_UTR_UTR1_F = 0.2; mwee731618_f791_4212_8731_13447e95827f_AnB_TXTL_UTR_UTR1_R = 4;
  mwde8e693f_ca69_408b_9464_48d2ae0414ed_AnB: mw5e98d576_2983_452a_a8ff_bbb5a4bac325_AnB + mwbbc0a90c_74dc_42c2_ae48_aa4f1010c329_AnB -> mwa6c1c9f4_ac52_4119_8ff5_7347871ed857_AnB; TXTL_SIGX_RNAPbound_F*mw5e98d576_2983_452a_a8ff_bbb5a4bac325_AnB*mwbbc0a90c_74dc_42c2_ae48_aa4f1010c329_AnB - TXTL_SIGX_RNAPbound_R*mwa6c1c9f4_ac52_4119_8ff5_7347871ed857_AnB;
    TXTL_SIGX_RNAPbound_F = 10; TXTL_SIGX_RNAPbound_R = 0.1;
  mwfb72d504_c6f1_4936_8942_c25fcffe2f61_AnB: mwe673fe9e_0e05_4daf_b207_b189b2cc70b2_AnB => mwa6c1c9f4_ac52_4119_8ff5_7347871ed857_AnB; mwfb72d504_c6f1_4936_8942_c25fcffe2f61_AnB_TXTL_NTP_consumption*mwe673fe9e_0e05_4daf_b207_b189b2cc70b2_AnB;
    mwfb72d504_c6f1_4936_8942_c25fcffe2f61_AnB_TXTL_NTP_consumption = 0.7487705;
  mw76514dfd_80b7_4b7a_965c_45ad6ac3f114_AnB: mwffdfeea9_51e5_4903_ae88_d9cdee0273f0_AnB => mwbbc0a90c_74dc_42c2_ae48_aa4f1010c329_AnB + mw5e98d576_2983_452a_a8ff_bbb5a4bac325_AnB; mw76514dfd_80b7_4b7a_965c_45ad6ac3f114_AnB_TXTL_RNAPBOUND_TERMINATION_RATE*mwffdfeea9_51e5_4903_ae88_d9cdee0273f0_AnB;
    mw76514dfd_80b7_4b7a_965c_45ad6ac3f114_AnB_TXTL_RNAPBOUND_TERMINATION_RATE = 0.05;
  mw9783e8ff_82f4_4782_a728_57a42d04d01d_AnB: mwa6c1c9f4_ac52_4119_8ff5_7347871ed857_AnB + mwf647df8e_575b_47cf_a794_3b55a6d29079_AnB -> mwdf972817_4cee_424a_b843_e616734a728d_AnB; mw9783e8ff_82f4_4782_a728_57a42d04d01d_AnB_TXTL_NTP_RNAP_F*mwa6c1c9f4_ac52_4119_8ff5_7347871ed857_AnB*mwf647df8e_575b_47cf_a794_3b55a6d29079_AnB - mw9783e8ff_82f4_4782_a728_57a42d04d01d_AnB_TXTL_NTP_RNAP_R*mwdf972817_4cee_424a_b843_e616734a728d_AnB;
    mw9783e8ff_82f4_4782_a728_57a42d04d01d_AnB_TXTL_NTP_RNAP_F = 1000; mw9783e8ff_82f4_4782_a728_57a42d04d01d_AnB_TXTL_NTP_RNAP_R = 120000000;
  mw734bba5b_6087_4d68_8927_4ccccc766f6d_AnB: mwa6c1c9f4_ac52_4119_8ff5_7347871ed857_AnB + mwa1abaec4_a028_468a_83dd_9b06410bb615_AnB -> mw10cb0763_5016_4dbe_ad45_b4300050538f_AnB; mw734bba5b_6087_4d68_8927_4ccccc766f6d_AnB_TXTL_NTP_RNAP_F*mwa6c1c9f4_ac52_4119_8ff5_7347871ed857_AnB*mwa1abaec4_a028_468a_83dd_9b06410bb615_AnB - mw734bba5b_6087_4d68_8927_4ccccc766f6d_AnB_TXTL_NTP_RNAP_R*mw10cb0763_5016_4dbe_ad45_b4300050538f_AnB;
    mw734bba5b_6087_4d68_8927_4ccccc766f6d_AnB_TXTL_NTP_RNAP_F = 1000; mw734bba5b_6087_4d68_8927_4ccccc766f6d_AnB_TXTL_NTP_RNAP_R = 120000000;
  mwd377e11f_f4b1_4593_bec8_9516b617a6b1_AnB: mwdf972817_4cee_424a_b843_e616734a728d_AnB + mwa1abaec4_a028_468a_83dd_9b06410bb615_AnB -> mwe673fe9e_0e05_4daf_b207_b189b2cc70b2_AnB; mwd377e11f_f4b1_4593_bec8_9516b617a6b1_AnB_TXTL_NTP_RNAP_F*mwdf972817_4cee_424a_b843_e616734a728d_AnB*mwa1abaec4_a028_468a_83dd_9b06410bb615_AnB - mwd377e11f_f4b1_4593_bec8_9516b617a6b1_AnB_TXTL_NTP_RNAP_R*mwe673fe9e_0e05_4daf_b207_b189b2cc70b2_AnB;
    mwd377e11f_f4b1_4593_bec8_9516b617a6b1_AnB_TXTL_NTP_RNAP_F = 1; mwd377e11f_f4b1_4593_bec8_9516b617a6b1_AnB_TXTL_NTP_RNAP_R = 120000;
  mw78b887ee_c386_4f9a_bfd3_098310e564ba_AnB: mw10cb0763_5016_4dbe_ad45_b4300050538f_AnB + mwf647df8e_575b_47cf_a794_3b55a6d29079_AnB -> mwe673fe9e_0e05_4daf_b207_b189b2cc70b2_AnB; mw78b887ee_c386_4f9a_bfd3_098310e564ba_AnB_TXTL_NTP_RNAP_F*mw10cb0763_5016_4dbe_ad45_b4300050538f_AnB*mwf647df8e_575b_47cf_a794_3b55a6d29079_AnB - mw78b887ee_c386_4f9a_bfd3_098310e564ba_AnB_TXTL_NTP_RNAP_R*mwe673fe9e_0e05_4daf_b207_b189b2cc70b2_AnB;
    mw78b887ee_c386_4f9a_bfd3_098310e564ba_AnB_TXTL_NTP_RNAP_F = 1; mw78b887ee_c386_4f9a_bfd3_098310e564ba_AnB_TXTL_NTP_RNAP_R = 120000;
  mw27288e5a_3141_44f6_b756_c7b327aaed5f_AnB: mwe673fe9e_0e05_4daf_b207_b189b2cc70b2_AnB => mwffdfeea9_51e5_4903_ae88_d9cdee0273f0_AnB + mwef1c66a1_7386_4d4e_b5cb_3c9c89e3f6cb_AnB; mw27288e5a_3141_44f6_b756_c7b327aaed5f_AnB_TXTL_transcription_rate1*mwe673fe9e_0e05_4daf_b207_b189b2cc70b2_AnB;
    mw27288e5a_3141_44f6_b756_c7b327aaed5f_AnB_TXTL_transcription_rate1 = 0.001229508;
  mw726139dd_b1ec_4139_94ec_a05503933918_AnB: mw54bdb506_9b7c_49ae_95a1_3bd35036e693_AnB + mwf5ed5ed1_b9a2_47a0_b2df_6763250cc3ad_AnB -> mw8a7149c1_031d_4c57_846a_494ec2fd52b7_AnB; mw726139dd_b1ec_4139_94ec_a05503933918_AnB_TL_AA_F*mw54bdb506_9b7c_49ae_95a1_3bd35036e693_AnB*mwf5ed5ed1_b9a2_47a0_b2df_6763250cc3ad_AnB - mw726139dd_b1ec_4139_94ec_a05503933918_AnB_TL_AA_R*mw8a7149c1_031d_4c57_846a_494ec2fd52b7_AnB;
    mw726139dd_b1ec_4139_94ec_a05503933918_AnB_TL_AA_F = 300; mw726139dd_b1ec_4139_94ec_a05503933918_AnB_TL_AA_R = 0.1;
  mwb17df42a_5953_4500_9cda_b772dff14577_AnB: mw8a7149c1_031d_4c57_846a_494ec2fd52b7_AnB + 2 mwf647df8e_575b_47cf_a794_3b55a6d29079_AnB -> mwe28c9001_17af_4edc_8b61_0cf700af125c_AnB; mwb17df42a_5953_4500_9cda_b772dff14577_AnB_TL_AGTP_F*mw8a7149c1_031d_4c57_846a_494ec2fd52b7_AnB*mwf647df8e_575b_47cf_a794_3b55a6d29079_AnB^2 - mwb17df42a_5953_4500_9cda_b772dff14577_AnB_TL_AGTP_R*mwe28c9001_17af_4edc_8b61_0cf700af125c_AnB;
    mwb17df42a_5953_4500_9cda_b772dff14577_AnB_TL_AGTP_F = 30; mwb17df42a_5953_4500_9cda_b772dff14577_AnB_TL_AGTP_R = 10;
  mwe3ee1819_9b7e_43d1_96bf_22614e26532e_AnB: mwe28c9001_17af_4edc_8b61_0cf700af125c_AnB => mwe807dcb4_42cb_4f60_b448_036fe65bc13d_AnB; mwe3ee1819_9b7e_43d1_96bf_22614e26532e_AnB_TXTL_TL_AA_consumption*mwe28c9001_17af_4edc_8b61_0cf700af125c_AnB;
    mwe3ee1819_9b7e_43d1_96bf_22614e26532e_AnB_TXTL_TL_AA_consumption = 0.03;
  mwf9c0e8cf_e4b9_4b23_bbb6_d71ff415d5fb_AnB: mwe28c9001_17af_4edc_8b61_0cf700af125c_AnB => mwe807dcb4_42cb_4f60_b448_036fe65bc13d_AnB + mw49c21de4_0b59_4f47_8af1_82355423dcf0_AnB; mwf9c0e8cf_e4b9_4b23_bbb6_d71ff415d5fb_AnB_TXTL_TL_rate*mwe28c9001_17af_4edc_8b61_0cf700af125c_AnB;
    mwf9c0e8cf_e4b9_4b23_bbb6_d71ff415d5fb_AnB_TXTL_TL_rate = 0.01;
  mw4fbc0633_af38_484e_b690_580e3b39eb8b_AnB: mwe807dcb4_42cb_4f60_b448_036fe65bc13d_AnB => mwef1c66a1_7386_4d4e_b5cb_3c9c89e3f6cb_AnB + mw6f001bb3_24e7_4c91_8082_bada566d4832_AnB; mw4fbc0633_af38_484e_b690_580e3b39eb8b_AnB_TXTL_RIBOBOUND_TERMINATION_RATE*mwe807dcb4_42cb_4f60_b448_036fe65bc13d_AnB;
    mw4fbc0633_af38_484e_b690_580e3b39eb8b_AnB_TXTL_RIBOBOUND_TERMINATION_RATE = 50;
  mw078c7996_4149_45bb_bf76_8395bb5d07cc_AnB: mwef1c66a1_7386_4d4e_b5cb_3c9c89e3f6cb_AnB + mw0ba92b06_a96b_4b93_801c_b589b9715ad4_AnB -> mwe6f6c2db_6474_4e56_ba3b_b7b72536d986_AnB; mw078c7996_4149_45bb_bf76_8395bb5d07cc_AnB_TXTL_RNAdeg_F*mwef1c66a1_7386_4d4e_b5cb_3c9c89e3f6cb_AnB*mw0ba92b06_a96b_4b93_801c_b589b9715ad4_AnB - mw078c7996_4149_45bb_bf76_8395bb5d07cc_AnB_TXTL_RNAdeg_R*mwe6f6c2db_6474_4e56_ba3b_b7b72536d986_AnB;
    mw078c7996_4149_45bb_bf76_8395bb5d07cc_AnB_TXTL_RNAdeg_F = 10; mw078c7996_4149_45bb_bf76_8395bb5d07cc_AnB_TXTL_RNAdeg_R = 2000;
  mwd138cb47_961d_4f16_b79e_7dda33d2518e_AnB: mwe6f6c2db_6474_4e56_ba3b_b7b72536d986_AnB => mw0ba92b06_a96b_4b93_801c_b589b9715ad4_AnB; mwd138cb47_961d_4f16_b79e_7dda33d2518e_AnB_TXTL_RNAdeg_F*mwe6f6c2db_6474_4e56_ba3b_b7b72536d986_AnB;
    mwd138cb47_961d_4f16_b79e_7dda33d2518e_AnB_TXTL_RNAdeg_F = 0.002777778;
  mw3eec23a3_276b_418d_8175_2d71bce18551_AnB: mw54bdb506_9b7c_49ae_95a1_3bd35036e693_AnB + mw0ba92b06_a96b_4b93_801c_b589b9715ad4_AnB -> mwa53e01c7_b2ea_4d0e_8be1_5da5f0545026_AnB; mw3eec23a3_276b_418d_8175_2d71bce18551_AnB_TXTL_RNAdeg_F*mw54bdb506_9b7c_49ae_95a1_3bd35036e693_AnB*mw0ba92b06_a96b_4b93_801c_b589b9715ad4_AnB - mw3eec23a3_276b_418d_8175_2d71bce18551_AnB_TXTL_RNAdeg_R*mwa53e01c7_b2ea_4d0e_8be1_5da5f0545026_AnB;
    mw3eec23a3_276b_418d_8175_2d71bce18551_AnB_TXTL_RNAdeg_F = 10; mw3eec23a3_276b_418d_8175_2d71bce18551_AnB_TXTL_RNAdeg_R = 2000;
  mw8c659664_36d9_469e_bd6b_bfeac4e5da0d_AnB: mwa53e01c7_b2ea_4d0e_8be1_5da5f0545026_AnB => mw0ba92b06_a96b_4b93_801c_b589b9715ad4_AnB + mw6f001bb3_24e7_4c91_8082_bada566d4832_AnB; mw8c659664_36d9_469e_bd6b_bfeac4e5da0d_AnB_TXTL_RNAdeg_F*mwa53e01c7_b2ea_4d0e_8be1_5da5f0545026_AnB;
    mw8c659664_36d9_469e_bd6b_bfeac4e5da0d_AnB_TXTL_RNAdeg_F = 0.002777778;
  mw221b72e7_e68b_42cc_b6ee_17ab38f2bb20_AnB: mwe28c9001_17af_4edc_8b61_0cf700af125c_AnB + mw0ba92b06_a96b_4b93_801c_b589b9715ad4_AnB -> mw55530e0d_a990_408c_9f12_42b31bd54bf6_AnB; mw221b72e7_e68b_42cc_b6ee_17ab38f2bb20_AnB_TXTL_RNAdeg_F*mwe28c9001_17af_4edc_8b61_0cf700af125c_AnB*mw0ba92b06_a96b_4b93_801c_b589b9715ad4_AnB - mw221b72e7_e68b_42cc_b6ee_17ab38f2bb20_AnB_TXTL_RNAdeg_R*mw55530e0d_a990_408c_9f12_42b31bd54bf6_AnB;
    mw221b72e7_e68b_42cc_b6ee_17ab38f2bb20_AnB_TXTL_RNAdeg_F = 10; mw221b72e7_e68b_42cc_b6ee_17ab38f2bb20_AnB_TXTL_RNAdeg_R = 2000;
  mwe808960a_8973_4964_b83a_e7f9cf5db65c_AnB: mw55530e0d_a990_408c_9f12_42b31bd54bf6_AnB => mw0ba92b06_a96b_4b93_801c_b589b9715ad4_AnB + mwf5ed5ed1_b9a2_47a0_b2df_6763250cc3ad_AnB + 2 mwf647df8e_575b_47cf_a794_3b55a6d29079_AnB + mw6f001bb3_24e7_4c91_8082_bada566d4832_AnB; mwe808960a_8973_4964_b83a_e7f9cf5db65c_AnB_TXTL_RNAdeg_F*mw55530e0d_a990_408c_9f12_42b31bd54bf6_AnB;
    mwe808960a_8973_4964_b83a_e7f9cf5db65c_AnB_TXTL_RNAdeg_F = 0.002777778;
  mw98eeb5f1_fdf4_44dd_a7c1_14f421299028_AnB: mwe807dcb4_42cb_4f60_b448_036fe65bc13d_AnB + mw0ba92b06_a96b_4b93_801c_b589b9715ad4_AnB -> mw7ae54144_44f9_4cf8_8405_54ddd0f26253_AnB; mw98eeb5f1_fdf4_44dd_a7c1_14f421299028_AnB_TXTL_RNAdeg_F*mwe807dcb4_42cb_4f60_b448_036fe65bc13d_AnB*mw0ba92b06_a96b_4b93_801c_b589b9715ad4_AnB - mw98eeb5f1_fdf4_44dd_a7c1_14f421299028_AnB_TXTL_RNAdeg_R*mw7ae54144_44f9_4cf8_8405_54ddd0f26253_AnB;
    mw98eeb5f1_fdf4_44dd_a7c1_14f421299028_AnB_TXTL_RNAdeg_F = 10; mw98eeb5f1_fdf4_44dd_a7c1_14f421299028_AnB_TXTL_RNAdeg_R = 2000;
  mw6a87e7a5_5cd8_4e38_b559_21da09d1caca_AnB: mw7ae54144_44f9_4cf8_8405_54ddd0f26253_AnB => mw0ba92b06_a96b_4b93_801c_b589b9715ad4_AnB + mw6f001bb3_24e7_4c91_8082_bada566d4832_AnB; mw6a87e7a5_5cd8_4e38_b559_21da09d1caca_AnB_TXTL_RNAdeg_F*mw7ae54144_44f9_4cf8_8405_54ddd0f26253_AnB;
    mw6a87e7a5_5cd8_4e38_b559_21da09d1caca_AnB_TXTL_RNAdeg_F = 0.002777778;
  mw8bdb74fb_8736_4c9f_9c29_04b29e8c566c_AnB: mw8a7149c1_031d_4c57_846a_494ec2fd52b7_AnB + mw0ba92b06_a96b_4b93_801c_b589b9715ad4_AnB -> mw8cad2fd0_f45e_4e7a_9063_9ff5aa9ff281_AnB; mw8bdb74fb_8736_4c9f_9c29_04b29e8c566c_AnB_TXTL_RNAdeg_F*mw8a7149c1_031d_4c57_846a_494ec2fd52b7_AnB*mw0ba92b06_a96b_4b93_801c_b589b9715ad4_AnB - mw8bdb74fb_8736_4c9f_9c29_04b29e8c566c_AnB_TXTL_RNAdeg_R*mw8cad2fd0_f45e_4e7a_9063_9ff5aa9ff281_AnB;
    mw8bdb74fb_8736_4c9f_9c29_04b29e8c566c_AnB_TXTL_RNAdeg_F = 10; mw8bdb74fb_8736_4c9f_9c29_04b29e8c566c_AnB_TXTL_RNAdeg_R = 2000;
  mw03768405_e03e_4d0e_9330_f9973efffb03_AnB: mw8cad2fd0_f45e_4e7a_9063_9ff5aa9ff281_AnB => mw0ba92b06_a96b_4b93_801c_b589b9715ad4_AnB + mwf5ed5ed1_b9a2_47a0_b2df_6763250cc3ad_AnB + mw6f001bb3_24e7_4c91_8082_bada566d4832_AnB; mw03768405_e03e_4d0e_9330_f9973efffb03_AnB_TXTL_RNAdeg_F*mw8cad2fd0_f45e_4e7a_9063_9ff5aa9ff281_AnB;
    mw03768405_e03e_4d0e_9330_f9973efffb03_AnB_TXTL_RNAdeg_F = 0.002777778;
  mw837eeb48_792d_43a2_87b6_5908d9b56425_AnB: mw3dabd164_87ea_4f0d_b56b_035a047766d1_AnB => mwa34af442_496e_44f6_8bea_a57f283df25b_AnB; TXTL_PROT_deGFP_MATURATION*mw3dabd164_87ea_4f0d_b56b_035a047766d1_AnB;
    TXTL_PROT_deGFP_MATURATION = 0.002310491;
  mwedb5259e_96b3_4adf_ab44_688da0a7d965_AnB: mwe3156279_9eea_43b6_a446_259d020cea0d_AnB + mw6f001bb3_24e7_4c91_8082_bada566d4832_AnB -> mwa6ef4fa8_a9ad_4b35_88aa_1b6d4fcfb612_AnB; mwedb5259e_96b3_4adf_ab44_688da0a7d965_AnB_TXTL_UTR_UTR1_F*mwe3156279_9eea_43b6_a446_259d020cea0d_AnB*mw6f001bb3_24e7_4c91_8082_bada566d4832_AnB - mwedb5259e_96b3_4adf_ab44_688da0a7d965_AnB_TXTL_UTR_UTR1_R*mwa6ef4fa8_a9ad_4b35_88aa_1b6d4fcfb612_AnB;
    mwedb5259e_96b3_4adf_ab44_688da0a7d965_AnB_TXTL_UTR_UTR1_F = 0.2; mwedb5259e_96b3_4adf_ab44_688da0a7d965_AnB_TXTL_UTR_UTR1_R = 4;
  mwe2e439f7_87d3_424a_b42c_f99a006e932f_AnB: mwa506c1f8_04f3_401a_8180_9658d026891f_AnB + mwd6d6d9b4_86de_46ea_aca6_e3586590afd0_AnB -> mw79fd3fd6_4163_405d_b9a9_af23d6b094e6_AnB; TXTL_PTET_RNAPbound_F*mwa506c1f8_04f3_401a_8180_9658d026891f_AnB*mwd6d6d9b4_86de_46ea_aca6_e3586590afd0_AnB - TXTL_PTET_RNAPbound_R*mw79fd3fd6_4163_405d_b9a9_af23d6b094e6_AnB;
    TXTL_PTET_RNAPbound_F = 0.006; TXTL_PTET_RNAPbound_R = 5;
  mw0b954b3e_c792_4145_a17d_8b756d9a520e_AnB: mwa506c1f8_04f3_401a_8180_9658d026891f_AnB + mw696a0244_c288_4a57_906a_efc8dffb5fcb_AnB -> mw8f74b51c_3aaa_44e2_9fa7_628cdec6769e_AnB; mw0b954b3e_c792_4145_a17d_8b756d9a520e_AnB_kf*mwa506c1f8_04f3_401a_8180_9658d026891f_AnB*mw696a0244_c288_4a57_906a_efc8dffb5fcb_AnB - mw0b954b3e_c792_4145_a17d_8b756d9a520e_AnB_kr*mw8f74b51c_3aaa_44e2_9fa7_628cdec6769e_AnB;
    mw0b954b3e_c792_4145_a17d_8b756d9a520e_AnB_kf = 0.00286; mw0b954b3e_c792_4145_a17d_8b756d9a520e_AnB_kr = 1.1e-5;
  mw2166c6a0_4def_48cb_9731_82df7ef513fe_AnB: mw79fd3fd6_4163_405d_b9a9_af23d6b094e6_AnB + mw696a0244_c288_4a57_906a_efc8dffb5fcb_AnB -> mw46cc4c92_3ee2_4712_8b1f_97044ea5c6e4_AnB; mw2166c6a0_4def_48cb_9731_82df7ef513fe_AnB_kf*mw79fd3fd6_4163_405d_b9a9_af23d6b094e6_AnB*mw696a0244_c288_4a57_906a_efc8dffb5fcb_AnB - mw2166c6a0_4def_48cb_9731_82df7ef513fe_AnB_kr*mw46cc4c92_3ee2_4712_8b1f_97044ea5c6e4_AnB;
    mw2166c6a0_4def_48cb_9731_82df7ef513fe_AnB_kf = 0.00286; mw2166c6a0_4def_48cb_9731_82df7ef513fe_AnB_kr = 1.1e-5;
  mw8bbe5ef8_5fc3_46ad_b215_eb9a5edadce2_AnB: mw8f74b51c_3aaa_44e2_9fa7_628cdec6769e_AnB + mwd6d6d9b4_86de_46ea_aca6_e3586590afd0_AnB -> mw46cc4c92_3ee2_4712_8b1f_97044ea5c6e4_AnB; mw8bbe5ef8_5fc3_46ad_b215_eb9a5edadce2_AnB_kf*mw8f74b51c_3aaa_44e2_9fa7_628cdec6769e_AnB*mwd6d6d9b4_86de_46ea_aca6_e3586590afd0_AnB - mw8bbe5ef8_5fc3_46ad_b215_eb9a5edadce2_AnB_kr*mw46cc4c92_3ee2_4712_8b1f_97044ea5c6e4_AnB;
    mw8bbe5ef8_5fc3_46ad_b215_eb9a5edadce2_AnB_kf = 0.006; mw8bbe5ef8_5fc3_46ad_b215_eb9a5edadce2_AnB_kr = 5000;
  mw07c925fd_2ded_4900_882a_59d015f3c763_AnB: mw4e5dbe2b_2560_4e52_a1b2_d05188ec403d_AnB => mw79fd3fd6_4163_405d_b9a9_af23d6b094e6_AnB; mw07c925fd_2ded_4900_882a_59d015f3c763_AnB_TXTL_NTP_consumption*mw4e5dbe2b_2560_4e52_a1b2_d05188ec403d_AnB;
    mw07c925fd_2ded_4900_882a_59d015f3c763_AnB_TXTL_NTP_consumption = 0.7485294;
  mwde95eb25_6a78_49c8_ac24_3f1035528351_AnB: mwb3f21652_5cc4_42da_846f_ff648baac3f3_AnB => mwd6d6d9b4_86de_46ea_aca6_e3586590afd0_AnB + mwa506c1f8_04f3_401a_8180_9658d026891f_AnB; mwde95eb25_6a78_49c8_ac24_3f1035528351_AnB_TXTL_RNAPBOUND_TERMINATION_RATE*mwb3f21652_5cc4_42da_846f_ff648baac3f3_AnB;
    mwde95eb25_6a78_49c8_ac24_3f1035528351_AnB_TXTL_RNAPBOUND_TERMINATION_RATE = 0.05;
  mw49603939_ee2e_47ec_b55e_9a4e40f336ff_AnB: mw79fd3fd6_4163_405d_b9a9_af23d6b094e6_AnB + mwf647df8e_575b_47cf_a794_3b55a6d29079_AnB -> mw328100f5_a74c_40bc_a5be_48eae5f21d2e_AnB; mw49603939_ee2e_47ec_b55e_9a4e40f336ff_AnB_TXTL_NTP_RNAP_F*mw79fd3fd6_4163_405d_b9a9_af23d6b094e6_AnB*mwf647df8e_575b_47cf_a794_3b55a6d29079_AnB - mw49603939_ee2e_47ec_b55e_9a4e40f336ff_AnB_TXTL_NTP_RNAP_R*mw328100f5_a74c_40bc_a5be_48eae5f21d2e_AnB;
    mw49603939_ee2e_47ec_b55e_9a4e40f336ff_AnB_TXTL_NTP_RNAP_F = 1000; mw49603939_ee2e_47ec_b55e_9a4e40f336ff_AnB_TXTL_NTP_RNAP_R = 120000000;
  mwc3227d08_fd23_4740_8ab2_03fc49d9ddab_AnB: mw79fd3fd6_4163_405d_b9a9_af23d6b094e6_AnB + mwa1abaec4_a028_468a_83dd_9b06410bb615_AnB -> mwa9dcfcc7_c348_4f3b_9309_b52a28004b38_AnB; mwc3227d08_fd23_4740_8ab2_03fc49d9ddab_AnB_TXTL_NTP_RNAP_F*mw79fd3fd6_4163_405d_b9a9_af23d6b094e6_AnB*mwa1abaec4_a028_468a_83dd_9b06410bb615_AnB - mwc3227d08_fd23_4740_8ab2_03fc49d9ddab_AnB_TXTL_NTP_RNAP_R*mwa9dcfcc7_c348_4f3b_9309_b52a28004b38_AnB;
    mwc3227d08_fd23_4740_8ab2_03fc49d9ddab_AnB_TXTL_NTP_RNAP_F = 1000; mwc3227d08_fd23_4740_8ab2_03fc49d9ddab_AnB_TXTL_NTP_RNAP_R = 120000000;
  mw69530b72_84c8_4796_b95d_dd0eb4cce7c0_AnB: mw328100f5_a74c_40bc_a5be_48eae5f21d2e_AnB + mwa1abaec4_a028_468a_83dd_9b06410bb615_AnB -> mw4e5dbe2b_2560_4e52_a1b2_d05188ec403d_AnB; mw69530b72_84c8_4796_b95d_dd0eb4cce7c0_AnB_TXTL_NTP_RNAP_F*mw328100f5_a74c_40bc_a5be_48eae5f21d2e_AnB*mwa1abaec4_a028_468a_83dd_9b06410bb615_AnB - mw69530b72_84c8_4796_b95d_dd0eb4cce7c0_AnB_TXTL_NTP_RNAP_R*mw4e5dbe2b_2560_4e52_a1b2_d05188ec403d_AnB;
    mw69530b72_84c8_4796_b95d_dd0eb4cce7c0_AnB_TXTL_NTP_RNAP_F = 1; mw69530b72_84c8_4796_b95d_dd0eb4cce7c0_AnB_TXTL_NTP_RNAP_R = 120000;
  mwb9bb2073_6991_4348_b194_11e7f951543c_AnB: mwa9dcfcc7_c348_4f3b_9309_b52a28004b38_AnB + mwf647df8e_575b_47cf_a794_3b55a6d29079_AnB -> mw4e5dbe2b_2560_4e52_a1b2_d05188ec403d_AnB; mwb9bb2073_6991_4348_b194_11e7f951543c_AnB_TXTL_NTP_RNAP_F*mwa9dcfcc7_c348_4f3b_9309_b52a28004b38_AnB*mwf647df8e_575b_47cf_a794_3b55a6d29079_AnB - mwb9bb2073_6991_4348_b194_11e7f951543c_AnB_TXTL_NTP_RNAP_R*mw4e5dbe2b_2560_4e52_a1b2_d05188ec403d_AnB;
    mwb9bb2073_6991_4348_b194_11e7f951543c_AnB_TXTL_NTP_RNAP_F = 1; mwb9bb2073_6991_4348_b194_11e7f951543c_AnB_TXTL_NTP_RNAP_R = 120000;
  mwbbbb90ee_9bd5_4192_b580_6b0637899692_AnB: mw4e5dbe2b_2560_4e52_a1b2_d05188ec403d_AnB => mwb3f21652_5cc4_42da_846f_ff648baac3f3_AnB + mwe3156279_9eea_43b6_a446_259d020cea0d_AnB; mwbbbb90ee_9bd5_4192_b580_6b0637899692_AnB_TXTL_transcription_rate1*mw4e5dbe2b_2560_4e52_a1b2_d05188ec403d_AnB;
    mwbbbb90ee_9bd5_4192_b580_6b0637899692_AnB_TXTL_transcription_rate1 = 0.001470588;
  mw18edc829_6b5a_49e0_a782_db3b61a9b01b_AnB: mw71b42a67_e162_4e10_b157_5bdd04885ac1_AnB => mw46cc4c92_3ee2_4712_8b1f_97044ea5c6e4_AnB; mw18edc829_6b5a_49e0_a782_db3b61a9b01b_AnB_TXTL_NTP_consumption*mw71b42a67_e162_4e10_b157_5bdd04885ac1_AnB;
    mw18edc829_6b5a_49e0_a782_db3b61a9b01b_AnB_TXTL_NTP_consumption = 0.7485294;
  mw825000e8_8ecd_4296_a430_ade3430cbcdb_AnB: mw67add5c4_6af7_44a4_94a6_68ce8cedb6b2_AnB => mwd6d6d9b4_86de_46ea_aca6_e3586590afd0_AnB + mwa506c1f8_04f3_401a_8180_9658d026891f_AnB + mw696a0244_c288_4a57_906a_efc8dffb5fcb_AnB; mw825000e8_8ecd_4296_a430_ade3430cbcdb_AnB_TXTL_RNAPBOUND_TERMINATION_RATE*mw67add5c4_6af7_44a4_94a6_68ce8cedb6b2_AnB;
    mw825000e8_8ecd_4296_a430_ade3430cbcdb_AnB_TXTL_RNAPBOUND_TERMINATION_RATE = 0.05;
  mw85d6d669_902e_40d6_9ace_ab3642be3fe5_AnB: mw46cc4c92_3ee2_4712_8b1f_97044ea5c6e4_AnB + mwf647df8e_575b_47cf_a794_3b55a6d29079_AnB -> mw6df6ff4c_2088_46c1_9bdb_a459b5f3b562_AnB; mw85d6d669_902e_40d6_9ace_ab3642be3fe5_AnB_TXTL_NTP_RNAP_F*mw46cc4c92_3ee2_4712_8b1f_97044ea5c6e4_AnB*mwf647df8e_575b_47cf_a794_3b55a6d29079_AnB - mw85d6d669_902e_40d6_9ace_ab3642be3fe5_AnB_TXTL_NTP_RNAP_R*mw6df6ff4c_2088_46c1_9bdb_a459b5f3b562_AnB;
    mw85d6d669_902e_40d6_9ace_ab3642be3fe5_AnB_TXTL_NTP_RNAP_F = 1000; mw85d6d669_902e_40d6_9ace_ab3642be3fe5_AnB_TXTL_NTP_RNAP_R = 120000000;
  mw91a47d88_2456_41d0_9e77_1deb74dd2bc0_AnB: mw46cc4c92_3ee2_4712_8b1f_97044ea5c6e4_AnB + mwa1abaec4_a028_468a_83dd_9b06410bb615_AnB -> mw3267f942_0277_4ba7_87f4_b8cce339cca8_AnB; mw91a47d88_2456_41d0_9e77_1deb74dd2bc0_AnB_TXTL_NTP_RNAP_F*mw46cc4c92_3ee2_4712_8b1f_97044ea5c6e4_AnB*mwa1abaec4_a028_468a_83dd_9b06410bb615_AnB - mw91a47d88_2456_41d0_9e77_1deb74dd2bc0_AnB_TXTL_NTP_RNAP_R*mw3267f942_0277_4ba7_87f4_b8cce339cca8_AnB;
    mw91a47d88_2456_41d0_9e77_1deb74dd2bc0_AnB_TXTL_NTP_RNAP_F = 1000; mw91a47d88_2456_41d0_9e77_1deb74dd2bc0_AnB_TXTL_NTP_RNAP_R = 120000000;
  mwc09c7127_c88e_4016_a975_229302ddc011_AnB: mw6df6ff4c_2088_46c1_9bdb_a459b5f3b562_AnB + mwa1abaec4_a028_468a_83dd_9b06410bb615_AnB -> mw71b42a67_e162_4e10_b157_5bdd04885ac1_AnB; mwc09c7127_c88e_4016_a975_229302ddc011_AnB_TXTL_NTP_RNAP_F*mw6df6ff4c_2088_46c1_9bdb_a459b5f3b562_AnB*mwa1abaec4_a028_468a_83dd_9b06410bb615_AnB - mwc09c7127_c88e_4016_a975_229302ddc011_AnB_TXTL_NTP_RNAP_R*mw71b42a67_e162_4e10_b157_5bdd04885ac1_AnB;
    mwc09c7127_c88e_4016_a975_229302ddc011_AnB_TXTL_NTP_RNAP_F = 1; mwc09c7127_c88e_4016_a975_229302ddc011_AnB_TXTL_NTP_RNAP_R = 120000;
  mw225ffb14_4e5c_4881_9f25_93f6dc270966_AnB: mw3267f942_0277_4ba7_87f4_b8cce339cca8_AnB + mwf647df8e_575b_47cf_a794_3b55a6d29079_AnB -> mw71b42a67_e162_4e10_b157_5bdd04885ac1_AnB; mw225ffb14_4e5c_4881_9f25_93f6dc270966_AnB_TXTL_NTP_RNAP_F*mw3267f942_0277_4ba7_87f4_b8cce339cca8_AnB*mwf647df8e_575b_47cf_a794_3b55a6d29079_AnB - mw225ffb14_4e5c_4881_9f25_93f6dc270966_AnB_TXTL_NTP_RNAP_R*mw71b42a67_e162_4e10_b157_5bdd04885ac1_AnB;
    mw225ffb14_4e5c_4881_9f25_93f6dc270966_AnB_TXTL_NTP_RNAP_F = 1; mw225ffb14_4e5c_4881_9f25_93f6dc270966_AnB_TXTL_NTP_RNAP_R = 120000;
  mwa1b6650a_77e0_4d28_a326_3ca4805a958e_AnB: mw71b42a67_e162_4e10_b157_5bdd04885ac1_AnB => mw67add5c4_6af7_44a4_94a6_68ce8cedb6b2_AnB + mwe3156279_9eea_43b6_a446_259d020cea0d_AnB; mwa1b6650a_77e0_4d28_a326_3ca4805a958e_AnB_TXTL_transcription_rate1*mw71b42a67_e162_4e10_b157_5bdd04885ac1_AnB;
    mwa1b6650a_77e0_4d28_a326_3ca4805a958e_AnB_TXTL_transcription_rate1 = 0.001470588;
  mwfd126431_cb19_4ab2_90db_8fd7f131d6c1_AnB: mwa6ef4fa8_a9ad_4b35_88aa_1b6d4fcfb612_AnB + mwf5ed5ed1_b9a2_47a0_b2df_6763250cc3ad_AnB -> mwa486bc01_66c4_4756_9b85_cdbcf260be38_AnB; mwfd126431_cb19_4ab2_90db_8fd7f131d6c1_AnB_TL_AA_F*mwa6ef4fa8_a9ad_4b35_88aa_1b6d4fcfb612_AnB*mwf5ed5ed1_b9a2_47a0_b2df_6763250cc3ad_AnB - mwfd126431_cb19_4ab2_90db_8fd7f131d6c1_AnB_TL_AA_R*mwa486bc01_66c4_4756_9b85_cdbcf260be38_AnB;
    mwfd126431_cb19_4ab2_90db_8fd7f131d6c1_AnB_TL_AA_F = 300; mwfd126431_cb19_4ab2_90db_8fd7f131d6c1_AnB_TL_AA_R = 0.1;
  mw595e91b3_9865_46e9_b460_795c8cd57cb7_AnB: mwa486bc01_66c4_4756_9b85_cdbcf260be38_AnB + 2 mwf647df8e_575b_47cf_a794_3b55a6d29079_AnB -> mwf27c2cef_fd98_45a9_a676_c4cfc3bfee9f_AnB; mw595e91b3_9865_46e9_b460_795c8cd57cb7_AnB_TL_AGTP_F*mwa486bc01_66c4_4756_9b85_cdbcf260be38_AnB*mwf647df8e_575b_47cf_a794_3b55a6d29079_AnB^2 - mw595e91b3_9865_46e9_b460_795c8cd57cb7_AnB_TL_AGTP_R*mwf27c2cef_fd98_45a9_a676_c4cfc3bfee9f_AnB;
    mw595e91b3_9865_46e9_b460_795c8cd57cb7_AnB_TL_AGTP_F = 30; mw595e91b3_9865_46e9_b460_795c8cd57cb7_AnB_TL_AGTP_R = 10;
  mwade64999_1370_4388_840b_4329ca18b4ed_AnB: mwf27c2cef_fd98_45a9_a676_c4cfc3bfee9f_AnB => mw8fea26fd_a005_4d1a_8a94_9bc4f4509b9b_AnB; mwade64999_1370_4388_840b_4329ca18b4ed_AnB_TXTL_TL_AA_consumption*mwf27c2cef_fd98_45a9_a676_c4cfc3bfee9f_AnB;
    mwade64999_1370_4388_840b_4329ca18b4ed_AnB_TXTL_TL_AA_consumption = 0.024;
  mwc9fd6d5f_ddec_4fb5_ab3b_8dae3f5dbe0b_AnB: mwf27c2cef_fd98_45a9_a676_c4cfc3bfee9f_AnB => mw8fea26fd_a005_4d1a_8a94_9bc4f4509b9b_AnB + mw3dabd164_87ea_4f0d_b56b_035a047766d1_AnB; mwc9fd6d5f_ddec_4fb5_ab3b_8dae3f5dbe0b_AnB_TXTL_TL_rate*mwf27c2cef_fd98_45a9_a676_c4cfc3bfee9f_AnB;
    mwc9fd6d5f_ddec_4fb5_ab3b_8dae3f5dbe0b_AnB_TXTL_TL_rate = 0.012;
  mw4cb74554_c953_451a_a3a0_3cf4ccde3255_AnB: mw8fea26fd_a005_4d1a_8a94_9bc4f4509b9b_AnB => mwe3156279_9eea_43b6_a446_259d020cea0d_AnB + mw6f001bb3_24e7_4c91_8082_bada566d4832_AnB; mw4cb74554_c953_451a_a3a0_3cf4ccde3255_AnB_TXTL_RIBOBOUND_TERMINATION_RATE*mw8fea26fd_a005_4d1a_8a94_9bc4f4509b9b_AnB;
    mw4cb74554_c953_451a_a3a0_3cf4ccde3255_AnB_TXTL_RIBOBOUND_TERMINATION_RATE = 50;
  mw7164da3e_010c_4d78_a64b_a7a860144297_AnB: mwe3156279_9eea_43b6_a446_259d020cea0d_AnB + mw0ba92b06_a96b_4b93_801c_b589b9715ad4_AnB -> mweddfabff_f95e_47d3_a383_083f3b3732fc_AnB; mw7164da3e_010c_4d78_a64b_a7a860144297_AnB_TXTL_RNAdeg_F*mwe3156279_9eea_43b6_a446_259d020cea0d_AnB*mw0ba92b06_a96b_4b93_801c_b589b9715ad4_AnB - mw7164da3e_010c_4d78_a64b_a7a860144297_AnB_TXTL_RNAdeg_R*mweddfabff_f95e_47d3_a383_083f3b3732fc_AnB;
    mw7164da3e_010c_4d78_a64b_a7a860144297_AnB_TXTL_RNAdeg_F = 10; mw7164da3e_010c_4d78_a64b_a7a860144297_AnB_TXTL_RNAdeg_R = 2000;
  mw13fcc5fe_71be_4228_b715_68293d8ed46b_AnB: mweddfabff_f95e_47d3_a383_083f3b3732fc_AnB => mw0ba92b06_a96b_4b93_801c_b589b9715ad4_AnB; mw13fcc5fe_71be_4228_b715_68293d8ed46b_AnB_TXTL_RNAdeg_F*mweddfabff_f95e_47d3_a383_083f3b3732fc_AnB;
    mw13fcc5fe_71be_4228_b715_68293d8ed46b_AnB_TXTL_RNAdeg_F = 0.002777778;
  mwb1cbd8db_2c09_4b16_93d4_b79f77a6f46f_AnB: mwa6ef4fa8_a9ad_4b35_88aa_1b6d4fcfb612_AnB + mw0ba92b06_a96b_4b93_801c_b589b9715ad4_AnB -> mw00efdfb2_142d_4f4f_87b8_fa0d5655b7bf_AnB; mwb1cbd8db_2c09_4b16_93d4_b79f77a6f46f_AnB_TXTL_RNAdeg_F*mwa6ef4fa8_a9ad_4b35_88aa_1b6d4fcfb612_AnB*mw0ba92b06_a96b_4b93_801c_b589b9715ad4_AnB - mwb1cbd8db_2c09_4b16_93d4_b79f77a6f46f_AnB_TXTL_RNAdeg_R*mw00efdfb2_142d_4f4f_87b8_fa0d5655b7bf_AnB;
    mwb1cbd8db_2c09_4b16_93d4_b79f77a6f46f_AnB_TXTL_RNAdeg_F = 10; mwb1cbd8db_2c09_4b16_93d4_b79f77a6f46f_AnB_TXTL_RNAdeg_R = 2000;
  mwe6420da9_579a_4fba_8c9a_4a75318ef251_AnB: mw00efdfb2_142d_4f4f_87b8_fa0d5655b7bf_AnB => mw0ba92b06_a96b_4b93_801c_b589b9715ad4_AnB + mw6f001bb3_24e7_4c91_8082_bada566d4832_AnB; mwe6420da9_579a_4fba_8c9a_4a75318ef251_AnB_TXTL_RNAdeg_F*mw00efdfb2_142d_4f4f_87b8_fa0d5655b7bf_AnB;
    mwe6420da9_579a_4fba_8c9a_4a75318ef251_AnB_TXTL_RNAdeg_F = 0.002777778;
  mw00e33c2f_3299_47ff_88a9_ec197f51d4d0_AnB: mwf27c2cef_fd98_45a9_a676_c4cfc3bfee9f_AnB + mw0ba92b06_a96b_4b93_801c_b589b9715ad4_AnB -> mw85f2d6bd_2ccf_46d9_893e_9c4c8074a611_AnB; mw00e33c2f_3299_47ff_88a9_ec197f51d4d0_AnB_TXTL_RNAdeg_F*mwf27c2cef_fd98_45a9_a676_c4cfc3bfee9f_AnB*mw0ba92b06_a96b_4b93_801c_b589b9715ad4_AnB - mw00e33c2f_3299_47ff_88a9_ec197f51d4d0_AnB_TXTL_RNAdeg_R*mw85f2d6bd_2ccf_46d9_893e_9c4c8074a611_AnB;
    mw00e33c2f_3299_47ff_88a9_ec197f51d4d0_AnB_TXTL_RNAdeg_F = 10; mw00e33c2f_3299_47ff_88a9_ec197f51d4d0_AnB_TXTL_RNAdeg_R = 2000;
  mwcf876a7f_9585_4a29_aee9_3db9723c8997_AnB: mw85f2d6bd_2ccf_46d9_893e_9c4c8074a611_AnB => mw0ba92b06_a96b_4b93_801c_b589b9715ad4_AnB + mwf5ed5ed1_b9a2_47a0_b2df_6763250cc3ad_AnB + 2 mwf647df8e_575b_47cf_a794_3b55a6d29079_AnB + mw6f001bb3_24e7_4c91_8082_bada566d4832_AnB; mwcf876a7f_9585_4a29_aee9_3db9723c8997_AnB_TXTL_RNAdeg_F*mw85f2d6bd_2ccf_46d9_893e_9c4c8074a611_AnB;
    mwcf876a7f_9585_4a29_aee9_3db9723c8997_AnB_TXTL_RNAdeg_F = 0.002777778;
  mw4c384db5_0f99_4e67_be1e_54d4992f0cab_AnB: mw8fea26fd_a005_4d1a_8a94_9bc4f4509b9b_AnB + mw0ba92b06_a96b_4b93_801c_b589b9715ad4_AnB -> mw3b1431cc_b80d_47bf_84bc_b70bb55cd38c_AnB; mw4c384db5_0f99_4e67_be1e_54d4992f0cab_AnB_TXTL_RNAdeg_F*mw8fea26fd_a005_4d1a_8a94_9bc4f4509b9b_AnB*mw0ba92b06_a96b_4b93_801c_b589b9715ad4_AnB - mw4c384db5_0f99_4e67_be1e_54d4992f0cab_AnB_TXTL_RNAdeg_R*mw3b1431cc_b80d_47bf_84bc_b70bb55cd38c_AnB;
    mw4c384db5_0f99_4e67_be1e_54d4992f0cab_AnB_TXTL_RNAdeg_F = 10; mw4c384db5_0f99_4e67_be1e_54d4992f0cab_AnB_TXTL_RNAdeg_R = 2000;
  mw2d3ced79_7739_4aa0_a965_04ad0ebf6442_AnB: mw3b1431cc_b80d_47bf_84bc_b70bb55cd38c_AnB => mw0ba92b06_a96b_4b93_801c_b589b9715ad4_AnB + mw6f001bb3_24e7_4c91_8082_bada566d4832_AnB; mw2d3ced79_7739_4aa0_a965_04ad0ebf6442_AnB_TXTL_RNAdeg_F*mw3b1431cc_b80d_47bf_84bc_b70bb55cd38c_AnB;
    mw2d3ced79_7739_4aa0_a965_04ad0ebf6442_AnB_TXTL_RNAdeg_F = 0.002777778;
  mwa542057f_6d98_4bb7_b147_b69723a3e08c_AnB: mwa486bc01_66c4_4756_9b85_cdbcf260be38_AnB + mw0ba92b06_a96b_4b93_801c_b589b9715ad4_AnB -> mwd7650a50_28e8_4b5e_bdf4_e13712258519_AnB; mwa542057f_6d98_4bb7_b147_b69723a3e08c_AnB_TXTL_RNAdeg_F*mwa486bc01_66c4_4756_9b85_cdbcf260be38_AnB*mw0ba92b06_a96b_4b93_801c_b589b9715ad4_AnB - mwa542057f_6d98_4bb7_b147_b69723a3e08c_AnB_TXTL_RNAdeg_R*mwd7650a50_28e8_4b5e_bdf4_e13712258519_AnB;
    mwa542057f_6d98_4bb7_b147_b69723a3e08c_AnB_TXTL_RNAdeg_F = 10; mwa542057f_6d98_4bb7_b147_b69723a3e08c_AnB_TXTL_RNAdeg_R = 2000;
  mw95743c5d_b1a5_4851_b525_f0a13bce25ec_AnB: mwd7650a50_28e8_4b5e_bdf4_e13712258519_AnB => mw0ba92b06_a96b_4b93_801c_b589b9715ad4_AnB + mwf5ed5ed1_b9a2_47a0_b2df_6763250cc3ad_AnB + mw6f001bb3_24e7_4c91_8082_bada566d4832_AnB; mw95743c5d_b1a5_4851_b525_f0a13bce25ec_AnB_TXTL_RNAdeg_F*mwd7650a50_28e8_4b5e_bdf4_e13712258519_AnB;
    mw95743c5d_b1a5_4851_b525_f0a13bce25ec_AnB_TXTL_RNAdeg_F = 0.002777778;
  mw7b1ce0a6_b287_4250_94c0_153208cf130d_AnB: mwb0343236_d8ee_47a3_911c_d22c042081af_AnB + mw1002e515_6ba8_481d_aaa9_89647b90f29f_AnB -> mwbbc0a90c_74dc_42c2_ae48_aa4f1010c329_AnB; SigmaX_RNAP_F*mwb0343236_d8ee_47a3_911c_d22c042081af_AnB*mw1002e515_6ba8_481d_aaa9_89647b90f29f_AnB - SigmaX_RNAP_R*mwbbc0a90c_74dc_42c2_ae48_aa4f1010c329_AnB;
    SigmaX_RNAP_F = 100; SigmaX_RNAP_R = 0.1;
  mwe0146b97_bd3b_4472_a6ef_1b24613d6d22_AnB: mw0915efe7_1341_49ab_a8ef_0eb7fee30bc1_AnB + mw6f001bb3_24e7_4c91_8082_bada566d4832_AnB -> mw8905d669_d482_4967_9c6f_f69677ea0794_AnB; mwe0146b97_bd3b_4472_a6ef_1b24613d6d22_AnB_TXTL_UTR_UTR1_F*mw0915efe7_1341_49ab_a8ef_0eb7fee30bc1_AnB*mw6f001bb3_24e7_4c91_8082_bada566d4832_AnB - mwe0146b97_bd3b_4472_a6ef_1b24613d6d22_AnB_TXTL_UTR_UTR1_R*mw8905d669_d482_4967_9c6f_f69677ea0794_AnB;
    mwe0146b97_bd3b_4472_a6ef_1b24613d6d22_AnB_TXTL_UTR_UTR1_F = 0.2; mwe0146b97_bd3b_4472_a6ef_1b24613d6d22_AnB_TXTL_UTR_UTR1_R = 4;
  mwc6274494_428c_49e8_8212_55ae347c4efc_AnB: mw4d8333a7_ce38_45b7_a707_b13dff7fe0ee_AnB + mwb0343236_d8ee_47a3_911c_d22c042081af_AnB -> mwffb8d502_f884_4483_85e9_2071d6311ffe_AnB; mwc6274494_428c_49e8_8212_55ae347c4efc_AnB_TXTL_PLAC_RNAPbound_F*mw4d8333a7_ce38_45b7_a707_b13dff7fe0ee_AnB*mwb0343236_d8ee_47a3_911c_d22c042081af_AnB - mwc6274494_428c_49e8_8212_55ae347c4efc_AnB_TXTL_PLAC_RNAPbound_R*mwffb8d502_f884_4483_85e9_2071d6311ffe_AnB;
    mwc6274494_428c_49e8_8212_55ae347c4efc_AnB_TXTL_PLAC_RNAPbound_F = 20; mwc6274494_428c_49e8_8212_55ae347c4efc_AnB_TXTL_PLAC_RNAPbound_R = 400;
  mwf88779bf_c741_43b0_af4b_a49cf2e6c646_AnB: mw01e10fb5_a2f0_4d9e_a7d4_6184b5c73c36_AnB => mwffb8d502_f884_4483_85e9_2071d6311ffe_AnB; mwf88779bf_c741_43b0_af4b_a49cf2e6c646_AnB_TXTL_NTP_consumption*mw01e10fb5_a2f0_4d9e_a7d4_6184b5c73c36_AnB;
    mwf88779bf_c741_43b0_af4b_a49cf2e6c646_AnB_TXTL_NTP_consumption = 0.7485294;
  mw25a1c01e_29f1_4546_b423_c80a3ecb29c6_AnB: mw32bf80c0_91e6_4c1a_9e9a_76a2c9ab2862_AnB => mwb0343236_d8ee_47a3_911c_d22c042081af_AnB + mw4d8333a7_ce38_45b7_a707_b13dff7fe0ee_AnB; mw25a1c01e_29f1_4546_b423_c80a3ecb29c6_AnB_TXTL_RNAPBOUND_TERMINATION_RATE*mw32bf80c0_91e6_4c1a_9e9a_76a2c9ab2862_AnB;
    mw25a1c01e_29f1_4546_b423_c80a3ecb29c6_AnB_TXTL_RNAPBOUND_TERMINATION_RATE = 0.05;
  mw43583dd2_b70a_4386_b912_a70081827a17_AnB: mwffb8d502_f884_4483_85e9_2071d6311ffe_AnB + mwf647df8e_575b_47cf_a794_3b55a6d29079_AnB -> mwf0e02418_a1a1_4c34_ac37_b00c1d93e783_AnB; mw43583dd2_b70a_4386_b912_a70081827a17_AnB_TXTL_NTP_RNAP_F*mwffb8d502_f884_4483_85e9_2071d6311ffe_AnB*mwf647df8e_575b_47cf_a794_3b55a6d29079_AnB - mw43583dd2_b70a_4386_b912_a70081827a17_AnB_TXTL_NTP_RNAP_R*mwf0e02418_a1a1_4c34_ac37_b00c1d93e783_AnB;
    mw43583dd2_b70a_4386_b912_a70081827a17_AnB_TXTL_NTP_RNAP_F = 1000; mw43583dd2_b70a_4386_b912_a70081827a17_AnB_TXTL_NTP_RNAP_R = 120000000;
  mw26292bee_a2a9_45b1_911f_105c4f955dc1_AnB: mwffb8d502_f884_4483_85e9_2071d6311ffe_AnB + mwa1abaec4_a028_468a_83dd_9b06410bb615_AnB -> mw4cf760ff_4a6f_4101_9592_7fea1e24a539_AnB; mw26292bee_a2a9_45b1_911f_105c4f955dc1_AnB_TXTL_NTP_RNAP_F*mwffb8d502_f884_4483_85e9_2071d6311ffe_AnB*mwa1abaec4_a028_468a_83dd_9b06410bb615_AnB - mw26292bee_a2a9_45b1_911f_105c4f955dc1_AnB_TXTL_NTP_RNAP_R*mw4cf760ff_4a6f_4101_9592_7fea1e24a539_AnB;
    mw26292bee_a2a9_45b1_911f_105c4f955dc1_AnB_TXTL_NTP_RNAP_F = 1000; mw26292bee_a2a9_45b1_911f_105c4f955dc1_AnB_TXTL_NTP_RNAP_R = 120000000;
  mw5d18d3d5_3568_4dd4_a96e_d534480bdf50_AnB: mwf0e02418_a1a1_4c34_ac37_b00c1d93e783_AnB + mwa1abaec4_a028_468a_83dd_9b06410bb615_AnB -> mw01e10fb5_a2f0_4d9e_a7d4_6184b5c73c36_AnB; mw5d18d3d5_3568_4dd4_a96e_d534480bdf50_AnB_TXTL_NTP_RNAP_F*mwf0e02418_a1a1_4c34_ac37_b00c1d93e783_AnB*mwa1abaec4_a028_468a_83dd_9b06410bb615_AnB - mw5d18d3d5_3568_4dd4_a96e_d534480bdf50_AnB_TXTL_NTP_RNAP_R*mw01e10fb5_a2f0_4d9e_a7d4_6184b5c73c36_AnB;
    mw5d18d3d5_3568_4dd4_a96e_d534480bdf50_AnB_TXTL_NTP_RNAP_F = 1; mw5d18d3d5_3568_4dd4_a96e_d534480bdf50_AnB_TXTL_NTP_RNAP_R = 120000;
  mw43d6a15e_9a83_473e_9607_b4d6b19d6df4_AnB: mw4cf760ff_4a6f_4101_9592_7fea1e24a539_AnB + mwf647df8e_575b_47cf_a794_3b55a6d29079_AnB -> mw01e10fb5_a2f0_4d9e_a7d4_6184b5c73c36_AnB; mw43d6a15e_9a83_473e_9607_b4d6b19d6df4_AnB_TXTL_NTP_RNAP_F*mw4cf760ff_4a6f_4101_9592_7fea1e24a539_AnB*mwf647df8e_575b_47cf_a794_3b55a6d29079_AnB - mw43d6a15e_9a83_473e_9607_b4d6b19d6df4_AnB_TXTL_NTP_RNAP_R*mw01e10fb5_a2f0_4d9e_a7d4_6184b5c73c36_AnB;
    mw43d6a15e_9a83_473e_9607_b4d6b19d6df4_AnB_TXTL_NTP_RNAP_F = 1; mw43d6a15e_9a83_473e_9607_b4d6b19d6df4_AnB_TXTL_NTP_RNAP_R = 120000;
  mw3a70753f_2dcd_4e8f_8a91_19a1abb75bf7_AnB: mw01e10fb5_a2f0_4d9e_a7d4_6184b5c73c36_AnB => mw32bf80c0_91e6_4c1a_9e9a_76a2c9ab2862_AnB + mw0915efe7_1341_49ab_a8ef_0eb7fee30bc1_AnB; mw3a70753f_2dcd_4e8f_8a91_19a1abb75bf7_AnB_TXTL_transcription_rate1*mw01e10fb5_a2f0_4d9e_a7d4_6184b5c73c36_AnB;
    mw3a70753f_2dcd_4e8f_8a91_19a1abb75bf7_AnB_TXTL_transcription_rate1 = 0.001470588;
  mw066e3d19_a38a_4b75_b02f_f8baedda8dab_AnB: mw8905d669_d482_4967_9c6f_f69677ea0794_AnB + mwf5ed5ed1_b9a2_47a0_b2df_6763250cc3ad_AnB -> mw06d6ab53_bdfd_4580_9f4d_5d34dd8cec54_AnB; mw066e3d19_a38a_4b75_b02f_f8baedda8dab_AnB_TL_AA_F*mw8905d669_d482_4967_9c6f_f69677ea0794_AnB*mwf5ed5ed1_b9a2_47a0_b2df_6763250cc3ad_AnB - mw066e3d19_a38a_4b75_b02f_f8baedda8dab_AnB_TL_AA_R*mw06d6ab53_bdfd_4580_9f4d_5d34dd8cec54_AnB;
    mw066e3d19_a38a_4b75_b02f_f8baedda8dab_AnB_TL_AA_F = 300; mw066e3d19_a38a_4b75_b02f_f8baedda8dab_AnB_TL_AA_R = 0.1;
  mwafdfd08f_de95_4b7f_af7b_7fc1184942f7_AnB: mw06d6ab53_bdfd_4580_9f4d_5d34dd8cec54_AnB + 2 mwf647df8e_575b_47cf_a794_3b55a6d29079_AnB -> mw03911c10_ff33_48bc_8941_67dd809dbfb1_AnB; mwafdfd08f_de95_4b7f_af7b_7fc1184942f7_AnB_TL_AGTP_F*mw06d6ab53_bdfd_4580_9f4d_5d34dd8cec54_AnB*mwf647df8e_575b_47cf_a794_3b55a6d29079_AnB^2 - mwafdfd08f_de95_4b7f_af7b_7fc1184942f7_AnB_TL_AGTP_R*mw03911c10_ff33_48bc_8941_67dd809dbfb1_AnB;
    mwafdfd08f_de95_4b7f_af7b_7fc1184942f7_AnB_TL_AGTP_F = 30; mwafdfd08f_de95_4b7f_af7b_7fc1184942f7_AnB_TL_AGTP_R = 10;
  mw73dc8a6f_40c6_4492_914d_bfe94e7c69e8_AnB: mw03911c10_ff33_48bc_8941_67dd809dbfb1_AnB => mw64f68b39_4419_4660_9c74_c83ce83b8b49_AnB; mw73dc8a6f_40c6_4492_914d_bfe94e7c69e8_AnB_TXTL_TL_AA_consumption*mw03911c10_ff33_48bc_8941_67dd809dbfb1_AnB;
    mw73dc8a6f_40c6_4492_914d_bfe94e7c69e8_AnB_TXTL_TL_AA_consumption = 0.024;
  mwd83ea452_2218_4bbb_b75f_c5e1c5303332_AnB: mw03911c10_ff33_48bc_8941_67dd809dbfb1_AnB => mw64f68b39_4419_4660_9c74_c83ce83b8b49_AnB + mw1002e515_6ba8_481d_aaa9_89647b90f29f_AnB; mwd83ea452_2218_4bbb_b75f_c5e1c5303332_AnB_TXTL_TL_rate*mw03911c10_ff33_48bc_8941_67dd809dbfb1_AnB;
    mwd83ea452_2218_4bbb_b75f_c5e1c5303332_AnB_TXTL_TL_rate = 0.012;
  mwb3a565de_b6bc_4b3f_9a11_01efdd3bc8f5_AnB: mw64f68b39_4419_4660_9c74_c83ce83b8b49_AnB => mw0915efe7_1341_49ab_a8ef_0eb7fee30bc1_AnB + mw6f001bb3_24e7_4c91_8082_bada566d4832_AnB; mwb3a565de_b6bc_4b3f_9a11_01efdd3bc8f5_AnB_TXTL_RIBOBOUND_TERMINATION_RATE*mw64f68b39_4419_4660_9c74_c83ce83b8b49_AnB;
    mwb3a565de_b6bc_4b3f_9a11_01efdd3bc8f5_AnB_TXTL_RIBOBOUND_TERMINATION_RATE = 50;
  mwc4e45cda_adf0_4501_a05e_fc21c27c4562_AnB: mw0915efe7_1341_49ab_a8ef_0eb7fee30bc1_AnB + mw0ba92b06_a96b_4b93_801c_b589b9715ad4_AnB -> mw9b6766dc_a71e_473a_bc70_66fb66cab180_AnB; mwc4e45cda_adf0_4501_a05e_fc21c27c4562_AnB_TXTL_RNAdeg_F*mw0915efe7_1341_49ab_a8ef_0eb7fee30bc1_AnB*mw0ba92b06_a96b_4b93_801c_b589b9715ad4_AnB - mwc4e45cda_adf0_4501_a05e_fc21c27c4562_AnB_TXTL_RNAdeg_R*mw9b6766dc_a71e_473a_bc70_66fb66cab180_AnB;
    mwc4e45cda_adf0_4501_a05e_fc21c27c4562_AnB_TXTL_RNAdeg_F = 10; mwc4e45cda_adf0_4501_a05e_fc21c27c4562_AnB_TXTL_RNAdeg_R = 2000;
  mw292f1dac_14cc_4ddd_9c70_d9408f5be349_AnB: mw9b6766dc_a71e_473a_bc70_66fb66cab180_AnB => mw0ba92b06_a96b_4b93_801c_b589b9715ad4_AnB; mw292f1dac_14cc_4ddd_9c70_d9408f5be349_AnB_TXTL_RNAdeg_F*mw9b6766dc_a71e_473a_bc70_66fb66cab180_AnB;
    mw292f1dac_14cc_4ddd_9c70_d9408f5be349_AnB_TXTL_RNAdeg_F = 0.002777778;
  mw9a107351_7055_452b_841d_abbbcd9631bc_AnB: mw8905d669_d482_4967_9c6f_f69677ea0794_AnB + mw0ba92b06_a96b_4b93_801c_b589b9715ad4_AnB -> mw457838f0_4f38_475f_b39e_af87507949ca_AnB; mw9a107351_7055_452b_841d_abbbcd9631bc_AnB_TXTL_RNAdeg_F*mw8905d669_d482_4967_9c6f_f69677ea0794_AnB*mw0ba92b06_a96b_4b93_801c_b589b9715ad4_AnB - mw9a107351_7055_452b_841d_abbbcd9631bc_AnB_TXTL_RNAdeg_R*mw457838f0_4f38_475f_b39e_af87507949ca_AnB;
    mw9a107351_7055_452b_841d_abbbcd9631bc_AnB_TXTL_RNAdeg_F = 10; mw9a107351_7055_452b_841d_abbbcd9631bc_AnB_TXTL_RNAdeg_R = 2000;
  mw6f4502f9_67d3_4266_af9c_49188de29a21_AnB: mw457838f0_4f38_475f_b39e_af87507949ca_AnB => mw0ba92b06_a96b_4b93_801c_b589b9715ad4_AnB + mw6f001bb3_24e7_4c91_8082_bada566d4832_AnB; mw6f4502f9_67d3_4266_af9c_49188de29a21_AnB_TXTL_RNAdeg_F*mw457838f0_4f38_475f_b39e_af87507949ca_AnB;
    mw6f4502f9_67d3_4266_af9c_49188de29a21_AnB_TXTL_RNAdeg_F = 0.002777778;
  mwb66e0ff5_8691_4214_8c1d_d85b32817f08_AnB: mw03911c10_ff33_48bc_8941_67dd809dbfb1_AnB + mw0ba92b06_a96b_4b93_801c_b589b9715ad4_AnB -> mw9207e17d_6f37_430a_9d7e_9b616b612e57_AnB; mwb66e0ff5_8691_4214_8c1d_d85b32817f08_AnB_TXTL_RNAdeg_F*mw03911c10_ff33_48bc_8941_67dd809dbfb1_AnB*mw0ba92b06_a96b_4b93_801c_b589b9715ad4_AnB - mwb66e0ff5_8691_4214_8c1d_d85b32817f08_AnB_TXTL_RNAdeg_R*mw9207e17d_6f37_430a_9d7e_9b616b612e57_AnB;
    mwb66e0ff5_8691_4214_8c1d_d85b32817f08_AnB_TXTL_RNAdeg_F = 10; mwb66e0ff5_8691_4214_8c1d_d85b32817f08_AnB_TXTL_RNAdeg_R = 2000;
  mw941be9c9_b96a_4257_9548_60668766e654_AnB: mw9207e17d_6f37_430a_9d7e_9b616b612e57_AnB => mw0ba92b06_a96b_4b93_801c_b589b9715ad4_AnB + mwf5ed5ed1_b9a2_47a0_b2df_6763250cc3ad_AnB + 2 mwf647df8e_575b_47cf_a794_3b55a6d29079_AnB + mw6f001bb3_24e7_4c91_8082_bada566d4832_AnB; mw941be9c9_b96a_4257_9548_60668766e654_AnB_TXTL_RNAdeg_F*mw9207e17d_6f37_430a_9d7e_9b616b612e57_AnB;
    mw941be9c9_b96a_4257_9548_60668766e654_AnB_TXTL_RNAdeg_F = 0.002777778;
  mwc04e6a5a_7247_49ff_8383_f9ff2eb0a0d0_AnB: mw64f68b39_4419_4660_9c74_c83ce83b8b49_AnB + mw0ba92b06_a96b_4b93_801c_b589b9715ad4_AnB -> mw67db745d_ed07_4716_bb41_0117c710e1a7_AnB; mwc04e6a5a_7247_49ff_8383_f9ff2eb0a0d0_AnB_TXTL_RNAdeg_F*mw64f68b39_4419_4660_9c74_c83ce83b8b49_AnB*mw0ba92b06_a96b_4b93_801c_b589b9715ad4_AnB - mwc04e6a5a_7247_49ff_8383_f9ff2eb0a0d0_AnB_TXTL_RNAdeg_R*mw67db745d_ed07_4716_bb41_0117c710e1a7_AnB;
    mwc04e6a5a_7247_49ff_8383_f9ff2eb0a0d0_AnB_TXTL_RNAdeg_F = 10; mwc04e6a5a_7247_49ff_8383_f9ff2eb0a0d0_AnB_TXTL_RNAdeg_R = 2000;
  mw3c4cf93b_f681_4d59_80df_0e384c9b708c_AnB: mw67db745d_ed07_4716_bb41_0117c710e1a7_AnB => mw0ba92b06_a96b_4b93_801c_b589b9715ad4_AnB + mw6f001bb3_24e7_4c91_8082_bada566d4832_AnB; mw3c4cf93b_f681_4d59_80df_0e384c9b708c_AnB_TXTL_RNAdeg_F*mw67db745d_ed07_4716_bb41_0117c710e1a7_AnB;
    mw3c4cf93b_f681_4d59_80df_0e384c9b708c_AnB_TXTL_RNAdeg_F = 0.002777778;
  mw187d1724_1142_40b5_ab0e_0e82ae13c11e_AnB: mw06d6ab53_bdfd_4580_9f4d_5d34dd8cec54_AnB + mw0ba92b06_a96b_4b93_801c_b589b9715ad4_AnB -> mw367403bf_e154_43e2_a7f7_6fe0f70aa5b0_AnB; mw187d1724_1142_40b5_ab0e_0e82ae13c11e_AnB_TXTL_RNAdeg_F*mw06d6ab53_bdfd_4580_9f4d_5d34dd8cec54_AnB*mw0ba92b06_a96b_4b93_801c_b589b9715ad4_AnB - mw187d1724_1142_40b5_ab0e_0e82ae13c11e_AnB_TXTL_RNAdeg_R*mw367403bf_e154_43e2_a7f7_6fe0f70aa5b0_AnB;
    mw187d1724_1142_40b5_ab0e_0e82ae13c11e_AnB_TXTL_RNAdeg_F = 10; mw187d1724_1142_40b5_ab0e_0e82ae13c11e_AnB_TXTL_RNAdeg_R = 2000;
  mw096cf642_475a_4699_870c_3098291dd827_AnB: mw367403bf_e154_43e2_a7f7_6fe0f70aa5b0_AnB => mw0ba92b06_a96b_4b93_801c_b589b9715ad4_AnB + mwf5ed5ed1_b9a2_47a0_b2df_6763250cc3ad_AnB + mw6f001bb3_24e7_4c91_8082_bada566d4832_AnB; mw096cf642_475a_4699_870c_3098291dd827_AnB_TXTL_RNAdeg_F*mw367403bf_e154_43e2_a7f7_6fe0f70aa5b0_AnB;
    mw096cf642_475a_4699_870c_3098291dd827_AnB_TXTL_RNAdeg_F = 0.002777778;
  mw77f513e1_ca00_40c9_92f5_12774831e8d0_AnB: mwb0343236_d8ee_47a3_911c_d22c042081af_AnB + mwae7438d6_bdde_41b3_b31a_dd19d0d3e747_AnB -> mwd6d6d9b4_86de_46ea_aca6_e3586590afd0_AnB; Sigma28_RNAP_F*mwb0343236_d8ee_47a3_911c_d22c042081af_AnB*mwae7438d6_bdde_41b3_b31a_dd19d0d3e747_AnB - Sigma28_RNAP_R*mwd6d6d9b4_86de_46ea_aca6_e3586590afd0_AnB;
    Sigma28_RNAP_F = 100; Sigma28_RNAP_R = 0.1;
  mw42ac8dce_20b4_4c63_881a_993611d03efc_AnB: mw94981671_7083_4440_8e82_63ca06f9d455_AnB + mw6f001bb3_24e7_4c91_8082_bada566d4832_AnB -> mw01a17d68_e849_4648_9303_7614457aa3ae_AnB; mw42ac8dce_20b4_4c63_881a_993611d03efc_AnB_TXTL_UTR_UTR1_F*mw94981671_7083_4440_8e82_63ca06f9d455_AnB*mw6f001bb3_24e7_4c91_8082_bada566d4832_AnB - mw42ac8dce_20b4_4c63_881a_993611d03efc_AnB_TXTL_UTR_UTR1_R*mw01a17d68_e849_4648_9303_7614457aa3ae_AnB;
    mw42ac8dce_20b4_4c63_881a_993611d03efc_AnB_TXTL_UTR_UTR1_F = 0.2; mw42ac8dce_20b4_4c63_881a_993611d03efc_AnB_TXTL_UTR_UTR1_R = 4;
  mw1bff152d_b1c8_4b79_ae40_54c01ac60883_AnB: mwc97b4dee_90db_42fb_bee2_0d78d764af26_AnB + mwb0343236_d8ee_47a3_911c_d22c042081af_AnB -> mwf72ff6eb_c3b5_4e87_82e0_f62c88a256a3_AnB; mw1bff152d_b1c8_4b79_ae40_54c01ac60883_AnB_TXTL_PLAC_RNAPbound_F*mwc97b4dee_90db_42fb_bee2_0d78d764af26_AnB*mwb0343236_d8ee_47a3_911c_d22c042081af_AnB - mw1bff152d_b1c8_4b79_ae40_54c01ac60883_AnB_TXTL_PLAC_RNAPbound_R*mwf72ff6eb_c3b5_4e87_82e0_f62c88a256a3_AnB;
    mw1bff152d_b1c8_4b79_ae40_54c01ac60883_AnB_TXTL_PLAC_RNAPbound_F = 20; mw1bff152d_b1c8_4b79_ae40_54c01ac60883_AnB_TXTL_PLAC_RNAPbound_R = 400;
  mw69c443cc_2003_4b67_8aac_acdb3d72beb7_AnB: mw289f18db_bdf0_4329_a3bd_8c2cbb880e62_AnB => mwf72ff6eb_c3b5_4e87_82e0_f62c88a256a3_AnB; mw69c443cc_2003_4b67_8aac_acdb3d72beb7_AnB_TXTL_NTP_consumption*mw289f18db_bdf0_4329_a3bd_8c2cbb880e62_AnB;
    mw69c443cc_2003_4b67_8aac_acdb3d72beb7_AnB_TXTL_NTP_consumption = 0.7487705;
  mwba97d6c0_ff50_48df_8f9b_e30102f5d77d_AnB: mwbf5884bf_d2f0_4af1_b95c_416abe1c97bb_AnB => mwb0343236_d8ee_47a3_911c_d22c042081af_AnB + mwc97b4dee_90db_42fb_bee2_0d78d764af26_AnB; mwba97d6c0_ff50_48df_8f9b_e30102f5d77d_AnB_TXTL_RNAPBOUND_TERMINATION_RATE*mwbf5884bf_d2f0_4af1_b95c_416abe1c97bb_AnB;
    mwba97d6c0_ff50_48df_8f9b_e30102f5d77d_AnB_TXTL_RNAPBOUND_TERMINATION_RATE = 0.05;
  mwd691ed66_2116_49de_9412_6c2055c8e9d2_AnB: mwf72ff6eb_c3b5_4e87_82e0_f62c88a256a3_AnB + mwf647df8e_575b_47cf_a794_3b55a6d29079_AnB -> mwcc85e235_850f_49c4_993b_ed7a29834d65_AnB; mwd691ed66_2116_49de_9412_6c2055c8e9d2_AnB_TXTL_NTP_RNAP_F*mwf72ff6eb_c3b5_4e87_82e0_f62c88a256a3_AnB*mwf647df8e_575b_47cf_a794_3b55a6d29079_AnB - mwd691ed66_2116_49de_9412_6c2055c8e9d2_AnB_TXTL_NTP_RNAP_R*mwcc85e235_850f_49c4_993b_ed7a29834d65_AnB;
    mwd691ed66_2116_49de_9412_6c2055c8e9d2_AnB_TXTL_NTP_RNAP_F = 1000; mwd691ed66_2116_49de_9412_6c2055c8e9d2_AnB_TXTL_NTP_RNAP_R = 120000000;
  mwb7a7ed2f_4f65_403d_a57a_d61243b9369f_AnB: mwf72ff6eb_c3b5_4e87_82e0_f62c88a256a3_AnB + mwa1abaec4_a028_468a_83dd_9b06410bb615_AnB -> mw00e1225c_9093_4a2f_800b_490b69f71a46_AnB; mwb7a7ed2f_4f65_403d_a57a_d61243b9369f_AnB_TXTL_NTP_RNAP_F*mwf72ff6eb_c3b5_4e87_82e0_f62c88a256a3_AnB*mwa1abaec4_a028_468a_83dd_9b06410bb615_AnB - mwb7a7ed2f_4f65_403d_a57a_d61243b9369f_AnB_TXTL_NTP_RNAP_R*mw00e1225c_9093_4a2f_800b_490b69f71a46_AnB;
    mwb7a7ed2f_4f65_403d_a57a_d61243b9369f_AnB_TXTL_NTP_RNAP_F = 1000; mwb7a7ed2f_4f65_403d_a57a_d61243b9369f_AnB_TXTL_NTP_RNAP_R = 120000000;
  mwb46f6fe6_240d_4b20_a130_4d79435e082c_AnB: mwcc85e235_850f_49c4_993b_ed7a29834d65_AnB + mwa1abaec4_a028_468a_83dd_9b06410bb615_AnB -> mw289f18db_bdf0_4329_a3bd_8c2cbb880e62_AnB; mwb46f6fe6_240d_4b20_a130_4d79435e082c_AnB_TXTL_NTP_RNAP_F*mwcc85e235_850f_49c4_993b_ed7a29834d65_AnB*mwa1abaec4_a028_468a_83dd_9b06410bb615_AnB - mwb46f6fe6_240d_4b20_a130_4d79435e082c_AnB_TXTL_NTP_RNAP_R*mw289f18db_bdf0_4329_a3bd_8c2cbb880e62_AnB;
    mwb46f6fe6_240d_4b20_a130_4d79435e082c_AnB_TXTL_NTP_RNAP_F = 1; mwb46f6fe6_240d_4b20_a130_4d79435e082c_AnB_TXTL_NTP_RNAP_R = 120000;
  mwbb3c6a06_0cd8_4dd5_a2ad_897ae1692fbb_AnB: mw00e1225c_9093_4a2f_800b_490b69f71a46_AnB + mwf647df8e_575b_47cf_a794_3b55a6d29079_AnB -> mw289f18db_bdf0_4329_a3bd_8c2cbb880e62_AnB; mwbb3c6a06_0cd8_4dd5_a2ad_897ae1692fbb_AnB_TXTL_NTP_RNAP_F*mw00e1225c_9093_4a2f_800b_490b69f71a46_AnB*mwf647df8e_575b_47cf_a794_3b55a6d29079_AnB - mwbb3c6a06_0cd8_4dd5_a2ad_897ae1692fbb_AnB_TXTL_NTP_RNAP_R*mw289f18db_bdf0_4329_a3bd_8c2cbb880e62_AnB;
    mwbb3c6a06_0cd8_4dd5_a2ad_897ae1692fbb_AnB_TXTL_NTP_RNAP_F = 1; mwbb3c6a06_0cd8_4dd5_a2ad_897ae1692fbb_AnB_TXTL_NTP_RNAP_R = 120000;
  mwd84e5b81_70b4_4b8c_b4a0_8958924f0fd3_AnB: mw289f18db_bdf0_4329_a3bd_8c2cbb880e62_AnB => mwbf5884bf_d2f0_4af1_b95c_416abe1c97bb_AnB + mw94981671_7083_4440_8e82_63ca06f9d455_AnB; mwd84e5b81_70b4_4b8c_b4a0_8958924f0fd3_AnB_TXTL_transcription_rate1*mw289f18db_bdf0_4329_a3bd_8c2cbb880e62_AnB;
    mwd84e5b81_70b4_4b8c_b4a0_8958924f0fd3_AnB_TXTL_transcription_rate1 = 0.001229508;
  mwde1214fd_2c37_4a6a_a071_f4999b687f3f_AnB: mw01a17d68_e849_4648_9303_7614457aa3ae_AnB + mwf5ed5ed1_b9a2_47a0_b2df_6763250cc3ad_AnB -> mw04d084c6_3e64_481b_82f2_8dbbd5f7f071_AnB; mwde1214fd_2c37_4a6a_a071_f4999b687f3f_AnB_TL_AA_F*mw01a17d68_e849_4648_9303_7614457aa3ae_AnB*mwf5ed5ed1_b9a2_47a0_b2df_6763250cc3ad_AnB - mwde1214fd_2c37_4a6a_a071_f4999b687f3f_AnB_TL_AA_R*mw04d084c6_3e64_481b_82f2_8dbbd5f7f071_AnB;
    mwde1214fd_2c37_4a6a_a071_f4999b687f3f_AnB_TL_AA_F = 300; mwde1214fd_2c37_4a6a_a071_f4999b687f3f_AnB_TL_AA_R = 0.1;
  mwddb30a43_d03e_4895_a510_f9c980b7f7be_AnB: mw04d084c6_3e64_481b_82f2_8dbbd5f7f071_AnB + 2 mwf647df8e_575b_47cf_a794_3b55a6d29079_AnB -> mw81108bd5_3dc6_4990_8ace_139d7e9bf2d7_AnB; mwddb30a43_d03e_4895_a510_f9c980b7f7be_AnB_TL_AGTP_F*mw04d084c6_3e64_481b_82f2_8dbbd5f7f071_AnB*mwf647df8e_575b_47cf_a794_3b55a6d29079_AnB^2 - mwddb30a43_d03e_4895_a510_f9c980b7f7be_AnB_TL_AGTP_R*mw81108bd5_3dc6_4990_8ace_139d7e9bf2d7_AnB;
    mwddb30a43_d03e_4895_a510_f9c980b7f7be_AnB_TL_AGTP_F = 30; mwddb30a43_d03e_4895_a510_f9c980b7f7be_AnB_TL_AGTP_R = 10;
  mwbdcbfc49_3ae8_460c_a361_24922d0ee44b_AnB: mw81108bd5_3dc6_4990_8ace_139d7e9bf2d7_AnB => mwb5b249fa_3a1f_4ece_8b1e_5ce0f68b0e2a_AnB; mwbdcbfc49_3ae8_460c_a361_24922d0ee44b_AnB_TXTL_TL_AA_consumption*mw81108bd5_3dc6_4990_8ace_139d7e9bf2d7_AnB;
    mwbdcbfc49_3ae8_460c_a361_24922d0ee44b_AnB_TXTL_TL_AA_consumption = 0.03;
  mwf341be44_a2ce_4ded_95a7_23ee7dfcb534_AnB: mw81108bd5_3dc6_4990_8ace_139d7e9bf2d7_AnB => mwb5b249fa_3a1f_4ece_8b1e_5ce0f68b0e2a_AnB + mwae7438d6_bdde_41b3_b31a_dd19d0d3e747_AnB; mwf341be44_a2ce_4ded_95a7_23ee7dfcb534_AnB_TXTL_TL_rate*mw81108bd5_3dc6_4990_8ace_139d7e9bf2d7_AnB;
    mwf341be44_a2ce_4ded_95a7_23ee7dfcb534_AnB_TXTL_TL_rate = 0.01;
  mwc39beedd_897c_4839_acfe_5c9c5a0037c5_AnB: mwb5b249fa_3a1f_4ece_8b1e_5ce0f68b0e2a_AnB => mw94981671_7083_4440_8e82_63ca06f9d455_AnB + mw6f001bb3_24e7_4c91_8082_bada566d4832_AnB; mwc39beedd_897c_4839_acfe_5c9c5a0037c5_AnB_TXTL_RIBOBOUND_TERMINATION_RATE*mwb5b249fa_3a1f_4ece_8b1e_5ce0f68b0e2a_AnB;
    mwc39beedd_897c_4839_acfe_5c9c5a0037c5_AnB_TXTL_RIBOBOUND_TERMINATION_RATE = 50;
  mw79c93e98_3bc9_46ff_a23a_dba8c8d75b8d_AnB: mw94981671_7083_4440_8e82_63ca06f9d455_AnB + mw0ba92b06_a96b_4b93_801c_b589b9715ad4_AnB -> mw5d7f31c9_fcfa_43be_ad67_8fb65cd7fa37_AnB; mw79c93e98_3bc9_46ff_a23a_dba8c8d75b8d_AnB_TXTL_RNAdeg_F*mw94981671_7083_4440_8e82_63ca06f9d455_AnB*mw0ba92b06_a96b_4b93_801c_b589b9715ad4_AnB - mw79c93e98_3bc9_46ff_a23a_dba8c8d75b8d_AnB_TXTL_RNAdeg_R*mw5d7f31c9_fcfa_43be_ad67_8fb65cd7fa37_AnB;
    mw79c93e98_3bc9_46ff_a23a_dba8c8d75b8d_AnB_TXTL_RNAdeg_F = 10; mw79c93e98_3bc9_46ff_a23a_dba8c8d75b8d_AnB_TXTL_RNAdeg_R = 2000;
  mw697021d5_884b_42da_ab3d_69e8d1090bd9_AnB: mw5d7f31c9_fcfa_43be_ad67_8fb65cd7fa37_AnB => mw0ba92b06_a96b_4b93_801c_b589b9715ad4_AnB; mw697021d5_884b_42da_ab3d_69e8d1090bd9_AnB_TXTL_RNAdeg_F*mw5d7f31c9_fcfa_43be_ad67_8fb65cd7fa37_AnB;
    mw697021d5_884b_42da_ab3d_69e8d1090bd9_AnB_TXTL_RNAdeg_F = 0.002777778;
  mw3a97feb0_28c3_43a5_86cf_9be745321f4c_AnB: mw01a17d68_e849_4648_9303_7614457aa3ae_AnB + mw0ba92b06_a96b_4b93_801c_b589b9715ad4_AnB -> mw9dba7279_e0c9_48e6_ad52_a235ea58f439_AnB; mw3a97feb0_28c3_43a5_86cf_9be745321f4c_AnB_TXTL_RNAdeg_F*mw01a17d68_e849_4648_9303_7614457aa3ae_AnB*mw0ba92b06_a96b_4b93_801c_b589b9715ad4_AnB - mw3a97feb0_28c3_43a5_86cf_9be745321f4c_AnB_TXTL_RNAdeg_R*mw9dba7279_e0c9_48e6_ad52_a235ea58f439_AnB;
    mw3a97feb0_28c3_43a5_86cf_9be745321f4c_AnB_TXTL_RNAdeg_F = 10; mw3a97feb0_28c3_43a5_86cf_9be745321f4c_AnB_TXTL_RNAdeg_R = 2000;
  mw42ab8f2f_f753_4c89_8b5d_02f3047612f4_AnB: mw9dba7279_e0c9_48e6_ad52_a235ea58f439_AnB => mw0ba92b06_a96b_4b93_801c_b589b9715ad4_AnB + mw6f001bb3_24e7_4c91_8082_bada566d4832_AnB; mw42ab8f2f_f753_4c89_8b5d_02f3047612f4_AnB_TXTL_RNAdeg_F*mw9dba7279_e0c9_48e6_ad52_a235ea58f439_AnB;
    mw42ab8f2f_f753_4c89_8b5d_02f3047612f4_AnB_TXTL_RNAdeg_F = 0.002777778;
  mw0eb45da9_91ae_4986_930f_302b35186eb7_AnB: mw81108bd5_3dc6_4990_8ace_139d7e9bf2d7_AnB + mw0ba92b06_a96b_4b93_801c_b589b9715ad4_AnB -> mw7b9170d5_423b_4e8f_892e_4d196b1484b5_AnB; mw0eb45da9_91ae_4986_930f_302b35186eb7_AnB_TXTL_RNAdeg_F*mw81108bd5_3dc6_4990_8ace_139d7e9bf2d7_AnB*mw0ba92b06_a96b_4b93_801c_b589b9715ad4_AnB - mw0eb45da9_91ae_4986_930f_302b35186eb7_AnB_TXTL_RNAdeg_R*mw7b9170d5_423b_4e8f_892e_4d196b1484b5_AnB;
    mw0eb45da9_91ae_4986_930f_302b35186eb7_AnB_TXTL_RNAdeg_F = 10; mw0eb45da9_91ae_4986_930f_302b35186eb7_AnB_TXTL_RNAdeg_R = 2000;
  mw961362ff_53d4_4014_a7e9_d9ed54c6ce99_AnB: mw7b9170d5_423b_4e8f_892e_4d196b1484b5_AnB => mw0ba92b06_a96b_4b93_801c_b589b9715ad4_AnB + mwf5ed5ed1_b9a2_47a0_b2df_6763250cc3ad_AnB + 2 mwf647df8e_575b_47cf_a794_3b55a6d29079_AnB + mw6f001bb3_24e7_4c91_8082_bada566d4832_AnB; mw961362ff_53d4_4014_a7e9_d9ed54c6ce99_AnB_TXTL_RNAdeg_F*mw7b9170d5_423b_4e8f_892e_4d196b1484b5_AnB;
    mw961362ff_53d4_4014_a7e9_d9ed54c6ce99_AnB_TXTL_RNAdeg_F = 0.002777778;
  mwd1acecb9_57f4_463a_96f3_6e0a416e44cc_AnB: mwb5b249fa_3a1f_4ece_8b1e_5ce0f68b0e2a_AnB + mw0ba92b06_a96b_4b93_801c_b589b9715ad4_AnB -> mw77bd724a_07e9_485b_af15_1b91761e8481_AnB; mwd1acecb9_57f4_463a_96f3_6e0a416e44cc_AnB_TXTL_RNAdeg_F*mwb5b249fa_3a1f_4ece_8b1e_5ce0f68b0e2a_AnB*mw0ba92b06_a96b_4b93_801c_b589b9715ad4_AnB - mwd1acecb9_57f4_463a_96f3_6e0a416e44cc_AnB_TXTL_RNAdeg_R*mw77bd724a_07e9_485b_af15_1b91761e8481_AnB;
    mwd1acecb9_57f4_463a_96f3_6e0a416e44cc_AnB_TXTL_RNAdeg_F = 10; mwd1acecb9_57f4_463a_96f3_6e0a416e44cc_AnB_TXTL_RNAdeg_R = 2000;
  mw30d54971_fe2e_4d6e_912f_cb476cfd3a91_AnB: mw77bd724a_07e9_485b_af15_1b91761e8481_AnB => mw0ba92b06_a96b_4b93_801c_b589b9715ad4_AnB + mw6f001bb3_24e7_4c91_8082_bada566d4832_AnB; mw30d54971_fe2e_4d6e_912f_cb476cfd3a91_AnB_TXTL_RNAdeg_F*mw77bd724a_07e9_485b_af15_1b91761e8481_AnB;
    mw30d54971_fe2e_4d6e_912f_cb476cfd3a91_AnB_TXTL_RNAdeg_F = 0.002777778;
  mwc1c9891c_f05e_4265_9321_14ce3e828542_AnB: mw04d084c6_3e64_481b_82f2_8dbbd5f7f071_AnB + mw0ba92b06_a96b_4b93_801c_b589b9715ad4_AnB -> mw387556e3_bc1c_4873_8ad7_810e472e230b_AnB; mwc1c9891c_f05e_4265_9321_14ce3e828542_AnB_TXTL_RNAdeg_F*mw04d084c6_3e64_481b_82f2_8dbbd5f7f071_AnB*mw0ba92b06_a96b_4b93_801c_b589b9715ad4_AnB - mwc1c9891c_f05e_4265_9321_14ce3e828542_AnB_TXTL_RNAdeg_R*mw387556e3_bc1c_4873_8ad7_810e472e230b_AnB;
    mwc1c9891c_f05e_4265_9321_14ce3e828542_AnB_TXTL_RNAdeg_F = 10; mwc1c9891c_f05e_4265_9321_14ce3e828542_AnB_TXTL_RNAdeg_R = 2000;
  mwe184c951_2c83_4013_8d72_ce0477860df6_AnB: mw387556e3_bc1c_4873_8ad7_810e472e230b_AnB => mw0ba92b06_a96b_4b93_801c_b589b9715ad4_AnB + mwf5ed5ed1_b9a2_47a0_b2df_6763250cc3ad_AnB + mw6f001bb3_24e7_4c91_8082_bada566d4832_AnB; mwe184c951_2c83_4013_8d72_ce0477860df6_AnB_TXTL_RNAdeg_F*mw387556e3_bc1c_4873_8ad7_810e472e230b_AnB;
    mwe184c951_2c83_4013_8d72_ce0477860df6_AnB_TXTL_RNAdeg_F = 0.002777778;
  mw4326336c_505d_4ab5_a8b2_de7a1ccbb748_AnB: mwf647df8e_575b_47cf_a794_3b55a6d29079_AnB => mw1c60740a_9b26_49db_a02d_f9e424215ab8_AnB; mw7362d43e_23e2_4a10_b8fd_20940f881307_AnB*mwf647df8e_575b_47cf_a794_3b55a6d29079_AnB;

  // Events:
  event_203: at (time <= 5400): mw7362d43e_23e2_4a10_b8fd_20940f881307_AnB = 0;
  event_204: at (time > 5400): mw7362d43e_23e2_4a10_b8fd_20940f881307_AnB = 0.0002;

  // Unit definitions:
  unit volume = litre;
  unit substance = mole;
  unit area = metre^2;
end
