// SBML level 2 version 4

model mix_of_E30VNPRL_E30VNPRL_gene_expression()
  // mix_of_E30VNPRL_E30VNPRL_gene_expression

  // Compartments:
  compartment contents = 1;

  // Species:
  species RNAP in contents = 100.0001/contents;
  species Ribo in contents = 30.00002/contents;
  species RecBCD in contents = 5.000003/contents;
  species RNase in contents = 100.0001/contents;
  species AGTP in contents = 3180048/contents;
  species CUTP in contents = 1908029/contents;
  species AA in contents = 3.180048e7/contents;
  species protein_tetR in contents = 0;
  species aTc in contents = 0;
  species protein_tetRdimer in contents = 0;
  species RNA_utr1_tetR in contents = 0; RNA_utr1_tetR is "RNA utr1--tetR";
  species Ribo_RNA_utr1_tetR in contents = 0; Ribo_RNA_utr1_tetR is "Ribo:RNA utr1--tetR";
  species DNA_psigX_utr1_tetR in contents = 0.5000003/contents; DNA_psigX_utr1_tetR is "DNA psigX--utr1--tetR";
  species RNAPSIGX in contents = 0;
  species RNAPSIGX_DNA_psigX_utr1_tetR in contents = 0; RNAPSIGX_DNA_psigX_utr1_tetR is "RNAPSIGX:DNA psigX--utr1--tetR";
  species AA_2AGTP_Ribo_RNA_utr1_tetR in contents = 0; AA_2AGTP_Ribo_RNA_utr1_tetR is "AA:2AGTP:Ribo:RNA utr1--tetR";
  species term_Ribo_RNA_utr1_tetR in contents = 0; term_Ribo_RNA_utr1_tetR is "term_Ribo:RNA utr1--tetR";
  species protein_sigmaX in contents = 0;
  species RNA_utr1_sigmaX in contents = 0; RNA_utr1_sigmaX is "RNA utr1--sigmaX";
  species Ribo_RNA_utr1_sigmaX in contents = 0; Ribo_RNA_utr1_sigmaX is "Ribo:RNA utr1--sigmaX";
  species DNA_plac_utr1_sigmaX in contents = 5.000003/contents; DNA_plac_utr1_sigmaX is "DNA plac--utr1--sigmaX";
  species RNAP_DNA_plac_utr1_sigmaX in contents = 0; RNAP_DNA_plac_utr1_sigmaX is "RNAP:DNA plac--utr1--sigmaX";
  species CUTP_AGTP_RNAP_DNA_plac_utr1_sigmaX in contents = 0; CUTP_AGTP_RNAP_DNA_plac_utr1_sigmaX is "CUTP:AGTP:RNAP:DNA plac--utr1--sigmaX";
  species term_RNAP_DNA_plac_utr1_sigmaX in contents = 0; term_RNAP_DNA_plac_utr1_sigmaX is "term_RNAP:DNA plac--utr1--sigmaX";
  species AA_2AGTP_Ribo_RNA_utr1_sigmaX in contents = 0; AA_2AGTP_Ribo_RNA_utr1_sigmaX is "AA:2AGTP:Ribo:RNA utr1--sigmaX";
  species term_Ribo_RNA_utr1_sigmaX in contents = 0; term_Ribo_RNA_utr1_sigmaX is "term_Ribo:RNA utr1--sigmaX";
  species _2_aTc_protein_tetRdimer in contents = 0; _2_aTc_protein_tetRdimer is "2 aTc:protein tetRdimer";
  species CUTP_AGTP_RNAPSIGX_DNA_psigX_utr1_tetR in contents = 0; CUTP_AGTP_RNAPSIGX_DNA_psigX_utr1_tetR is "CUTP:AGTP:RNAPSIGX:DNA psigX--utr1--tetR";
  species term_RNAPSIGX_DNA_psigX_utr1_tetR in contents = 0; term_RNAPSIGX_DNA_psigX_utr1_tetR is "term_RNAPSIGX:DNA psigX--utr1--tetR";
  species AGTP_RNAPSIGX_DNA_psigX_utr1_tetR in contents = 0; AGTP_RNAPSIGX_DNA_psigX_utr1_tetR is "AGTP:RNAPSIGX:DNA psigX--utr1--tetR";
  species CUTP_RNAPSIGX_DNA_psigX_utr1_tetR in contents = 0; CUTP_RNAPSIGX_DNA_psigX_utr1_tetR is "CUTP:RNAPSIGX:DNA psigX--utr1--tetR";
  species AA_Ribo_RNA_utr1_tetR in contents = 0; AA_Ribo_RNA_utr1_tetR is "AA:Ribo:RNA utr1--tetR";
  species RNA_utr1_tetR_RNase in contents = 0; RNA_utr1_tetR_RNase is "RNA utr1--tetR:RNase";
  species Ribo_RNA_utr1_tetR_RNase in contents = 0; Ribo_RNA_utr1_tetR_RNase is "Ribo:RNA utr1--tetR:RNase";
  species AA_2AGTP_Ribo_RNA_utr1_tetR_RNase in contents = 0; AA_2AGTP_Ribo_RNA_utr1_tetR_RNase is "AA:2AGTP:Ribo:RNA utr1--tetR:RNase";
  species term_Ribo_RNA_utr1_tetR_RNase in contents = 0; term_Ribo_RNA_utr1_tetR_RNase is "term_Ribo:RNA utr1--tetR:RNase";
  species AA_Ribo_RNA_utr1_tetR_RNase in contents = 0; AA_Ribo_RNA_utr1_tetR_RNase is "AA:Ribo:RNA utr1--tetR:RNase";
  species AGTP_RNAP_DNA_plac_utr1_sigmaX in contents = 0; AGTP_RNAP_DNA_plac_utr1_sigmaX is "AGTP:RNAP:DNA plac--utr1--sigmaX";
  species CUTP_RNAP_DNA_plac_utr1_sigmaX in contents = 0; CUTP_RNAP_DNA_plac_utr1_sigmaX is "CUTP:RNAP:DNA plac--utr1--sigmaX";
  species AA_Ribo_RNA_utr1_sigmaX in contents = 0; AA_Ribo_RNA_utr1_sigmaX is "AA:Ribo:RNA utr1--sigmaX";
  species RNA_utr1_sigmaX_RNase in contents = 0; RNA_utr1_sigmaX_RNase is "RNA utr1--sigmaX:RNase";
  species Ribo_RNA_utr1_sigmaX_RNase in contents = 0; Ribo_RNA_utr1_sigmaX_RNase is "Ribo:RNA utr1--sigmaX:RNase";
  species AA_2AGTP_Ribo_RNA_utr1_sigmaX_RNase in contents = 0; AA_2AGTP_Ribo_RNA_utr1_sigmaX_RNase is "AA:2AGTP:Ribo:RNA utr1--sigmaX:RNase";
  species term_Ribo_RNA_utr1_sigmaX_RNase in contents = 0; term_Ribo_RNA_utr1_sigmaX_RNase is "term_Ribo:RNA utr1--sigmaX:RNase";
  species AA_Ribo_RNA_utr1_sigmaX_RNase in contents = 0; AA_Ribo_RNA_utr1_sigmaX_RNase is "AA:Ribo:RNA utr1--sigmaX:RNase";
  species AGTP_USED in contents = 0;

  // Parameters:
  AGTPdeg_F = 0;

  // Reactions:
  reaction_49: protein_tetRdimer + 2 aTc -> _2_aTc_protein_tetRdimer; TXTL_INDUCER_TETR_ATC_F*protein_tetRdimer*aTc^2 - TXTL_INDUCER_TETR_ATC_R*_2_aTc_protein_tetRdimer;
    TXTL_INDUCER_TETR_ATC_F = 1e-5; TXTL_INDUCER_TETR_ATC_R = 0.1;
  reaction_50: 2 protein_tetR -> protein_tetRdimer; kf*protein_tetR^2 - kr*protein_tetRdimer;
    kf = 1; kr = 1;
  reaction_51: RNA_utr1_tetR + Ribo -> Ribo_RNA_utr1_tetR; reaction_51_TXTL_UTR_UTR1_F*RNA_utr1_tetR*Ribo - reaction_51_TXTL_UTR_UTR1_R*Ribo_RNA_utr1_tetR;
    reaction_51_TXTL_UTR_UTR1_F = 0.2; reaction_51_TXTL_UTR_UTR1_R = 4;
  reaction_52: DNA_psigX_utr1_tetR + RNAPSIGX -> RNAPSIGX_DNA_psigX_utr1_tetR; TXTL_SIGX_RNAPbound_F*DNA_psigX_utr1_tetR*RNAPSIGX - TXTL_SIGX_RNAPbound_R*RNAPSIGX_DNA_psigX_utr1_tetR;
    TXTL_SIGX_RNAPbound_F = 10; TXTL_SIGX_RNAPbound_R = 0.1;
  reaction_53: CUTP_AGTP_RNAPSIGX_DNA_psigX_utr1_tetR => RNAPSIGX_DNA_psigX_utr1_tetR; reaction_53_TXTL_NTP_consumption*CUTP_AGTP_RNAPSIGX_DNA_psigX_utr1_tetR;
    reaction_53_TXTL_NTP_consumption = 0.7487705;
  reaction_54: term_RNAPSIGX_DNA_psigX_utr1_tetR => RNAPSIGX + DNA_psigX_utr1_tetR; reaction_54_TXTL_RNAPBOUND_TERMINATION_RATE*term_RNAPSIGX_DNA_psigX_utr1_tetR;
    reaction_54_TXTL_RNAPBOUND_TERMINATION_RATE = 0.05;
  reaction_55: RNAPSIGX_DNA_psigX_utr1_tetR + AGTP -> AGTP_RNAPSIGX_DNA_psigX_utr1_tetR; reaction_55_TXTL_NTP_RNAP_F*RNAPSIGX_DNA_psigX_utr1_tetR*AGTP - reaction_55_TXTL_NTP_RNAP_R*AGTP_RNAPSIGX_DNA_psigX_utr1_tetR;
    reaction_55_TXTL_NTP_RNAP_F = 1000; reaction_55_TXTL_NTP_RNAP_R = 120000000;
  reaction_56: RNAPSIGX_DNA_psigX_utr1_tetR + CUTP -> CUTP_RNAPSIGX_DNA_psigX_utr1_tetR; reaction_56_TXTL_NTP_RNAP_F*RNAPSIGX_DNA_psigX_utr1_tetR*CUTP - reaction_56_TXTL_NTP_RNAP_R*CUTP_RNAPSIGX_DNA_psigX_utr1_tetR;
    reaction_56_TXTL_NTP_RNAP_F = 1000; reaction_56_TXTL_NTP_RNAP_R = 120000000;
  reaction_57: AGTP_RNAPSIGX_DNA_psigX_utr1_tetR + CUTP -> CUTP_AGTP_RNAPSIGX_DNA_psigX_utr1_tetR; reaction_57_TXTL_NTP_RNAP_F*AGTP_RNAPSIGX_DNA_psigX_utr1_tetR*CUTP - reaction_57_TXTL_NTP_RNAP_R*CUTP_AGTP_RNAPSIGX_DNA_psigX_utr1_tetR;
    reaction_57_TXTL_NTP_RNAP_F = 1; reaction_57_TXTL_NTP_RNAP_R = 120000;
  reaction_58: CUTP_RNAPSIGX_DNA_psigX_utr1_tetR + AGTP -> CUTP_AGTP_RNAPSIGX_DNA_psigX_utr1_tetR; reaction_58_TXTL_NTP_RNAP_F*CUTP_RNAPSIGX_DNA_psigX_utr1_tetR*AGTP - reaction_58_TXTL_NTP_RNAP_R*CUTP_AGTP_RNAPSIGX_DNA_psigX_utr1_tetR;
    reaction_58_TXTL_NTP_RNAP_F = 1; reaction_58_TXTL_NTP_RNAP_R = 120000;
  reaction_59: CUTP_AGTP_RNAPSIGX_DNA_psigX_utr1_tetR => term_RNAPSIGX_DNA_psigX_utr1_tetR + RNA_utr1_tetR; reaction_59_TXTL_transcription_rate1*CUTP_AGTP_RNAPSIGX_DNA_psigX_utr1_tetR;
    reaction_59_TXTL_transcription_rate1 = 0.001229508;
  reaction_60: Ribo_RNA_utr1_tetR + AA -> AA_Ribo_RNA_utr1_tetR; reaction_60_TL_AA_F*Ribo_RNA_utr1_tetR*AA - reaction_60_TL_AA_R*AA_Ribo_RNA_utr1_tetR;
    reaction_60_TL_AA_F = 300; reaction_60_TL_AA_R = 0.1;
  reaction_61: AA_Ribo_RNA_utr1_tetR + 2 AGTP -> AA_2AGTP_Ribo_RNA_utr1_tetR; reaction_61_TL_AGTP_F*AA_Ribo_RNA_utr1_tetR*AGTP^2 - reaction_61_TL_AGTP_R*AA_2AGTP_Ribo_RNA_utr1_tetR;
    reaction_61_TL_AGTP_F = 30; reaction_61_TL_AGTP_R = 10;
  reaction_62: AA_2AGTP_Ribo_RNA_utr1_tetR => term_Ribo_RNA_utr1_tetR; reaction_62_TXTL_TL_AA_consumption*AA_2AGTP_Ribo_RNA_utr1_tetR;
    reaction_62_TXTL_TL_AA_consumption = 0.03;
  reaction_63: AA_2AGTP_Ribo_RNA_utr1_tetR => term_Ribo_RNA_utr1_tetR + protein_tetR; reaction_63_TXTL_TL_rate*AA_2AGTP_Ribo_RNA_utr1_tetR;
    reaction_63_TXTL_TL_rate = 0.01;
  reaction_64: term_Ribo_RNA_utr1_tetR => RNA_utr1_tetR + Ribo; reaction_64_TXTL_RIBOBOUND_TERMINATION_RATE*term_Ribo_RNA_utr1_tetR;
    reaction_64_TXTL_RIBOBOUND_TERMINATION_RATE = 50;
  reaction_65: RNA_utr1_tetR + RNase -> RNA_utr1_tetR_RNase; reaction_65_TXTL_RNAdeg_F*RNA_utr1_tetR*RNase - reaction_65_TXTL_RNAdeg_R*RNA_utr1_tetR_RNase;
    reaction_65_TXTL_RNAdeg_F = 10; reaction_65_TXTL_RNAdeg_R = 2000;
  reaction_66: RNA_utr1_tetR_RNase => RNase; reaction_66_TXTL_RNAdeg_F*RNA_utr1_tetR_RNase;
    reaction_66_TXTL_RNAdeg_F = 0.002777778;
  reaction_67: Ribo_RNA_utr1_tetR + RNase -> Ribo_RNA_utr1_tetR_RNase; reaction_67_TXTL_RNAdeg_F*Ribo_RNA_utr1_tetR*RNase - reaction_67_TXTL_RNAdeg_R*Ribo_RNA_utr1_tetR_RNase;
    reaction_67_TXTL_RNAdeg_F = 10; reaction_67_TXTL_RNAdeg_R = 2000;
  reaction_68: Ribo_RNA_utr1_tetR_RNase => RNase + Ribo; reaction_68_TXTL_RNAdeg_F*Ribo_RNA_utr1_tetR_RNase;
    reaction_68_TXTL_RNAdeg_F = 0.002777778;
  reaction_69: AA_2AGTP_Ribo_RNA_utr1_tetR + RNase -> AA_2AGTP_Ribo_RNA_utr1_tetR_RNase; reaction_69_TXTL_RNAdeg_F*AA_2AGTP_Ribo_RNA_utr1_tetR*RNase - reaction_69_TXTL_RNAdeg_R*AA_2AGTP_Ribo_RNA_utr1_tetR_RNase;
    reaction_69_TXTL_RNAdeg_F = 10; reaction_69_TXTL_RNAdeg_R = 2000;
  reaction_70: AA_2AGTP_Ribo_RNA_utr1_tetR_RNase => RNase + AA + 2 AGTP + Ribo; reaction_70_TXTL_RNAdeg_F*AA_2AGTP_Ribo_RNA_utr1_tetR_RNase;
    reaction_70_TXTL_RNAdeg_F = 0.002777778;
  reaction_71: term_Ribo_RNA_utr1_tetR + RNase -> term_Ribo_RNA_utr1_tetR_RNase; reaction_71_TXTL_RNAdeg_F*term_Ribo_RNA_utr1_tetR*RNase - reaction_71_TXTL_RNAdeg_R*term_Ribo_RNA_utr1_tetR_RNase;
    reaction_71_TXTL_RNAdeg_F = 10; reaction_71_TXTL_RNAdeg_R = 2000;
  reaction_72: term_Ribo_RNA_utr1_tetR_RNase => RNase + Ribo; reaction_72_TXTL_RNAdeg_F*term_Ribo_RNA_utr1_tetR_RNase;
    reaction_72_TXTL_RNAdeg_F = 0.002777778;
  reaction_73: AA_Ribo_RNA_utr1_tetR + RNase -> AA_Ribo_RNA_utr1_tetR_RNase; reaction_73_TXTL_RNAdeg_F*AA_Ribo_RNA_utr1_tetR*RNase - reaction_73_TXTL_RNAdeg_R*AA_Ribo_RNA_utr1_tetR_RNase;
    reaction_73_TXTL_RNAdeg_F = 10; reaction_73_TXTL_RNAdeg_R = 2000;
  reaction_74: AA_Ribo_RNA_utr1_tetR_RNase => RNase + AA + Ribo; reaction_74_TXTL_RNAdeg_F*AA_Ribo_RNA_utr1_tetR_RNase;
    reaction_74_TXTL_RNAdeg_F = 0.002777778;
  reaction_75: RNAP + protein_sigmaX -> RNAPSIGX; SigmaX_RNAP_F*RNAP*protein_sigmaX - SigmaX_RNAP_R*RNAPSIGX;
    SigmaX_RNAP_F = 100; SigmaX_RNAP_R = 0.1;
  reaction_76: RNA_utr1_sigmaX + Ribo -> Ribo_RNA_utr1_sigmaX; reaction_76_TXTL_UTR_UTR1_F*RNA_utr1_sigmaX*Ribo - reaction_76_TXTL_UTR_UTR1_R*Ribo_RNA_utr1_sigmaX;
    reaction_76_TXTL_UTR_UTR1_F = 0.2; reaction_76_TXTL_UTR_UTR1_R = 4;
  reaction_77: DNA_plac_utr1_sigmaX + RNAP -> RNAP_DNA_plac_utr1_sigmaX; TXTL_PLAC_RNAPbound_F*DNA_plac_utr1_sigmaX*RNAP - TXTL_PLAC_RNAPbound_R*RNAP_DNA_plac_utr1_sigmaX;
    TXTL_PLAC_RNAPbound_F = 20; TXTL_PLAC_RNAPbound_R = 400;
  reaction_78: CUTP_AGTP_RNAP_DNA_plac_utr1_sigmaX => RNAP_DNA_plac_utr1_sigmaX; reaction_78_TXTL_NTP_consumption*CUTP_AGTP_RNAP_DNA_plac_utr1_sigmaX;
    reaction_78_TXTL_NTP_consumption = 0.7485294;
  reaction_79: term_RNAP_DNA_plac_utr1_sigmaX => RNAP + DNA_plac_utr1_sigmaX; reaction_79_TXTL_RNAPBOUND_TERMINATION_RATE*term_RNAP_DNA_plac_utr1_sigmaX;
    reaction_79_TXTL_RNAPBOUND_TERMINATION_RATE = 0.05;
  reaction_80: RNAP_DNA_plac_utr1_sigmaX + AGTP -> AGTP_RNAP_DNA_plac_utr1_sigmaX; reaction_80_TXTL_NTP_RNAP_F*RNAP_DNA_plac_utr1_sigmaX*AGTP - reaction_80_TXTL_NTP_RNAP_R*AGTP_RNAP_DNA_plac_utr1_sigmaX;
    reaction_80_TXTL_NTP_RNAP_F = 1000; reaction_80_TXTL_NTP_RNAP_R = 120000000;
  reaction_81: RNAP_DNA_plac_utr1_sigmaX + CUTP -> CUTP_RNAP_DNA_plac_utr1_sigmaX; reaction_81_TXTL_NTP_RNAP_F*RNAP_DNA_plac_utr1_sigmaX*CUTP - reaction_81_TXTL_NTP_RNAP_R*CUTP_RNAP_DNA_plac_utr1_sigmaX;
    reaction_81_TXTL_NTP_RNAP_F = 1000; reaction_81_TXTL_NTP_RNAP_R = 120000000;
  reaction_82: AGTP_RNAP_DNA_plac_utr1_sigmaX + CUTP -> CUTP_AGTP_RNAP_DNA_plac_utr1_sigmaX; reaction_82_TXTL_NTP_RNAP_F*AGTP_RNAP_DNA_plac_utr1_sigmaX*CUTP - reaction_82_TXTL_NTP_RNAP_R*CUTP_AGTP_RNAP_DNA_plac_utr1_sigmaX;
    reaction_82_TXTL_NTP_RNAP_F = 1; reaction_82_TXTL_NTP_RNAP_R = 120000;
  reaction_83: CUTP_RNAP_DNA_plac_utr1_sigmaX + AGTP -> CUTP_AGTP_RNAP_DNA_plac_utr1_sigmaX; reaction_83_TXTL_NTP_RNAP_F*CUTP_RNAP_DNA_plac_utr1_sigmaX*AGTP - reaction_83_TXTL_NTP_RNAP_R*CUTP_AGTP_RNAP_DNA_plac_utr1_sigmaX;
    reaction_83_TXTL_NTP_RNAP_F = 1; reaction_83_TXTL_NTP_RNAP_R = 120000;
  reaction_84: CUTP_AGTP_RNAP_DNA_plac_utr1_sigmaX => term_RNAP_DNA_plac_utr1_sigmaX + RNA_utr1_sigmaX; reaction_84_TXTL_transcription_rate1*CUTP_AGTP_RNAP_DNA_plac_utr1_sigmaX;
    reaction_84_TXTL_transcription_rate1 = 0.001470588;
  reaction_85: Ribo_RNA_utr1_sigmaX + AA -> AA_Ribo_RNA_utr1_sigmaX; reaction_85_TL_AA_F*Ribo_RNA_utr1_sigmaX*AA - reaction_85_TL_AA_R*AA_Ribo_RNA_utr1_sigmaX;
    reaction_85_TL_AA_F = 300; reaction_85_TL_AA_R = 0.1;
  reaction_86: AA_Ribo_RNA_utr1_sigmaX + 2 AGTP -> AA_2AGTP_Ribo_RNA_utr1_sigmaX; reaction_86_TL_AGTP_F*AA_Ribo_RNA_utr1_sigmaX*AGTP^2 - reaction_86_TL_AGTP_R*AA_2AGTP_Ribo_RNA_utr1_sigmaX;
    reaction_86_TL_AGTP_F = 30; reaction_86_TL_AGTP_R = 10;
  reaction_87: AA_2AGTP_Ribo_RNA_utr1_sigmaX => term_Ribo_RNA_utr1_sigmaX; reaction_87_TXTL_TL_AA_consumption*AA_2AGTP_Ribo_RNA_utr1_sigmaX;
    reaction_87_TXTL_TL_AA_consumption = 0.024;
  reaction_88: AA_2AGTP_Ribo_RNA_utr1_sigmaX => term_Ribo_RNA_utr1_sigmaX + protein_sigmaX; reaction_88_TXTL_TL_rate*AA_2AGTP_Ribo_RNA_utr1_sigmaX;
    reaction_88_TXTL_TL_rate = 0.012;
  reaction_89: term_Ribo_RNA_utr1_sigmaX => RNA_utr1_sigmaX + Ribo; reaction_89_TXTL_RIBOBOUND_TERMINATION_RATE*term_Ribo_RNA_utr1_sigmaX;
    reaction_89_TXTL_RIBOBOUND_TERMINATION_RATE = 50;
  reaction_90: RNA_utr1_sigmaX + RNase -> RNA_utr1_sigmaX_RNase; reaction_90_TXTL_RNAdeg_F*RNA_utr1_sigmaX*RNase - reaction_90_TXTL_RNAdeg_R*RNA_utr1_sigmaX_RNase;
    reaction_90_TXTL_RNAdeg_F = 10; reaction_90_TXTL_RNAdeg_R = 2000;
  reaction_91: RNA_utr1_sigmaX_RNase => RNase; reaction_91_TXTL_RNAdeg_F*RNA_utr1_sigmaX_RNase;
    reaction_91_TXTL_RNAdeg_F = 0.002777778;
  reaction_92: Ribo_RNA_utr1_sigmaX + RNase -> Ribo_RNA_utr1_sigmaX_RNase; reaction_92_TXTL_RNAdeg_F*Ribo_RNA_utr1_sigmaX*RNase - reaction_92_TXTL_RNAdeg_R*Ribo_RNA_utr1_sigmaX_RNase;
    reaction_92_TXTL_RNAdeg_F = 10; reaction_92_TXTL_RNAdeg_R = 2000;
  reaction_93: Ribo_RNA_utr1_sigmaX_RNase => RNase + Ribo; reaction_93_TXTL_RNAdeg_F*Ribo_RNA_utr1_sigmaX_RNase;
    reaction_93_TXTL_RNAdeg_F = 0.002777778;
  reaction_94: AA_2AGTP_Ribo_RNA_utr1_sigmaX + RNase -> AA_2AGTP_Ribo_RNA_utr1_sigmaX_RNase; reaction_94_TXTL_RNAdeg_F*AA_2AGTP_Ribo_RNA_utr1_sigmaX*RNase - reaction_94_TXTL_RNAdeg_R*AA_2AGTP_Ribo_RNA_utr1_sigmaX_RNase;
    reaction_94_TXTL_RNAdeg_F = 10; reaction_94_TXTL_RNAdeg_R = 2000;
  reaction_95: AA_2AGTP_Ribo_RNA_utr1_sigmaX_RNase => RNase + AA + 2 AGTP + Ribo; reaction_95_TXTL_RNAdeg_F*AA_2AGTP_Ribo_RNA_utr1_sigmaX_RNase;
    reaction_95_TXTL_RNAdeg_F = 0.002777778;
  reaction_96: term_Ribo_RNA_utr1_sigmaX + RNase -> term_Ribo_RNA_utr1_sigmaX_RNase; reaction_96_TXTL_RNAdeg_F*term_Ribo_RNA_utr1_sigmaX*RNase - reaction_96_TXTL_RNAdeg_R*term_Ribo_RNA_utr1_sigmaX_RNase;
    reaction_96_TXTL_RNAdeg_F = 10; reaction_96_TXTL_RNAdeg_R = 2000;
  reaction_97: term_Ribo_RNA_utr1_sigmaX_RNase => RNase + Ribo; reaction_97_TXTL_RNAdeg_F*term_Ribo_RNA_utr1_sigmaX_RNase;
    reaction_97_TXTL_RNAdeg_F = 0.002777778;
  reaction_98: AA_Ribo_RNA_utr1_sigmaX + RNase -> AA_Ribo_RNA_utr1_sigmaX_RNase; reaction_98_TXTL_RNAdeg_F*AA_Ribo_RNA_utr1_sigmaX*RNase - reaction_98_TXTL_RNAdeg_R*AA_Ribo_RNA_utr1_sigmaX_RNase;
    reaction_98_TXTL_RNAdeg_F = 10; reaction_98_TXTL_RNAdeg_R = 2000;
  reaction_99: AA_Ribo_RNA_utr1_sigmaX_RNase => RNase + AA + Ribo; reaction_99_TXTL_RNAdeg_F*AA_Ribo_RNA_utr1_sigmaX_RNase;
    reaction_99_TXTL_RNAdeg_F = 0.002777778;
  reaction_100: AGTP => AGTP_USED; AGTPdeg_F*AGTP;

  // Events:
  event_101: at (time <= 5400): AGTPdeg_F = 0;
  event_102: at (time > 5400): AGTPdeg_F = 0.0002;
end
