// SBML level 3 version 2

model combined_model_of__mw8a4ca32c_dea1_493b_acec_2cc45ea812c5_mw66ac99a0_0b6e_4b34_9d1d_e2300e577675()
  // model units - substance: substance, time: second, volume: volume, area: area, length: metre, extent: substance

  // Compartments:
  compartment cell = 5 volume;

  // Species:
  species mw497388cd_7f56_4af2_bfcb_e196dc07058a_A0 in cell = 100.0001/cell; mw497388cd_7f56_4af2_bfcb_e196dc07058a_A0 is "RNAP";
  species mw00f45716_be42_4897_b864_a105290636f8_A0 in cell = 30.00002/cell; mw00f45716_be42_4897_b864_a105290636f8_A0 is "Ribo";
  species mwfd140f3c_03f1_4f0c_8212_e52be5e321fb_A0 in cell = 5.000003/cell; mwfd140f3c_03f1_4f0c_8212_e52be5e321fb_A0 is "RecBCD";
  species mw9dcce971_94dd_43cc_a416_f9c5b92b7ea9_A0 in cell = 100.0001/cell; mw9dcce971_94dd_43cc_a416_f9c5b92b7ea9_A0 is "RNase";
  species mw11e10894_8a40_4b9a_a399_a74704855a0c_A0 in cell = 3180048/cell; mw11e10894_8a40_4b9a_a399_a74704855a0c_A0 is "AGTP";
  species mw32c91943_802e_414d_b5d0_ec55344d6143_A0 in cell = 1908029/cell; mw32c91943_802e_414d_b5d0_ec55344d6143_A0 is "CUTP";
  species mw1abcc808_a59f_467d_b71b_421398c97d74_A0 in cell = 3.180048e7/cell; mw1abcc808_a59f_467d_b71b_421398c97d74_A0 is "AA";
  species mwece12cb0_788c_4d80_aacb_158afc63be78_A0 in cell = 0; mwece12cb0_788c_4d80_aacb_158afc63be78_A0 is "protein deGFP";
  species mw4c49a944_cb18_4848_9df8_d269a16a522f_A0 in cell = 0; mw4c49a944_cb18_4848_9df8_d269a16a522f_A0 is "protein deGFP*";
  species mw13299012_9d61_4da1_9237_576f460c5bc3_A0 in cell = 0; mw13299012_9d61_4da1_9237_576f460c5bc3_A0 is "RNA utr1--deGFP";
  species mwa63b6bc2_3062_4276_906a_bec4375fd6f1_A0 in cell = 0; mwa63b6bc2_3062_4276_906a_bec4375fd6f1_A0 is "Ribo:RNA utr1--deGFP";
  species mw3720c25e_5f8d_4e8a_aa0c_2107880eedbe_A0 in cell = 2.000001/cell; mw3720c25e_5f8d_4e8a_aa0c_2107880eedbe_A0 is "DNA p28_ptet--utr1--deGFP";
  species mw5576dd43_d1a5_4349_963e_08d3372d976a_A0 in cell = 0; mw5576dd43_d1a5_4349_963e_08d3372d976a_A0 is "RNAP28";
  species mw9e0e02a5_500c_4c07_ae7f_25e3954419dd_A0 in cell = 0; mw9e0e02a5_500c_4c07_ae7f_25e3954419dd_A0 is "RNAP28:DNA p28_ptet--utr1--deGFP";
  species mw877dd876_63c5_4801_b778_351a377ac9de_A0 in cell = 0; mw877dd876_63c5_4801_b778_351a377ac9de_A0 is "protein sigma28";
  species mw10646eba_6639_4f41_8c69_c8836c5a7a15_A0 in cell = 0; mw10646eba_6639_4f41_8c69_c8836c5a7a15_A0 is "protein tetRdimer";
  species mwbf810b4c_29dd_4ee3_866c_269d7f98d18d_A0 in cell = 0; mwbf810b4c_29dd_4ee3_866c_269d7f98d18d_A0 is "CUTP:AGTP:RNAP28:DNA p28_ptet--utr1--deGFP";
  species mwcd4b43b7_65f5_4293_9bc2_bfd759c68d4c_A0 in cell = 0; mwcd4b43b7_65f5_4293_9bc2_bfd759c68d4c_A0 is "term_RNAP28:DNA p28_ptet--utr1--deGFP";
  species mweed2e9a7_0ff6_464c_ac3e_a15d4839d990_A0 in cell = 0; mweed2e9a7_0ff6_464c_ac3e_a15d4839d990_A0 is "RNAP28:DNA p28_ptet--utr1--deGFP:protein tetRdimer";
  species mw8a82a795_8fd6_4c99_826c_eb4192ff970a_A0 in cell = 0; mw8a82a795_8fd6_4c99_826c_eb4192ff970a_A0 is "CUTP:AGTP:RNAP28:DNA p28_ptet--utr1--deGFP:protein tetRdimer";
  species mw96c7bbf2_2143_48e3_92dc_3e94c3a5b59d_A0 in cell = 0; mw96c7bbf2_2143_48e3_92dc_3e94c3a5b59d_A0 is "term_RNAP28:DNA p28_ptet--utr1--deGFP:protein tetRdimer";
  species mwc8688555_e588_4ad9_9e55_f053892bfbf5_A0 in cell = 0; mwc8688555_e588_4ad9_9e55_f053892bfbf5_A0 is "AA:2AGTP:Ribo:RNA utr1--deGFP";
  species mw4976d02d_0642_4ab4_86ba_3cd5bf362bdc_A0 in cell = 0; mw4976d02d_0642_4ab4_86ba_3cd5bf362bdc_A0 is "term_Ribo:RNA utr1--deGFP";
  species mwfaa4de1c_e7a5_41cd_aa6c_26d34f2c1c0d_A0 in cell = 0; mwfaa4de1c_e7a5_41cd_aa6c_26d34f2c1c0d_A0 is "DNA p28_ptet--utr1--deGFP:protein tetRdimer";
  species mwffe28a9c_4ffe_40ae_acff_4b428ced7051_A0 in cell = 0; mwffe28a9c_4ffe_40ae_acff_4b428ced7051_A0 is "AGTP:RNAP28:DNA p28_ptet--utr1--deGFP";
  species mwf7e77d9f_bb65_4836_b45f_f3af4e3f6358_A0 in cell = 0; mwf7e77d9f_bb65_4836_b45f_f3af4e3f6358_A0 is "CUTP:RNAP28:DNA p28_ptet--utr1--deGFP";
  species mw9a0110d7_1397_4305_80a5_1a5a401d89e6_A0 in cell = 0; mw9a0110d7_1397_4305_80a5_1a5a401d89e6_A0 is "AGTP:RNAP28:DNA p28_ptet--utr1--deGFP:protein tetRdimer";
  species mw06b37943_9d2f_46cd_bc30_fa8d4c06a00b_A0 in cell = 0; mw06b37943_9d2f_46cd_bc30_fa8d4c06a00b_A0 is "CUTP:RNAP28:DNA p28_ptet--utr1--deGFP:protein tetRdimer";
  species mw9c4d2b72_7efb_42ac_9af0_2b6e68621f73_A0 in cell = 0; mw9c4d2b72_7efb_42ac_9af0_2b6e68621f73_A0 is "AA:Ribo:RNA utr1--deGFP";
  species mwf167ff93_6af9_4ad3_be9e_dfc18aaf6a7d_A0 in cell = 0; mwf167ff93_6af9_4ad3_be9e_dfc18aaf6a7d_A0 is "RNA utr1--deGFP:RNase";
  species mwd4d5d75f_2cfe_4a16_b934_d2513bb1aaea_A0 in cell = 0; mwd4d5d75f_2cfe_4a16_b934_d2513bb1aaea_A0 is "Ribo:RNA utr1--deGFP:RNase";
  species mwdc093847_c1af_4016_aad3_e2c57c50d317_A0 in cell = 0; mwdc093847_c1af_4016_aad3_e2c57c50d317_A0 is "AA:2AGTP:Ribo:RNA utr1--deGFP:RNase";
  species mw364eef4c_8431_467d_bd97_6172b02b980b_A0 in cell = 0; mw364eef4c_8431_467d_bd97_6172b02b980b_A0 is "term_Ribo:RNA utr1--deGFP:RNase";
  species mwb7433d67_6138_489c_b6ac_9fc9b22bbfcf_A0 in cell = 0; mwb7433d67_6138_489c_b6ac_9fc9b22bbfcf_A0 is "AA:Ribo:RNA utr1--deGFP:RNase";
  species mw17310191_3888_4d94_a11e_856eb88960c6_A0 in cell = 0; mw17310191_3888_4d94_a11e_856eb88960c6_A0 is "AGTP_USED";
  species mwce985125_4033_4878_99c7_9fa79ad26a8b_B1 in cell = 100.0001/cell; mwce985125_4033_4878_99c7_9fa79ad26a8b_B1 is "RNAP";
  species mwe288cc4d_bd5c_430e_acab_0b3cd6abf225_B1 in cell = 30.00002/cell; mwe288cc4d_bd5c_430e_acab_0b3cd6abf225_B1 is "Ribo";
  species mwc7abc1f1_3749_496b_a53e_d815e6bc4e98_B1 in cell = 5.000003/cell; mwc7abc1f1_3749_496b_a53e_d815e6bc4e98_B1 is "RecBCD";
  species mw4f453c9c_a4a1_4d03_a1b9_243580f1d942_B1 in cell = 100.0001/cell; mw4f453c9c_a4a1_4d03_a1b9_243580f1d942_B1 is "RNase";
  species mwe041b8b1_92b6_4c2b_8e78_5212f5644e01_B1 in cell = 3180048/cell; mwe041b8b1_92b6_4c2b_8e78_5212f5644e01_B1 is "AGTP";
  species mw0224b269_aae5_4ca1_a6e6_3607229b0a5b_B1 in cell = 1908029/cell; mw0224b269_aae5_4ca1_a6e6_3607229b0a5b_B1 is "CUTP";
  species mwe9049d27_bfa6_4d5d_a0d3_42922e3af392_B1 in cell = 3.180048e7/cell; mwe9049d27_bfa6_4d5d_a0d3_42922e3af392_B1 is "AA";
  species mwb072cf50_050b_4bec_97e3_cacc9c6c80b7_B1 in cell = 0; mwb072cf50_050b_4bec_97e3_cacc9c6c80b7_B1 is "protein tetR";
  species mwc00f5b5a_e21d_42e7_a0ca_6a931ffb4ec0_B1 in cell = 0; mwc00f5b5a_e21d_42e7_a0ca_6a931ffb4ec0_B1 is "aTc";
  species mweeccb4d5_ef92_4f38_88ef_1113e7e2f961_B1 in cell = 0; mweeccb4d5_ef92_4f38_88ef_1113e7e2f961_B1 is "protein tetRdimer";
  species mwcab9d721_d5fe_46ba_8abd_db6023744051_B1 in cell = 0; mwcab9d721_d5fe_46ba_8abd_db6023744051_B1 is "RNA utr1--tetR";
  species mwe49f90af_dd8c_43dd_948f_ad0a5a401277_B1 in cell = 0; mwe49f90af_dd8c_43dd_948f_ad0a5a401277_B1 is "Ribo:RNA utr1--tetR";
  species mwfb07f4d9_670f_4329_bed5_e109f421698e_B1 in cell = 0.5000003/cell; mwfb07f4d9_670f_4329_bed5_e109f421698e_B1 is "DNA psigX--utr1--tetR";
  species mwdc1e07fe_9c7d_43d2_9ae9_2e9bb4e826f3_B1 in cell = 0; mwdc1e07fe_9c7d_43d2_9ae9_2e9bb4e826f3_B1 is "RNAPSIGX";
  species mw3b47668e_6c7d_4a08_9772_b34bca7fb884_B1 in cell = 0; mw3b47668e_6c7d_4a08_9772_b34bca7fb884_B1 is "RNAPSIGX:DNA psigX--utr1--tetR";
  species mwe8451d4a_d4c8_405c_8ad4_6540824528ee_B1 in cell = 0; mwe8451d4a_d4c8_405c_8ad4_6540824528ee_B1 is "AA:2AGTP:Ribo:RNA utr1--tetR";
  species mwaff2c6b9_d770_4f47_a543_6039b764a7aa_B1 in cell = 0; mwaff2c6b9_d770_4f47_a543_6039b764a7aa_B1 is "term_Ribo:RNA utr1--tetR";
  species mw877e5da9_7092_45a9_a813_ef218b4c657d_B1 in cell = 0; mw877e5da9_7092_45a9_a813_ef218b4c657d_B1 is "protein sigmaX";
  species mw36edb9f5_273a_49e0_934c_53af44826f29_B1 in cell = 0; mw36edb9f5_273a_49e0_934c_53af44826f29_B1 is "RNA utr1--sigmaX";
  species mw3f61c48c_778f_42d0_bc92_da35a18105d3_B1 in cell = 0; mw3f61c48c_778f_42d0_bc92_da35a18105d3_B1 is "Ribo:RNA utr1--sigmaX";
  species mw29bca20f_bb74_4aea_a37a_0df7c5808987_B1 in cell = 5.000003/cell; mw29bca20f_bb74_4aea_a37a_0df7c5808987_B1 is "DNA plac--utr1--sigmaX";
  species mw2ee2aa24_784a_4146_b966_da635c45f303_B1 in cell = 0; mw2ee2aa24_784a_4146_b966_da635c45f303_B1 is "RNAP:DNA plac--utr1--sigmaX";
  species mwc92d9367_0957_4147_8d27_b4d8aaf06cb6_B1 in cell = 0; mwc92d9367_0957_4147_8d27_b4d8aaf06cb6_B1 is "CUTP:AGTP:RNAP:DNA plac--utr1--sigmaX";
  species mw6ff72b56_f396_433c_8b68_d4b90158ef92_B1 in cell = 0; mw6ff72b56_f396_433c_8b68_d4b90158ef92_B1 is "term_RNAP:DNA plac--utr1--sigmaX";
  species mw28e4173c_cdc1_46d3_a5fc_1ef799b41f32_B1 in cell = 0; mw28e4173c_cdc1_46d3_a5fc_1ef799b41f32_B1 is "AA:2AGTP:Ribo:RNA utr1--sigmaX";
  species mw859e0e3a_63c1_4ffd_95c2_a67b83b1d1d6_B1 in cell = 0; mw859e0e3a_63c1_4ffd_95c2_a67b83b1d1d6_B1 is "term_Ribo:RNA utr1--sigmaX";
  species mwe5d4529b_d02b_475a_8ba1_4c9f568c47f3_B1 in cell = 0; mwe5d4529b_d02b_475a_8ba1_4c9f568c47f3_B1 is "2 aTc:protein tetRdimer";
  species mw39a79b9e_eb59_423a_b844_153e6aa7934d_B1 in cell = 0; mw39a79b9e_eb59_423a_b844_153e6aa7934d_B1 is "CUTP:AGTP:RNAPSIGX:DNA psigX--utr1--tetR";
  species mw6b52fa43_ee57_4ca8_95ac_e79f61a74a41_B1 in cell = 0; mw6b52fa43_ee57_4ca8_95ac_e79f61a74a41_B1 is "term_RNAPSIGX:DNA psigX--utr1--tetR";
  species mw1731539c_93c9_4968_a47b_f95e241210a2_B1 in cell = 0; mw1731539c_93c9_4968_a47b_f95e241210a2_B1 is "AGTP:RNAPSIGX:DNA psigX--utr1--tetR";
  species mwa075b409_1abd_4858_af4d_da62f73a89dd_B1 in cell = 0; mwa075b409_1abd_4858_af4d_da62f73a89dd_B1 is "CUTP:RNAPSIGX:DNA psigX--utr1--tetR";
  species mwb4630ba2_e015_4781_ae70_8c24b6e740a9_B1 in cell = 0; mwb4630ba2_e015_4781_ae70_8c24b6e740a9_B1 is "AA:Ribo:RNA utr1--tetR";
  species mwc983a153_460d_4570_95dd_30cb763a952d_B1 in cell = 0; mwc983a153_460d_4570_95dd_30cb763a952d_B1 is "RNA utr1--tetR:RNase";
  species mw939fe071_4f16_4ba8_9242_f1c904939ffa_B1 in cell = 0; mw939fe071_4f16_4ba8_9242_f1c904939ffa_B1 is "Ribo:RNA utr1--tetR:RNase";
  species mwb8f06eb4_04c7_41dd_95fd_da65ad77558d_B1 in cell = 0; mwb8f06eb4_04c7_41dd_95fd_da65ad77558d_B1 is "AA:2AGTP:Ribo:RNA utr1--tetR:RNase";
  species mw2b48d717_964b_4fde_80eb_31dfc8f9aaae_B1 in cell = 0; mw2b48d717_964b_4fde_80eb_31dfc8f9aaae_B1 is "term_Ribo:RNA utr1--tetR:RNase";
  species mw538a3c71_29fe_4d44_9325_c8a1ffafb19d_B1 in cell = 0; mw538a3c71_29fe_4d44_9325_c8a1ffafb19d_B1 is "AA:Ribo:RNA utr1--tetR:RNase";
  species mw9bde46ed_23e4_4399_ac0a_9c28ab16893e_B1 in cell = 0; mw9bde46ed_23e4_4399_ac0a_9c28ab16893e_B1 is "AGTP:RNAP:DNA plac--utr1--sigmaX";
  species mw90d19c58_7381_4cb3_8dfb_787c23b6ebeb_B1 in cell = 0; mw90d19c58_7381_4cb3_8dfb_787c23b6ebeb_B1 is "CUTP:RNAP:DNA plac--utr1--sigmaX";
  species mw5295d527_9f1d_4e8e_b95c_86adacac9bbf_B1 in cell = 0; mw5295d527_9f1d_4e8e_b95c_86adacac9bbf_B1 is "AA:Ribo:RNA utr1--sigmaX";
  species mwbe15e58d_ded7_4bf5_aadd_ae1ad48fb846_B1 in cell = 0; mwbe15e58d_ded7_4bf5_aadd_ae1ad48fb846_B1 is "RNA utr1--sigmaX:RNase";
  species mwa1fc1ae9_7ea5_4b19_bfdd_e783762ed1b9_B1 in cell = 0; mwa1fc1ae9_7ea5_4b19_bfdd_e783762ed1b9_B1 is "Ribo:RNA utr1--sigmaX:RNase";
  species mw2f9c1825_57e6_48b8_878b_5f84570d0f7b_B1 in cell = 0; mw2f9c1825_57e6_48b8_878b_5f84570d0f7b_B1 is "AA:2AGTP:Ribo:RNA utr1--sigmaX:RNase";
  species mw6de5993d_c5be_4d0b_8507_656ff4d0b17b_B1 in cell = 0; mw6de5993d_c5be_4d0b_8507_656ff4d0b17b_B1 is "term_Ribo:RNA utr1--sigmaX:RNase";
  species mw8b8e7de3_298d_4e5b_9ad2_f3adb3660424_B1 in cell = 0; mw8b8e7de3_298d_4e5b_9ad2_f3adb3660424_B1 is "AA:Ribo:RNA utr1--sigmaX:RNase";
  species mwff9bade0_4398_4b01_a00e_4bb92b82929f_B1 in cell = 0; mwff9bade0_4398_4b01_a00e_4bb92b82929f_B1 is "AGTP_USED";

  // Parameters:
  mw1b3c7b9e_a9ce_4463_ac55_43201909284a_A0 = 0; mw1b3c7b9e_a9ce_4463_ac55_43201909284a_A0 is "AGTPdeg_F";
  mw786a2e83_d802_4211_81cc_786f08db726f_B1 = 0; mw786a2e83_d802_4211_81cc_786f08db726f_B1 is "AGTPdeg_F";

  // Reactions:
  mw0a08d853_359c_4508_8dce_33caa778923d_A0: mw497388cd_7f56_4af2_bfcb_e196dc07058a_A0 + mw877dd876_63c5_4801_b778_351a377ac9de_A0 -> mw5576dd43_d1a5_4349_963e_08d3372d976a_A0; Sigma28_RNAP_F*mw497388cd_7f56_4af2_bfcb_e196dc07058a_A0*mw877dd876_63c5_4801_b778_351a377ac9de_A0 - Sigma28_RNAP_R*mw5576dd43_d1a5_4349_963e_08d3372d976a_A0;
    Sigma28_RNAP_F = 100; Sigma28_RNAP_R = 0.1;
  mwb826ae13_af34_44fd_ade0_d4025e755600_A0: mwece12cb0_788c_4d80_aacb_158afc63be78_A0 => mw4c49a944_cb18_4848_9df8_d269a16a522f_A0; TXTL_PROT_deGFP_MATURATION*mwece12cb0_788c_4d80_aacb_158afc63be78_A0;
    TXTL_PROT_deGFP_MATURATION = 0.002310491;
  mw4e259b17_31f6_4d5d_9a07_5802a83a9558_A0: mw13299012_9d61_4da1_9237_576f460c5bc3_A0 + mw00f45716_be42_4897_b864_a105290636f8_A0 -> mwa63b6bc2_3062_4276_906a_bec4375fd6f1_A0; mw4e259b17_31f6_4d5d_9a07_5802a83a9558_A0_TXTL_UTR_UTR1_F*mw13299012_9d61_4da1_9237_576f460c5bc3_A0*mw00f45716_be42_4897_b864_a105290636f8_A0 - mw4e259b17_31f6_4d5d_9a07_5802a83a9558_A0_TXTL_UTR_UTR1_R*mwa63b6bc2_3062_4276_906a_bec4375fd6f1_A0;
    mw4e259b17_31f6_4d5d_9a07_5802a83a9558_A0_TXTL_UTR_UTR1_F = 0.2; mw4e259b17_31f6_4d5d_9a07_5802a83a9558_A0_TXTL_UTR_UTR1_R = 4;
  mw5e660db8_c87a_4d3e_b33a_5cad41468e67_A0: mw3720c25e_5f8d_4e8a_aa0c_2107880eedbe_A0 + mw5576dd43_d1a5_4349_963e_08d3372d976a_A0 -> mw9e0e02a5_500c_4c07_ae7f_25e3954419dd_A0; TXTL_PTET_RNAPbound_F*mw3720c25e_5f8d_4e8a_aa0c_2107880eedbe_A0*mw5576dd43_d1a5_4349_963e_08d3372d976a_A0 - TXTL_PTET_RNAPbound_R*mw9e0e02a5_500c_4c07_ae7f_25e3954419dd_A0;
    TXTL_PTET_RNAPbound_F = 0.006; TXTL_PTET_RNAPbound_R = 5;
  mw1d0af278_3a84_4c03_b6a0_ccd65ec5c56a_A0: mw3720c25e_5f8d_4e8a_aa0c_2107880eedbe_A0 + mw10646eba_6639_4f41_8c69_c8836c5a7a15_A0 -> mwfaa4de1c_e7a5_41cd_aa6c_26d34f2c1c0d_A0; mw1d0af278_3a84_4c03_b6a0_ccd65ec5c56a_A0_kf*mw3720c25e_5f8d_4e8a_aa0c_2107880eedbe_A0*mw10646eba_6639_4f41_8c69_c8836c5a7a15_A0 - mw1d0af278_3a84_4c03_b6a0_ccd65ec5c56a_A0_kr*mwfaa4de1c_e7a5_41cd_aa6c_26d34f2c1c0d_A0;
    mw1d0af278_3a84_4c03_b6a0_ccd65ec5c56a_A0_kf = 0.00286; mw1d0af278_3a84_4c03_b6a0_ccd65ec5c56a_A0_kr = 1.1e-5;
  mwb226f3b4_0150_4f36_82e3_fc6baeee6578_A0: mw9e0e02a5_500c_4c07_ae7f_25e3954419dd_A0 + mw10646eba_6639_4f41_8c69_c8836c5a7a15_A0 -> mweed2e9a7_0ff6_464c_ac3e_a15d4839d990_A0; mwb226f3b4_0150_4f36_82e3_fc6baeee6578_A0_kf*mw9e0e02a5_500c_4c07_ae7f_25e3954419dd_A0*mw10646eba_6639_4f41_8c69_c8836c5a7a15_A0 - mwb226f3b4_0150_4f36_82e3_fc6baeee6578_A0_kr*mweed2e9a7_0ff6_464c_ac3e_a15d4839d990_A0;
    mwb226f3b4_0150_4f36_82e3_fc6baeee6578_A0_kf = 0.00286; mwb226f3b4_0150_4f36_82e3_fc6baeee6578_A0_kr = 1.1e-5;
  mw3a0330c9_38e6_448c_86a2_19b3bbf924f9_A0: mwfaa4de1c_e7a5_41cd_aa6c_26d34f2c1c0d_A0 + mw5576dd43_d1a5_4349_963e_08d3372d976a_A0 -> mweed2e9a7_0ff6_464c_ac3e_a15d4839d990_A0; mw3a0330c9_38e6_448c_86a2_19b3bbf924f9_A0_kf*mwfaa4de1c_e7a5_41cd_aa6c_26d34f2c1c0d_A0*mw5576dd43_d1a5_4349_963e_08d3372d976a_A0 - mw3a0330c9_38e6_448c_86a2_19b3bbf924f9_A0_kr*mweed2e9a7_0ff6_464c_ac3e_a15d4839d990_A0;
    mw3a0330c9_38e6_448c_86a2_19b3bbf924f9_A0_kf = 0.006; mw3a0330c9_38e6_448c_86a2_19b3bbf924f9_A0_kr = 5000;
  mwbce29f24_c47f_4800_9399_a0f3b4154d06_A0: mwbf810b4c_29dd_4ee3_866c_269d7f98d18d_A0 => mw9e0e02a5_500c_4c07_ae7f_25e3954419dd_A0; mwbce29f24_c47f_4800_9399_a0f3b4154d06_A0_TXTL_NTP_consumption*mwbf810b4c_29dd_4ee3_866c_269d7f98d18d_A0;
    mwbce29f24_c47f_4800_9399_a0f3b4154d06_A0_TXTL_NTP_consumption = 0.7485294;
  mw99937676_2d2d_4e0f_8be4_9eaa0a02f039_A0: mwcd4b43b7_65f5_4293_9bc2_bfd759c68d4c_A0 => mw5576dd43_d1a5_4349_963e_08d3372d976a_A0 + mw3720c25e_5f8d_4e8a_aa0c_2107880eedbe_A0; mw99937676_2d2d_4e0f_8be4_9eaa0a02f039_A0_TXTL_RNAPBOUND_TERMINATION_RATE*mwcd4b43b7_65f5_4293_9bc2_bfd759c68d4c_A0;
    mw99937676_2d2d_4e0f_8be4_9eaa0a02f039_A0_TXTL_RNAPBOUND_TERMINATION_RATE = 0.05;
  mwa58b0bb6_364f_41b0_adce_57107d010840_A0: mw9e0e02a5_500c_4c07_ae7f_25e3954419dd_A0 + mw11e10894_8a40_4b9a_a399_a74704855a0c_A0 -> mwffe28a9c_4ffe_40ae_acff_4b428ced7051_A0; mwa58b0bb6_364f_41b0_adce_57107d010840_A0_TXTL_NTP_RNAP_F*mw9e0e02a5_500c_4c07_ae7f_25e3954419dd_A0*mw11e10894_8a40_4b9a_a399_a74704855a0c_A0 - mwa58b0bb6_364f_41b0_adce_57107d010840_A0_TXTL_NTP_RNAP_R*mwffe28a9c_4ffe_40ae_acff_4b428ced7051_A0;
    mwa58b0bb6_364f_41b0_adce_57107d010840_A0_TXTL_NTP_RNAP_F = 1000; mwa58b0bb6_364f_41b0_adce_57107d010840_A0_TXTL_NTP_RNAP_R = 120000000;
  mw389cab2a_ea10_43e4_9b57_6b9ee6eae934_A0: mw9e0e02a5_500c_4c07_ae7f_25e3954419dd_A0 + mw32c91943_802e_414d_b5d0_ec55344d6143_A0 -> mwf7e77d9f_bb65_4836_b45f_f3af4e3f6358_A0; mw389cab2a_ea10_43e4_9b57_6b9ee6eae934_A0_TXTL_NTP_RNAP_F*mw9e0e02a5_500c_4c07_ae7f_25e3954419dd_A0*mw32c91943_802e_414d_b5d0_ec55344d6143_A0 - mw389cab2a_ea10_43e4_9b57_6b9ee6eae934_A0_TXTL_NTP_RNAP_R*mwf7e77d9f_bb65_4836_b45f_f3af4e3f6358_A0;
    mw389cab2a_ea10_43e4_9b57_6b9ee6eae934_A0_TXTL_NTP_RNAP_F = 1000; mw389cab2a_ea10_43e4_9b57_6b9ee6eae934_A0_TXTL_NTP_RNAP_R = 120000000;
  mwdbb0ca87_b20a_4730_b514_642cc9dd12ea_A0: mwffe28a9c_4ffe_40ae_acff_4b428ced7051_A0 + mw32c91943_802e_414d_b5d0_ec55344d6143_A0 -> mwbf810b4c_29dd_4ee3_866c_269d7f98d18d_A0; mwdbb0ca87_b20a_4730_b514_642cc9dd12ea_A0_TXTL_NTP_RNAP_F*mwffe28a9c_4ffe_40ae_acff_4b428ced7051_A0*mw32c91943_802e_414d_b5d0_ec55344d6143_A0 - mwdbb0ca87_b20a_4730_b514_642cc9dd12ea_A0_TXTL_NTP_RNAP_R*mwbf810b4c_29dd_4ee3_866c_269d7f98d18d_A0;
    mwdbb0ca87_b20a_4730_b514_642cc9dd12ea_A0_TXTL_NTP_RNAP_F = 1; mwdbb0ca87_b20a_4730_b514_642cc9dd12ea_A0_TXTL_NTP_RNAP_R = 120000;
  mw6cf8dd26_07e0_4022_a023_d17c1b403051_A0: mwf7e77d9f_bb65_4836_b45f_f3af4e3f6358_A0 + mw11e10894_8a40_4b9a_a399_a74704855a0c_A0 -> mwbf810b4c_29dd_4ee3_866c_269d7f98d18d_A0; mw6cf8dd26_07e0_4022_a023_d17c1b403051_A0_TXTL_NTP_RNAP_F*mwf7e77d9f_bb65_4836_b45f_f3af4e3f6358_A0*mw11e10894_8a40_4b9a_a399_a74704855a0c_A0 - mw6cf8dd26_07e0_4022_a023_d17c1b403051_A0_TXTL_NTP_RNAP_R*mwbf810b4c_29dd_4ee3_866c_269d7f98d18d_A0;
    mw6cf8dd26_07e0_4022_a023_d17c1b403051_A0_TXTL_NTP_RNAP_F = 1; mw6cf8dd26_07e0_4022_a023_d17c1b403051_A0_TXTL_NTP_RNAP_R = 120000;
  mwc0ea753d_a308_4b08_a809_2d8690813b0b_A0: mwbf810b4c_29dd_4ee3_866c_269d7f98d18d_A0 => mwcd4b43b7_65f5_4293_9bc2_bfd759c68d4c_A0 + mw13299012_9d61_4da1_9237_576f460c5bc3_A0; mwc0ea753d_a308_4b08_a809_2d8690813b0b_A0_TXTL_transcription_rate1*mwbf810b4c_29dd_4ee3_866c_269d7f98d18d_A0;
    mwc0ea753d_a308_4b08_a809_2d8690813b0b_A0_TXTL_transcription_rate1 = 0.001470588;
  mw25b6ecab_5863_4f7d_8acc_f3add485106b_A0: mw8a82a795_8fd6_4c99_826c_eb4192ff970a_A0 => mweed2e9a7_0ff6_464c_ac3e_a15d4839d990_A0; mw25b6ecab_5863_4f7d_8acc_f3add485106b_A0_TXTL_NTP_consumption*mw8a82a795_8fd6_4c99_826c_eb4192ff970a_A0;
    mw25b6ecab_5863_4f7d_8acc_f3add485106b_A0_TXTL_NTP_consumption = 0.7485294;
  mwcc41b823_a82c_470c_b69b_5914d806713a_A0: mw96c7bbf2_2143_48e3_92dc_3e94c3a5b59d_A0 => mw5576dd43_d1a5_4349_963e_08d3372d976a_A0 + mw3720c25e_5f8d_4e8a_aa0c_2107880eedbe_A0 + mw10646eba_6639_4f41_8c69_c8836c5a7a15_A0; mwcc41b823_a82c_470c_b69b_5914d806713a_A0_TXTL_RNAPBOUND_TERMINATION_RATE*mw96c7bbf2_2143_48e3_92dc_3e94c3a5b59d_A0;
    mwcc41b823_a82c_470c_b69b_5914d806713a_A0_TXTL_RNAPBOUND_TERMINATION_RATE = 0.05;
  mw0c645f14_70bd_4ac9_a34b_57d69b40bd1c_A0: mweed2e9a7_0ff6_464c_ac3e_a15d4839d990_A0 + mw11e10894_8a40_4b9a_a399_a74704855a0c_A0 -> mw9a0110d7_1397_4305_80a5_1a5a401d89e6_A0; mw0c645f14_70bd_4ac9_a34b_57d69b40bd1c_A0_TXTL_NTP_RNAP_F*mweed2e9a7_0ff6_464c_ac3e_a15d4839d990_A0*mw11e10894_8a40_4b9a_a399_a74704855a0c_A0 - mw0c645f14_70bd_4ac9_a34b_57d69b40bd1c_A0_TXTL_NTP_RNAP_R*mw9a0110d7_1397_4305_80a5_1a5a401d89e6_A0;
    mw0c645f14_70bd_4ac9_a34b_57d69b40bd1c_A0_TXTL_NTP_RNAP_F = 1000; mw0c645f14_70bd_4ac9_a34b_57d69b40bd1c_A0_TXTL_NTP_RNAP_R = 120000000;
  mw2c78c231_79d4_482e_9d21_6009be23ee7d_A0: mweed2e9a7_0ff6_464c_ac3e_a15d4839d990_A0 + mw32c91943_802e_414d_b5d0_ec55344d6143_A0 -> mw06b37943_9d2f_46cd_bc30_fa8d4c06a00b_A0; mw2c78c231_79d4_482e_9d21_6009be23ee7d_A0_TXTL_NTP_RNAP_F*mweed2e9a7_0ff6_464c_ac3e_a15d4839d990_A0*mw32c91943_802e_414d_b5d0_ec55344d6143_A0 - mw2c78c231_79d4_482e_9d21_6009be23ee7d_A0_TXTL_NTP_RNAP_R*mw06b37943_9d2f_46cd_bc30_fa8d4c06a00b_A0;
    mw2c78c231_79d4_482e_9d21_6009be23ee7d_A0_TXTL_NTP_RNAP_F = 1000; mw2c78c231_79d4_482e_9d21_6009be23ee7d_A0_TXTL_NTP_RNAP_R = 120000000;
  mw4830e99c_cb87_41e9_ab86_8bc1a94f88b9_A0: mw9a0110d7_1397_4305_80a5_1a5a401d89e6_A0 + mw32c91943_802e_414d_b5d0_ec55344d6143_A0 -> mw8a82a795_8fd6_4c99_826c_eb4192ff970a_A0; mw4830e99c_cb87_41e9_ab86_8bc1a94f88b9_A0_TXTL_NTP_RNAP_F*mw9a0110d7_1397_4305_80a5_1a5a401d89e6_A0*mw32c91943_802e_414d_b5d0_ec55344d6143_A0 - mw4830e99c_cb87_41e9_ab86_8bc1a94f88b9_A0_TXTL_NTP_RNAP_R*mw8a82a795_8fd6_4c99_826c_eb4192ff970a_A0;
    mw4830e99c_cb87_41e9_ab86_8bc1a94f88b9_A0_TXTL_NTP_RNAP_F = 1; mw4830e99c_cb87_41e9_ab86_8bc1a94f88b9_A0_TXTL_NTP_RNAP_R = 120000;
  mwfc39e85f_5618_4099_afc8_68a351e70c60_A0: mw06b37943_9d2f_46cd_bc30_fa8d4c06a00b_A0 + mw11e10894_8a40_4b9a_a399_a74704855a0c_A0 -> mw8a82a795_8fd6_4c99_826c_eb4192ff970a_A0; mwfc39e85f_5618_4099_afc8_68a351e70c60_A0_TXTL_NTP_RNAP_F*mw06b37943_9d2f_46cd_bc30_fa8d4c06a00b_A0*mw11e10894_8a40_4b9a_a399_a74704855a0c_A0 - mwfc39e85f_5618_4099_afc8_68a351e70c60_A0_TXTL_NTP_RNAP_R*mw8a82a795_8fd6_4c99_826c_eb4192ff970a_A0;
    mwfc39e85f_5618_4099_afc8_68a351e70c60_A0_TXTL_NTP_RNAP_F = 1; mwfc39e85f_5618_4099_afc8_68a351e70c60_A0_TXTL_NTP_RNAP_R = 120000;
  mw268adbb5_7e00_4466_bc26_d5a0bf80ac26_A0: mw8a82a795_8fd6_4c99_826c_eb4192ff970a_A0 => mw96c7bbf2_2143_48e3_92dc_3e94c3a5b59d_A0 + mw13299012_9d61_4da1_9237_576f460c5bc3_A0; mw268adbb5_7e00_4466_bc26_d5a0bf80ac26_A0_TXTL_transcription_rate1*mw8a82a795_8fd6_4c99_826c_eb4192ff970a_A0;
    mw268adbb5_7e00_4466_bc26_d5a0bf80ac26_A0_TXTL_transcription_rate1 = 0.001470588;
  mwed4a8a70_8ccc_408a_8ad6_c846d8bf66c5_A0: mwa63b6bc2_3062_4276_906a_bec4375fd6f1_A0 + mw1abcc808_a59f_467d_b71b_421398c97d74_A0 -> mw9c4d2b72_7efb_42ac_9af0_2b6e68621f73_A0; mwed4a8a70_8ccc_408a_8ad6_c846d8bf66c5_A0_TL_AA_F*mwa63b6bc2_3062_4276_906a_bec4375fd6f1_A0*mw1abcc808_a59f_467d_b71b_421398c97d74_A0 - mwed4a8a70_8ccc_408a_8ad6_c846d8bf66c5_A0_TL_AA_R*mw9c4d2b72_7efb_42ac_9af0_2b6e68621f73_A0;
    mwed4a8a70_8ccc_408a_8ad6_c846d8bf66c5_A0_TL_AA_F = 300; mwed4a8a70_8ccc_408a_8ad6_c846d8bf66c5_A0_TL_AA_R = 0.1;
  mwb411cb34_ff07_42df_89f1_5d92ab109d51_A0: mw9c4d2b72_7efb_42ac_9af0_2b6e68621f73_A0 + 2 mw11e10894_8a40_4b9a_a399_a74704855a0c_A0 -> mwc8688555_e588_4ad9_9e55_f053892bfbf5_A0; mwb411cb34_ff07_42df_89f1_5d92ab109d51_A0_TL_AGTP_F*mw9c4d2b72_7efb_42ac_9af0_2b6e68621f73_A0*mw11e10894_8a40_4b9a_a399_a74704855a0c_A0^2 - mwb411cb34_ff07_42df_89f1_5d92ab109d51_A0_TL_AGTP_R*mwc8688555_e588_4ad9_9e55_f053892bfbf5_A0;
    mwb411cb34_ff07_42df_89f1_5d92ab109d51_A0_TL_AGTP_F = 30; mwb411cb34_ff07_42df_89f1_5d92ab109d51_A0_TL_AGTP_R = 10;
  mwd0af282d_83c3_40cd_800e_f453cdb9e847_A0: mwc8688555_e588_4ad9_9e55_f053892bfbf5_A0 => mw4976d02d_0642_4ab4_86ba_3cd5bf362bdc_A0; mwd0af282d_83c3_40cd_800e_f453cdb9e847_A0_TXTL_TL_AA_consumption*mwc8688555_e588_4ad9_9e55_f053892bfbf5_A0;
    mwd0af282d_83c3_40cd_800e_f453cdb9e847_A0_TXTL_TL_AA_consumption = 0.024;
  mw0eaaccee_8210_4ed2_93ad_f7662cdae48f_A0: mwc8688555_e588_4ad9_9e55_f053892bfbf5_A0 => mw4976d02d_0642_4ab4_86ba_3cd5bf362bdc_A0 + mwece12cb0_788c_4d80_aacb_158afc63be78_A0; mw0eaaccee_8210_4ed2_93ad_f7662cdae48f_A0_TXTL_TL_rate*mwc8688555_e588_4ad9_9e55_f053892bfbf5_A0;
    mw0eaaccee_8210_4ed2_93ad_f7662cdae48f_A0_TXTL_TL_rate = 0.012;
  mw142a4aaa_3a3b_40ae_bade_7f74d66bb616_A0: mw4976d02d_0642_4ab4_86ba_3cd5bf362bdc_A0 => mw13299012_9d61_4da1_9237_576f460c5bc3_A0 + mw00f45716_be42_4897_b864_a105290636f8_A0; mw142a4aaa_3a3b_40ae_bade_7f74d66bb616_A0_TXTL_RIBOBOUND_TERMINATION_RATE*mw4976d02d_0642_4ab4_86ba_3cd5bf362bdc_A0;
    mw142a4aaa_3a3b_40ae_bade_7f74d66bb616_A0_TXTL_RIBOBOUND_TERMINATION_RATE = 50;
  mwd86dad3b_9d80_4444_9602_47053ad59fb9_A0: mw13299012_9d61_4da1_9237_576f460c5bc3_A0 + mw9dcce971_94dd_43cc_a416_f9c5b92b7ea9_A0 -> mwf167ff93_6af9_4ad3_be9e_dfc18aaf6a7d_A0; mwd86dad3b_9d80_4444_9602_47053ad59fb9_A0_TXTL_RNAdeg_F*mw13299012_9d61_4da1_9237_576f460c5bc3_A0*mw9dcce971_94dd_43cc_a416_f9c5b92b7ea9_A0 - mwd86dad3b_9d80_4444_9602_47053ad59fb9_A0_TXTL_RNAdeg_R*mwf167ff93_6af9_4ad3_be9e_dfc18aaf6a7d_A0;
    mwd86dad3b_9d80_4444_9602_47053ad59fb9_A0_TXTL_RNAdeg_F = 10; mwd86dad3b_9d80_4444_9602_47053ad59fb9_A0_TXTL_RNAdeg_R = 2000;
  mw69e26851_9967_4b22_80cf_295576290171_A0: mwf167ff93_6af9_4ad3_be9e_dfc18aaf6a7d_A0 => mw9dcce971_94dd_43cc_a416_f9c5b92b7ea9_A0; mw69e26851_9967_4b22_80cf_295576290171_A0_TXTL_RNAdeg_F*mwf167ff93_6af9_4ad3_be9e_dfc18aaf6a7d_A0;
    mw69e26851_9967_4b22_80cf_295576290171_A0_TXTL_RNAdeg_F = 0.002777778;
  mwe0b84c41_a714_4cf9_9e6c_58aca8b38d4a_A0: mwa63b6bc2_3062_4276_906a_bec4375fd6f1_A0 + mw9dcce971_94dd_43cc_a416_f9c5b92b7ea9_A0 -> mwd4d5d75f_2cfe_4a16_b934_d2513bb1aaea_A0; mwe0b84c41_a714_4cf9_9e6c_58aca8b38d4a_A0_TXTL_RNAdeg_F*mwa63b6bc2_3062_4276_906a_bec4375fd6f1_A0*mw9dcce971_94dd_43cc_a416_f9c5b92b7ea9_A0 - mwe0b84c41_a714_4cf9_9e6c_58aca8b38d4a_A0_TXTL_RNAdeg_R*mwd4d5d75f_2cfe_4a16_b934_d2513bb1aaea_A0;
    mwe0b84c41_a714_4cf9_9e6c_58aca8b38d4a_A0_TXTL_RNAdeg_F = 10; mwe0b84c41_a714_4cf9_9e6c_58aca8b38d4a_A0_TXTL_RNAdeg_R = 2000;
  mwdaf894a5_e617_4d19_94e8_b570a67fa75a_A0: mwd4d5d75f_2cfe_4a16_b934_d2513bb1aaea_A0 => mw9dcce971_94dd_43cc_a416_f9c5b92b7ea9_A0 + mw00f45716_be42_4897_b864_a105290636f8_A0; mwdaf894a5_e617_4d19_94e8_b570a67fa75a_A0_TXTL_RNAdeg_F*mwd4d5d75f_2cfe_4a16_b934_d2513bb1aaea_A0;
    mwdaf894a5_e617_4d19_94e8_b570a67fa75a_A0_TXTL_RNAdeg_F = 0.002777778;
  mw58e82d1a_cf38_4591_9f25_f225263706f2_A0: mwc8688555_e588_4ad9_9e55_f053892bfbf5_A0 + mw9dcce971_94dd_43cc_a416_f9c5b92b7ea9_A0 -> mwdc093847_c1af_4016_aad3_e2c57c50d317_A0; mw58e82d1a_cf38_4591_9f25_f225263706f2_A0_TXTL_RNAdeg_F*mwc8688555_e588_4ad9_9e55_f053892bfbf5_A0*mw9dcce971_94dd_43cc_a416_f9c5b92b7ea9_A0 - mw58e82d1a_cf38_4591_9f25_f225263706f2_A0_TXTL_RNAdeg_R*mwdc093847_c1af_4016_aad3_e2c57c50d317_A0;
    mw58e82d1a_cf38_4591_9f25_f225263706f2_A0_TXTL_RNAdeg_F = 10; mw58e82d1a_cf38_4591_9f25_f225263706f2_A0_TXTL_RNAdeg_R = 2000;
  mwc13ba8b4_4e3b_47d9_83aa_59896b329888_A0: mwdc093847_c1af_4016_aad3_e2c57c50d317_A0 => mw9dcce971_94dd_43cc_a416_f9c5b92b7ea9_A0 + mw1abcc808_a59f_467d_b71b_421398c97d74_A0 + 2 mw11e10894_8a40_4b9a_a399_a74704855a0c_A0 + mw00f45716_be42_4897_b864_a105290636f8_A0; mwc13ba8b4_4e3b_47d9_83aa_59896b329888_A0_TXTL_RNAdeg_F*mwdc093847_c1af_4016_aad3_e2c57c50d317_A0;
    mwc13ba8b4_4e3b_47d9_83aa_59896b329888_A0_TXTL_RNAdeg_F = 0.002777778;
  mw4b0592d8_cbba_4312_a435_53fe087279fc_A0: mw4976d02d_0642_4ab4_86ba_3cd5bf362bdc_A0 + mw9dcce971_94dd_43cc_a416_f9c5b92b7ea9_A0 -> mw364eef4c_8431_467d_bd97_6172b02b980b_A0; mw4b0592d8_cbba_4312_a435_53fe087279fc_A0_TXTL_RNAdeg_F*mw4976d02d_0642_4ab4_86ba_3cd5bf362bdc_A0*mw9dcce971_94dd_43cc_a416_f9c5b92b7ea9_A0 - mw4b0592d8_cbba_4312_a435_53fe087279fc_A0_TXTL_RNAdeg_R*mw364eef4c_8431_467d_bd97_6172b02b980b_A0;
    mw4b0592d8_cbba_4312_a435_53fe087279fc_A0_TXTL_RNAdeg_F = 10; mw4b0592d8_cbba_4312_a435_53fe087279fc_A0_TXTL_RNAdeg_R = 2000;
  mw548404d1_e408_401d_b226_f05464aff9a2_A0: mw364eef4c_8431_467d_bd97_6172b02b980b_A0 => mw9dcce971_94dd_43cc_a416_f9c5b92b7ea9_A0 + mw00f45716_be42_4897_b864_a105290636f8_A0; mw548404d1_e408_401d_b226_f05464aff9a2_A0_TXTL_RNAdeg_F*mw364eef4c_8431_467d_bd97_6172b02b980b_A0;
    mw548404d1_e408_401d_b226_f05464aff9a2_A0_TXTL_RNAdeg_F = 0.002777778;
  mw67fbaae0_ad79_477d_83b4_b43bc285936c_A0: mw9c4d2b72_7efb_42ac_9af0_2b6e68621f73_A0 + mw9dcce971_94dd_43cc_a416_f9c5b92b7ea9_A0 -> mwb7433d67_6138_489c_b6ac_9fc9b22bbfcf_A0; mw67fbaae0_ad79_477d_83b4_b43bc285936c_A0_TXTL_RNAdeg_F*mw9c4d2b72_7efb_42ac_9af0_2b6e68621f73_A0*mw9dcce971_94dd_43cc_a416_f9c5b92b7ea9_A0 - mw67fbaae0_ad79_477d_83b4_b43bc285936c_A0_TXTL_RNAdeg_R*mwb7433d67_6138_489c_b6ac_9fc9b22bbfcf_A0;
    mw67fbaae0_ad79_477d_83b4_b43bc285936c_A0_TXTL_RNAdeg_F = 10; mw67fbaae0_ad79_477d_83b4_b43bc285936c_A0_TXTL_RNAdeg_R = 2000;
  mwfda47622_c527_4d68_aa6f_0dd255828cd9_A0: mwb7433d67_6138_489c_b6ac_9fc9b22bbfcf_A0 => mw9dcce971_94dd_43cc_a416_f9c5b92b7ea9_A0 + mw1abcc808_a59f_467d_b71b_421398c97d74_A0 + mw00f45716_be42_4897_b864_a105290636f8_A0; mwfda47622_c527_4d68_aa6f_0dd255828cd9_A0_TXTL_RNAdeg_F*mwb7433d67_6138_489c_b6ac_9fc9b22bbfcf_A0;
    mwfda47622_c527_4d68_aa6f_0dd255828cd9_A0_TXTL_RNAdeg_F = 0.002777778;
  mwe1df7722_9564_4ae2_8545_f55e73861e3f_A0: mw11e10894_8a40_4b9a_a399_a74704855a0c_A0 => mw17310191_3888_4d94_a11e_856eb88960c6_A0; mw1b3c7b9e_a9ce_4463_ac55_43201909284a_A0*mw11e10894_8a40_4b9a_a399_a74704855a0c_A0;
  mw45715d9a_add7_43bd_873b_23a5b728a3ea_B1: mweeccb4d5_ef92_4f38_88ef_1113e7e2f961_B1 + 2 mwc00f5b5a_e21d_42e7_a0ca_6a931ffb4ec0_B1 -> mwe5d4529b_d02b_475a_8ba1_4c9f568c47f3_B1; TXTL_INDUCER_TETR_ATC_F*mweeccb4d5_ef92_4f38_88ef_1113e7e2f961_B1*mwc00f5b5a_e21d_42e7_a0ca_6a931ffb4ec0_B1^2 - TXTL_INDUCER_TETR_ATC_R*mwe5d4529b_d02b_475a_8ba1_4c9f568c47f3_B1;
    TXTL_INDUCER_TETR_ATC_F = 1e-5; TXTL_INDUCER_TETR_ATC_R = 0.1;
  mw20d70dce_c24c_44f5_ad8a_514327dab525_B1: 2 mwb072cf50_050b_4bec_97e3_cacc9c6c80b7_B1 -> mweeccb4d5_ef92_4f38_88ef_1113e7e2f961_B1; mw20d70dce_c24c_44f5_ad8a_514327dab525_B1_kf*mwb072cf50_050b_4bec_97e3_cacc9c6c80b7_B1^2 - mw20d70dce_c24c_44f5_ad8a_514327dab525_B1_kr*mweeccb4d5_ef92_4f38_88ef_1113e7e2f961_B1;
    mw20d70dce_c24c_44f5_ad8a_514327dab525_B1_kf = 1; mw20d70dce_c24c_44f5_ad8a_514327dab525_B1_kr = 1;
  mwc4415d8f_7467_4000_adac_49e8ce637e05_B1: mwcab9d721_d5fe_46ba_8abd_db6023744051_B1 + mwe288cc4d_bd5c_430e_acab_0b3cd6abf225_B1 -> mwe49f90af_dd8c_43dd_948f_ad0a5a401277_B1; mwc4415d8f_7467_4000_adac_49e8ce637e05_B1_TXTL_UTR_UTR1_F*mwcab9d721_d5fe_46ba_8abd_db6023744051_B1*mwe288cc4d_bd5c_430e_acab_0b3cd6abf225_B1 - mwc4415d8f_7467_4000_adac_49e8ce637e05_B1_TXTL_UTR_UTR1_R*mwe49f90af_dd8c_43dd_948f_ad0a5a401277_B1;
    mwc4415d8f_7467_4000_adac_49e8ce637e05_B1_TXTL_UTR_UTR1_F = 0.2; mwc4415d8f_7467_4000_adac_49e8ce637e05_B1_TXTL_UTR_UTR1_R = 4;
  mw27e31c4a_452a_4b7f_a96d_e361a44f06f0_B1: mwfb07f4d9_670f_4329_bed5_e109f421698e_B1 + mwdc1e07fe_9c7d_43d2_9ae9_2e9bb4e826f3_B1 -> mw3b47668e_6c7d_4a08_9772_b34bca7fb884_B1; TXTL_SIGX_RNAPbound_F*mwfb07f4d9_670f_4329_bed5_e109f421698e_B1*mwdc1e07fe_9c7d_43d2_9ae9_2e9bb4e826f3_B1 - TXTL_SIGX_RNAPbound_R*mw3b47668e_6c7d_4a08_9772_b34bca7fb884_B1;
    TXTL_SIGX_RNAPbound_F = 10; TXTL_SIGX_RNAPbound_R = 0.1;
  mw0a724b98_3475_4115_aeea_37344b9f8403_B1: mw39a79b9e_eb59_423a_b844_153e6aa7934d_B1 => mw3b47668e_6c7d_4a08_9772_b34bca7fb884_B1; mw0a724b98_3475_4115_aeea_37344b9f8403_B1_TXTL_NTP_consumption*mw39a79b9e_eb59_423a_b844_153e6aa7934d_B1;
    mw0a724b98_3475_4115_aeea_37344b9f8403_B1_TXTL_NTP_consumption = 0.7487705;
  mw827b8940_3e92_4bef_8143_f89eced8a388_B1: mw6b52fa43_ee57_4ca8_95ac_e79f61a74a41_B1 => mwdc1e07fe_9c7d_43d2_9ae9_2e9bb4e826f3_B1 + mwfb07f4d9_670f_4329_bed5_e109f421698e_B1; mw827b8940_3e92_4bef_8143_f89eced8a388_B1_TXTL_RNAPBOUND_TERMINATION_RATE*mw6b52fa43_ee57_4ca8_95ac_e79f61a74a41_B1;
    mw827b8940_3e92_4bef_8143_f89eced8a388_B1_TXTL_RNAPBOUND_TERMINATION_RATE = 0.05;
  mw269edd06_0c23_48b1_9d3a_cabda2227eb9_B1: mw3b47668e_6c7d_4a08_9772_b34bca7fb884_B1 + mwe041b8b1_92b6_4c2b_8e78_5212f5644e01_B1 -> mw1731539c_93c9_4968_a47b_f95e241210a2_B1; mw269edd06_0c23_48b1_9d3a_cabda2227eb9_B1_TXTL_NTP_RNAP_F*mw3b47668e_6c7d_4a08_9772_b34bca7fb884_B1*mwe041b8b1_92b6_4c2b_8e78_5212f5644e01_B1 - mw269edd06_0c23_48b1_9d3a_cabda2227eb9_B1_TXTL_NTP_RNAP_R*mw1731539c_93c9_4968_a47b_f95e241210a2_B1;
    mw269edd06_0c23_48b1_9d3a_cabda2227eb9_B1_TXTL_NTP_RNAP_F = 1000; mw269edd06_0c23_48b1_9d3a_cabda2227eb9_B1_TXTL_NTP_RNAP_R = 120000000;
  mwca239526_d864_4077_b619_ccbc2a385269_B1: mw3b47668e_6c7d_4a08_9772_b34bca7fb884_B1 + mw0224b269_aae5_4ca1_a6e6_3607229b0a5b_B1 -> mwa075b409_1abd_4858_af4d_da62f73a89dd_B1; mwca239526_d864_4077_b619_ccbc2a385269_B1_TXTL_NTP_RNAP_F*mw3b47668e_6c7d_4a08_9772_b34bca7fb884_B1*mw0224b269_aae5_4ca1_a6e6_3607229b0a5b_B1 - mwca239526_d864_4077_b619_ccbc2a385269_B1_TXTL_NTP_RNAP_R*mwa075b409_1abd_4858_af4d_da62f73a89dd_B1;
    mwca239526_d864_4077_b619_ccbc2a385269_B1_TXTL_NTP_RNAP_F = 1000; mwca239526_d864_4077_b619_ccbc2a385269_B1_TXTL_NTP_RNAP_R = 120000000;
  mwe8f78bc3_474f_4f84_bd0b_5c01a484b7e9_B1: mw1731539c_93c9_4968_a47b_f95e241210a2_B1 + mw0224b269_aae5_4ca1_a6e6_3607229b0a5b_B1 -> mw39a79b9e_eb59_423a_b844_153e6aa7934d_B1; mwe8f78bc3_474f_4f84_bd0b_5c01a484b7e9_B1_TXTL_NTP_RNAP_F*mw1731539c_93c9_4968_a47b_f95e241210a2_B1*mw0224b269_aae5_4ca1_a6e6_3607229b0a5b_B1 - mwe8f78bc3_474f_4f84_bd0b_5c01a484b7e9_B1_TXTL_NTP_RNAP_R*mw39a79b9e_eb59_423a_b844_153e6aa7934d_B1;
    mwe8f78bc3_474f_4f84_bd0b_5c01a484b7e9_B1_TXTL_NTP_RNAP_F = 1; mwe8f78bc3_474f_4f84_bd0b_5c01a484b7e9_B1_TXTL_NTP_RNAP_R = 120000;
  mw5e50b476_1da7_4d8a_938b_edc8b610cf33_B1: mwa075b409_1abd_4858_af4d_da62f73a89dd_B1 + mwe041b8b1_92b6_4c2b_8e78_5212f5644e01_B1 -> mw39a79b9e_eb59_423a_b844_153e6aa7934d_B1; mw5e50b476_1da7_4d8a_938b_edc8b610cf33_B1_TXTL_NTP_RNAP_F*mwa075b409_1abd_4858_af4d_da62f73a89dd_B1*mwe041b8b1_92b6_4c2b_8e78_5212f5644e01_B1 - mw5e50b476_1da7_4d8a_938b_edc8b610cf33_B1_TXTL_NTP_RNAP_R*mw39a79b9e_eb59_423a_b844_153e6aa7934d_B1;
    mw5e50b476_1da7_4d8a_938b_edc8b610cf33_B1_TXTL_NTP_RNAP_F = 1; mw5e50b476_1da7_4d8a_938b_edc8b610cf33_B1_TXTL_NTP_RNAP_R = 120000;
  mw837e9fba_be4e_424e_b1cd_cb57fdb24edf_B1: mw39a79b9e_eb59_423a_b844_153e6aa7934d_B1 => mw6b52fa43_ee57_4ca8_95ac_e79f61a74a41_B1 + mwcab9d721_d5fe_46ba_8abd_db6023744051_B1; mw837e9fba_be4e_424e_b1cd_cb57fdb24edf_B1_TXTL_transcription_rate1*mw39a79b9e_eb59_423a_b844_153e6aa7934d_B1;
    mw837e9fba_be4e_424e_b1cd_cb57fdb24edf_B1_TXTL_transcription_rate1 = 0.001229508;
  mweab1f829_5dd5_49b2_a99a_a50a10e96b63_B1: mwe49f90af_dd8c_43dd_948f_ad0a5a401277_B1 + mwe9049d27_bfa6_4d5d_a0d3_42922e3af392_B1 -> mwb4630ba2_e015_4781_ae70_8c24b6e740a9_B1; mweab1f829_5dd5_49b2_a99a_a50a10e96b63_B1_TL_AA_F*mwe49f90af_dd8c_43dd_948f_ad0a5a401277_B1*mwe9049d27_bfa6_4d5d_a0d3_42922e3af392_B1 - mweab1f829_5dd5_49b2_a99a_a50a10e96b63_B1_TL_AA_R*mwb4630ba2_e015_4781_ae70_8c24b6e740a9_B1;
    mweab1f829_5dd5_49b2_a99a_a50a10e96b63_B1_TL_AA_F = 300; mweab1f829_5dd5_49b2_a99a_a50a10e96b63_B1_TL_AA_R = 0.1;
  mw922b577c_2e88_4360_a426_cccde8c13129_B1: mwb4630ba2_e015_4781_ae70_8c24b6e740a9_B1 + 2 mwe041b8b1_92b6_4c2b_8e78_5212f5644e01_B1 -> mwe8451d4a_d4c8_405c_8ad4_6540824528ee_B1; mw922b577c_2e88_4360_a426_cccde8c13129_B1_TL_AGTP_F*mwb4630ba2_e015_4781_ae70_8c24b6e740a9_B1*mwe041b8b1_92b6_4c2b_8e78_5212f5644e01_B1^2 - mw922b577c_2e88_4360_a426_cccde8c13129_B1_TL_AGTP_R*mwe8451d4a_d4c8_405c_8ad4_6540824528ee_B1;
    mw922b577c_2e88_4360_a426_cccde8c13129_B1_TL_AGTP_F = 30; mw922b577c_2e88_4360_a426_cccde8c13129_B1_TL_AGTP_R = 10;
  mw046142a5_a65b_4cad_b19f_42299799ab0a_B1: mwe8451d4a_d4c8_405c_8ad4_6540824528ee_B1 => mwaff2c6b9_d770_4f47_a543_6039b764a7aa_B1; mw046142a5_a65b_4cad_b19f_42299799ab0a_B1_TXTL_TL_AA_consumption*mwe8451d4a_d4c8_405c_8ad4_6540824528ee_B1;
    mw046142a5_a65b_4cad_b19f_42299799ab0a_B1_TXTL_TL_AA_consumption = 0.03;
  mw88792e2e_5492_46ab_84e3_05d0c6ff44b7_B1: mwe8451d4a_d4c8_405c_8ad4_6540824528ee_B1 => mwaff2c6b9_d770_4f47_a543_6039b764a7aa_B1 + mwb072cf50_050b_4bec_97e3_cacc9c6c80b7_B1; mw88792e2e_5492_46ab_84e3_05d0c6ff44b7_B1_TXTL_TL_rate*mwe8451d4a_d4c8_405c_8ad4_6540824528ee_B1;
    mw88792e2e_5492_46ab_84e3_05d0c6ff44b7_B1_TXTL_TL_rate = 0.01;
  mw56912c5c_4054_4cbe_a72e_464b2bac84c5_B1: mwaff2c6b9_d770_4f47_a543_6039b764a7aa_B1 => mwcab9d721_d5fe_46ba_8abd_db6023744051_B1 + mwe288cc4d_bd5c_430e_acab_0b3cd6abf225_B1; mw56912c5c_4054_4cbe_a72e_464b2bac84c5_B1_TXTL_RIBOBOUND_TERMINATION_RATE*mwaff2c6b9_d770_4f47_a543_6039b764a7aa_B1;
    mw56912c5c_4054_4cbe_a72e_464b2bac84c5_B1_TXTL_RIBOBOUND_TERMINATION_RATE = 50;
  mw7e3e5930_6fce_42e1_8b76_563cc86242de_B1: mwcab9d721_d5fe_46ba_8abd_db6023744051_B1 + mw4f453c9c_a4a1_4d03_a1b9_243580f1d942_B1 -> mwc983a153_460d_4570_95dd_30cb763a952d_B1; mw7e3e5930_6fce_42e1_8b76_563cc86242de_B1_TXTL_RNAdeg_F*mwcab9d721_d5fe_46ba_8abd_db6023744051_B1*mw4f453c9c_a4a1_4d03_a1b9_243580f1d942_B1 - mw7e3e5930_6fce_42e1_8b76_563cc86242de_B1_TXTL_RNAdeg_R*mwc983a153_460d_4570_95dd_30cb763a952d_B1;
    mw7e3e5930_6fce_42e1_8b76_563cc86242de_B1_TXTL_RNAdeg_F = 10; mw7e3e5930_6fce_42e1_8b76_563cc86242de_B1_TXTL_RNAdeg_R = 2000;
  mwcff016a8_1ec2_4c46_a6fc_0f92c4cbf25e_B1: mwc983a153_460d_4570_95dd_30cb763a952d_B1 => mw4f453c9c_a4a1_4d03_a1b9_243580f1d942_B1; mwcff016a8_1ec2_4c46_a6fc_0f92c4cbf25e_B1_TXTL_RNAdeg_F*mwc983a153_460d_4570_95dd_30cb763a952d_B1;
    mwcff016a8_1ec2_4c46_a6fc_0f92c4cbf25e_B1_TXTL_RNAdeg_F = 0.002777778;
  mwfbdb49e8_ccd4_43f1_81fa_241ad4105a69_B1: mwe49f90af_dd8c_43dd_948f_ad0a5a401277_B1 + mw4f453c9c_a4a1_4d03_a1b9_243580f1d942_B1 -> mw939fe071_4f16_4ba8_9242_f1c904939ffa_B1; mwfbdb49e8_ccd4_43f1_81fa_241ad4105a69_B1_TXTL_RNAdeg_F*mwe49f90af_dd8c_43dd_948f_ad0a5a401277_B1*mw4f453c9c_a4a1_4d03_a1b9_243580f1d942_B1 - mwfbdb49e8_ccd4_43f1_81fa_241ad4105a69_B1_TXTL_RNAdeg_R*mw939fe071_4f16_4ba8_9242_f1c904939ffa_B1;
    mwfbdb49e8_ccd4_43f1_81fa_241ad4105a69_B1_TXTL_RNAdeg_F = 10; mwfbdb49e8_ccd4_43f1_81fa_241ad4105a69_B1_TXTL_RNAdeg_R = 2000;
  mwb481be45_00ba_469f_8bff_13dd03cbb7f3_B1: mw939fe071_4f16_4ba8_9242_f1c904939ffa_B1 => mw4f453c9c_a4a1_4d03_a1b9_243580f1d942_B1 + mwe288cc4d_bd5c_430e_acab_0b3cd6abf225_B1; mwb481be45_00ba_469f_8bff_13dd03cbb7f3_B1_TXTL_RNAdeg_F*mw939fe071_4f16_4ba8_9242_f1c904939ffa_B1;
    mwb481be45_00ba_469f_8bff_13dd03cbb7f3_B1_TXTL_RNAdeg_F = 0.002777778;
  mw7d522c74_749f_4ef1_961f_362b9d311ca9_B1: mwe8451d4a_d4c8_405c_8ad4_6540824528ee_B1 + mw4f453c9c_a4a1_4d03_a1b9_243580f1d942_B1 -> mwb8f06eb4_04c7_41dd_95fd_da65ad77558d_B1; mw7d522c74_749f_4ef1_961f_362b9d311ca9_B1_TXTL_RNAdeg_F*mwe8451d4a_d4c8_405c_8ad4_6540824528ee_B1*mw4f453c9c_a4a1_4d03_a1b9_243580f1d942_B1 - mw7d522c74_749f_4ef1_961f_362b9d311ca9_B1_TXTL_RNAdeg_R*mwb8f06eb4_04c7_41dd_95fd_da65ad77558d_B1;
    mw7d522c74_749f_4ef1_961f_362b9d311ca9_B1_TXTL_RNAdeg_F = 10; mw7d522c74_749f_4ef1_961f_362b9d311ca9_B1_TXTL_RNAdeg_R = 2000;
  mwddb04845_6840_42a7_bbf8_2440a13a770d_B1: mwb8f06eb4_04c7_41dd_95fd_da65ad77558d_B1 => mw4f453c9c_a4a1_4d03_a1b9_243580f1d942_B1 + mwe9049d27_bfa6_4d5d_a0d3_42922e3af392_B1 + 2 mwe041b8b1_92b6_4c2b_8e78_5212f5644e01_B1 + mwe288cc4d_bd5c_430e_acab_0b3cd6abf225_B1; mwddb04845_6840_42a7_bbf8_2440a13a770d_B1_TXTL_RNAdeg_F*mwb8f06eb4_04c7_41dd_95fd_da65ad77558d_B1;
    mwddb04845_6840_42a7_bbf8_2440a13a770d_B1_TXTL_RNAdeg_F = 0.002777778;
  mw52f893df_55e2_42cd_a9d2_4cb2392dafa4_B1: mwaff2c6b9_d770_4f47_a543_6039b764a7aa_B1 + mw4f453c9c_a4a1_4d03_a1b9_243580f1d942_B1 -> mw2b48d717_964b_4fde_80eb_31dfc8f9aaae_B1; mw52f893df_55e2_42cd_a9d2_4cb2392dafa4_B1_TXTL_RNAdeg_F*mwaff2c6b9_d770_4f47_a543_6039b764a7aa_B1*mw4f453c9c_a4a1_4d03_a1b9_243580f1d942_B1 - mw52f893df_55e2_42cd_a9d2_4cb2392dafa4_B1_TXTL_RNAdeg_R*mw2b48d717_964b_4fde_80eb_31dfc8f9aaae_B1;
    mw52f893df_55e2_42cd_a9d2_4cb2392dafa4_B1_TXTL_RNAdeg_F = 10; mw52f893df_55e2_42cd_a9d2_4cb2392dafa4_B1_TXTL_RNAdeg_R = 2000;
  mwd520c753_9cdc_4495_9d22_96f451691dbe_B1: mw2b48d717_964b_4fde_80eb_31dfc8f9aaae_B1 => mw4f453c9c_a4a1_4d03_a1b9_243580f1d942_B1 + mwe288cc4d_bd5c_430e_acab_0b3cd6abf225_B1; mwd520c753_9cdc_4495_9d22_96f451691dbe_B1_TXTL_RNAdeg_F*mw2b48d717_964b_4fde_80eb_31dfc8f9aaae_B1;
    mwd520c753_9cdc_4495_9d22_96f451691dbe_B1_TXTL_RNAdeg_F = 0.002777778;
  mw40fc5ec9_5918_4117_96f6_53cebc1515e9_B1: mwb4630ba2_e015_4781_ae70_8c24b6e740a9_B1 + mw4f453c9c_a4a1_4d03_a1b9_243580f1d942_B1 -> mw538a3c71_29fe_4d44_9325_c8a1ffafb19d_B1; mw40fc5ec9_5918_4117_96f6_53cebc1515e9_B1_TXTL_RNAdeg_F*mwb4630ba2_e015_4781_ae70_8c24b6e740a9_B1*mw4f453c9c_a4a1_4d03_a1b9_243580f1d942_B1 - mw40fc5ec9_5918_4117_96f6_53cebc1515e9_B1_TXTL_RNAdeg_R*mw538a3c71_29fe_4d44_9325_c8a1ffafb19d_B1;
    mw40fc5ec9_5918_4117_96f6_53cebc1515e9_B1_TXTL_RNAdeg_F = 10; mw40fc5ec9_5918_4117_96f6_53cebc1515e9_B1_TXTL_RNAdeg_R = 2000;
  mwe3896efa_25fe_4048_9cae_49b3a2133d6c_B1: mw538a3c71_29fe_4d44_9325_c8a1ffafb19d_B1 => mw4f453c9c_a4a1_4d03_a1b9_243580f1d942_B1 + mwe9049d27_bfa6_4d5d_a0d3_42922e3af392_B1 + mwe288cc4d_bd5c_430e_acab_0b3cd6abf225_B1; mwe3896efa_25fe_4048_9cae_49b3a2133d6c_B1_TXTL_RNAdeg_F*mw538a3c71_29fe_4d44_9325_c8a1ffafb19d_B1;
    mwe3896efa_25fe_4048_9cae_49b3a2133d6c_B1_TXTL_RNAdeg_F = 0.002777778;
  mw59bcd6fa_cc8f_4338_b15c_a808ff32cce7_B1: mwce985125_4033_4878_99c7_9fa79ad26a8b_B1 + mw877e5da9_7092_45a9_a813_ef218b4c657d_B1 -> mwdc1e07fe_9c7d_43d2_9ae9_2e9bb4e826f3_B1; SigmaX_RNAP_F*mwce985125_4033_4878_99c7_9fa79ad26a8b_B1*mw877e5da9_7092_45a9_a813_ef218b4c657d_B1 - SigmaX_RNAP_R*mwdc1e07fe_9c7d_43d2_9ae9_2e9bb4e826f3_B1;
    SigmaX_RNAP_F = 100; SigmaX_RNAP_R = 0.1;
  mwc3f28b59_7cb5_4353_bae0_767858ad8c68_B1: mw36edb9f5_273a_49e0_934c_53af44826f29_B1 + mwe288cc4d_bd5c_430e_acab_0b3cd6abf225_B1 -> mw3f61c48c_778f_42d0_bc92_da35a18105d3_B1; mwc3f28b59_7cb5_4353_bae0_767858ad8c68_B1_TXTL_UTR_UTR1_F*mw36edb9f5_273a_49e0_934c_53af44826f29_B1*mwe288cc4d_bd5c_430e_acab_0b3cd6abf225_B1 - mwc3f28b59_7cb5_4353_bae0_767858ad8c68_B1_TXTL_UTR_UTR1_R*mw3f61c48c_778f_42d0_bc92_da35a18105d3_B1;
    mwc3f28b59_7cb5_4353_bae0_767858ad8c68_B1_TXTL_UTR_UTR1_F = 0.2; mwc3f28b59_7cb5_4353_bae0_767858ad8c68_B1_TXTL_UTR_UTR1_R = 4;
  mw0dcc995e_e463_40ed_ad43_74a81107ca2d_B1: mw29bca20f_bb74_4aea_a37a_0df7c5808987_B1 + mwce985125_4033_4878_99c7_9fa79ad26a8b_B1 -> mw2ee2aa24_784a_4146_b966_da635c45f303_B1; TXTL_PLAC_RNAPbound_F*mw29bca20f_bb74_4aea_a37a_0df7c5808987_B1*mwce985125_4033_4878_99c7_9fa79ad26a8b_B1 - TXTL_PLAC_RNAPbound_R*mw2ee2aa24_784a_4146_b966_da635c45f303_B1;
    TXTL_PLAC_RNAPbound_F = 20; TXTL_PLAC_RNAPbound_R = 400;
  mw6403af47_569e_42c4_866d_4977450446e3_B1: mwc92d9367_0957_4147_8d27_b4d8aaf06cb6_B1 => mw2ee2aa24_784a_4146_b966_da635c45f303_B1; mw6403af47_569e_42c4_866d_4977450446e3_B1_TXTL_NTP_consumption*mwc92d9367_0957_4147_8d27_b4d8aaf06cb6_B1;
    mw6403af47_569e_42c4_866d_4977450446e3_B1_TXTL_NTP_consumption = 0.7485294;
  mwc774b860_1f93_4404_aac3_2f8e87ebc360_B1: mw6ff72b56_f396_433c_8b68_d4b90158ef92_B1 => mwce985125_4033_4878_99c7_9fa79ad26a8b_B1 + mw29bca20f_bb74_4aea_a37a_0df7c5808987_B1; mwc774b860_1f93_4404_aac3_2f8e87ebc360_B1_TXTL_RNAPBOUND_TERMINATION_RATE*mw6ff72b56_f396_433c_8b68_d4b90158ef92_B1;
    mwc774b860_1f93_4404_aac3_2f8e87ebc360_B1_TXTL_RNAPBOUND_TERMINATION_RATE = 0.05;
  mw4f6441ab_bfba_46d6_9644_73cbc5497d02_B1: mw2ee2aa24_784a_4146_b966_da635c45f303_B1 + mwe041b8b1_92b6_4c2b_8e78_5212f5644e01_B1 -> mw9bde46ed_23e4_4399_ac0a_9c28ab16893e_B1; mw4f6441ab_bfba_46d6_9644_73cbc5497d02_B1_TXTL_NTP_RNAP_F*mw2ee2aa24_784a_4146_b966_da635c45f303_B1*mwe041b8b1_92b6_4c2b_8e78_5212f5644e01_B1 - mw4f6441ab_bfba_46d6_9644_73cbc5497d02_B1_TXTL_NTP_RNAP_R*mw9bde46ed_23e4_4399_ac0a_9c28ab16893e_B1;
    mw4f6441ab_bfba_46d6_9644_73cbc5497d02_B1_TXTL_NTP_RNAP_F = 1000; mw4f6441ab_bfba_46d6_9644_73cbc5497d02_B1_TXTL_NTP_RNAP_R = 120000000;
  mw3b413180_8b6b_4553_9468_7abf0f0f8c87_B1: mw2ee2aa24_784a_4146_b966_da635c45f303_B1 + mw0224b269_aae5_4ca1_a6e6_3607229b0a5b_B1 -> mw90d19c58_7381_4cb3_8dfb_787c23b6ebeb_B1; mw3b413180_8b6b_4553_9468_7abf0f0f8c87_B1_TXTL_NTP_RNAP_F*mw2ee2aa24_784a_4146_b966_da635c45f303_B1*mw0224b269_aae5_4ca1_a6e6_3607229b0a5b_B1 - mw3b413180_8b6b_4553_9468_7abf0f0f8c87_B1_TXTL_NTP_RNAP_R*mw90d19c58_7381_4cb3_8dfb_787c23b6ebeb_B1;
    mw3b413180_8b6b_4553_9468_7abf0f0f8c87_B1_TXTL_NTP_RNAP_F = 1000; mw3b413180_8b6b_4553_9468_7abf0f0f8c87_B1_TXTL_NTP_RNAP_R = 120000000;
  mw1ab61d53_91f3_4289_bfba_9021248ec3ca_B1: mw9bde46ed_23e4_4399_ac0a_9c28ab16893e_B1 + mw0224b269_aae5_4ca1_a6e6_3607229b0a5b_B1 -> mwc92d9367_0957_4147_8d27_b4d8aaf06cb6_B1; mw1ab61d53_91f3_4289_bfba_9021248ec3ca_B1_TXTL_NTP_RNAP_F*mw9bde46ed_23e4_4399_ac0a_9c28ab16893e_B1*mw0224b269_aae5_4ca1_a6e6_3607229b0a5b_B1 - mw1ab61d53_91f3_4289_bfba_9021248ec3ca_B1_TXTL_NTP_RNAP_R*mwc92d9367_0957_4147_8d27_b4d8aaf06cb6_B1;
    mw1ab61d53_91f3_4289_bfba_9021248ec3ca_B1_TXTL_NTP_RNAP_F = 1; mw1ab61d53_91f3_4289_bfba_9021248ec3ca_B1_TXTL_NTP_RNAP_R = 120000;
  mw127157e3_be87_46a4_bc03_e41d6c6a4ab9_B1: mw90d19c58_7381_4cb3_8dfb_787c23b6ebeb_B1 + mwe041b8b1_92b6_4c2b_8e78_5212f5644e01_B1 -> mwc92d9367_0957_4147_8d27_b4d8aaf06cb6_B1; mw127157e3_be87_46a4_bc03_e41d6c6a4ab9_B1_TXTL_NTP_RNAP_F*mw90d19c58_7381_4cb3_8dfb_787c23b6ebeb_B1*mwe041b8b1_92b6_4c2b_8e78_5212f5644e01_B1 - mw127157e3_be87_46a4_bc03_e41d6c6a4ab9_B1_TXTL_NTP_RNAP_R*mwc92d9367_0957_4147_8d27_b4d8aaf06cb6_B1;
    mw127157e3_be87_46a4_bc03_e41d6c6a4ab9_B1_TXTL_NTP_RNAP_F = 1; mw127157e3_be87_46a4_bc03_e41d6c6a4ab9_B1_TXTL_NTP_RNAP_R = 120000;
  mwd6d3384b_3691_41d7_bc41_b3b215bd4a15_B1: mwc92d9367_0957_4147_8d27_b4d8aaf06cb6_B1 => mw6ff72b56_f396_433c_8b68_d4b90158ef92_B1 + mw36edb9f5_273a_49e0_934c_53af44826f29_B1; mwd6d3384b_3691_41d7_bc41_b3b215bd4a15_B1_TXTL_transcription_rate1*mwc92d9367_0957_4147_8d27_b4d8aaf06cb6_B1;
    mwd6d3384b_3691_41d7_bc41_b3b215bd4a15_B1_TXTL_transcription_rate1 = 0.001470588;
  mw1d0d2f91_0b60_446c_a578_088f701f47cf_B1: mw3f61c48c_778f_42d0_bc92_da35a18105d3_B1 + mwe9049d27_bfa6_4d5d_a0d3_42922e3af392_B1 -> mw5295d527_9f1d_4e8e_b95c_86adacac9bbf_B1; mw1d0d2f91_0b60_446c_a578_088f701f47cf_B1_TL_AA_F*mw3f61c48c_778f_42d0_bc92_da35a18105d3_B1*mwe9049d27_bfa6_4d5d_a0d3_42922e3af392_B1 - mw1d0d2f91_0b60_446c_a578_088f701f47cf_B1_TL_AA_R*mw5295d527_9f1d_4e8e_b95c_86adacac9bbf_B1;
    mw1d0d2f91_0b60_446c_a578_088f701f47cf_B1_TL_AA_F = 300; mw1d0d2f91_0b60_446c_a578_088f701f47cf_B1_TL_AA_R = 0.1;
  mw31d784ba_0621_4451_b089_d8c1c05f910c_B1: mw5295d527_9f1d_4e8e_b95c_86adacac9bbf_B1 + 2 mwe041b8b1_92b6_4c2b_8e78_5212f5644e01_B1 -> mw28e4173c_cdc1_46d3_a5fc_1ef799b41f32_B1; mw31d784ba_0621_4451_b089_d8c1c05f910c_B1_TL_AGTP_F*mw5295d527_9f1d_4e8e_b95c_86adacac9bbf_B1*mwe041b8b1_92b6_4c2b_8e78_5212f5644e01_B1^2 - mw31d784ba_0621_4451_b089_d8c1c05f910c_B1_TL_AGTP_R*mw28e4173c_cdc1_46d3_a5fc_1ef799b41f32_B1;
    mw31d784ba_0621_4451_b089_d8c1c05f910c_B1_TL_AGTP_F = 30; mw31d784ba_0621_4451_b089_d8c1c05f910c_B1_TL_AGTP_R = 10;
  mw2bd30743_8e99_4dbf_9f51_4eef5d378d81_B1: mw28e4173c_cdc1_46d3_a5fc_1ef799b41f32_B1 => mw859e0e3a_63c1_4ffd_95c2_a67b83b1d1d6_B1; mw2bd30743_8e99_4dbf_9f51_4eef5d378d81_B1_TXTL_TL_AA_consumption*mw28e4173c_cdc1_46d3_a5fc_1ef799b41f32_B1;
    mw2bd30743_8e99_4dbf_9f51_4eef5d378d81_B1_TXTL_TL_AA_consumption = 0.024;
  mwcbdcc496_6144_4981_8557_8e8a6c0e30ee_B1: mw28e4173c_cdc1_46d3_a5fc_1ef799b41f32_B1 => mw859e0e3a_63c1_4ffd_95c2_a67b83b1d1d6_B1 + mw877e5da9_7092_45a9_a813_ef218b4c657d_B1; mwcbdcc496_6144_4981_8557_8e8a6c0e30ee_B1_TXTL_TL_rate*mw28e4173c_cdc1_46d3_a5fc_1ef799b41f32_B1;
    mwcbdcc496_6144_4981_8557_8e8a6c0e30ee_B1_TXTL_TL_rate = 0.012;
  mwa02d91da_df1f_4606_9eb5_133dd6fd2ef2_B1: mw859e0e3a_63c1_4ffd_95c2_a67b83b1d1d6_B1 => mw36edb9f5_273a_49e0_934c_53af44826f29_B1 + mwe288cc4d_bd5c_430e_acab_0b3cd6abf225_B1; mwa02d91da_df1f_4606_9eb5_133dd6fd2ef2_B1_TXTL_RIBOBOUND_TERMINATION_RATE*mw859e0e3a_63c1_4ffd_95c2_a67b83b1d1d6_B1;
    mwa02d91da_df1f_4606_9eb5_133dd6fd2ef2_B1_TXTL_RIBOBOUND_TERMINATION_RATE = 50;
  mwe6370a56_7fef_432b_b1b7_e0887a1185ba_B1: mw36edb9f5_273a_49e0_934c_53af44826f29_B1 + mw4f453c9c_a4a1_4d03_a1b9_243580f1d942_B1 -> mwbe15e58d_ded7_4bf5_aadd_ae1ad48fb846_B1; mwe6370a56_7fef_432b_b1b7_e0887a1185ba_B1_TXTL_RNAdeg_F*mw36edb9f5_273a_49e0_934c_53af44826f29_B1*mw4f453c9c_a4a1_4d03_a1b9_243580f1d942_B1 - mwe6370a56_7fef_432b_b1b7_e0887a1185ba_B1_TXTL_RNAdeg_R*mwbe15e58d_ded7_4bf5_aadd_ae1ad48fb846_B1;
    mwe6370a56_7fef_432b_b1b7_e0887a1185ba_B1_TXTL_RNAdeg_F = 10; mwe6370a56_7fef_432b_b1b7_e0887a1185ba_B1_TXTL_RNAdeg_R = 2000;
  mwee613a14_bfe0_43e8_bae8_1f0f83e16135_B1: mwbe15e58d_ded7_4bf5_aadd_ae1ad48fb846_B1 => mw4f453c9c_a4a1_4d03_a1b9_243580f1d942_B1; mwee613a14_bfe0_43e8_bae8_1f0f83e16135_B1_TXTL_RNAdeg_F*mwbe15e58d_ded7_4bf5_aadd_ae1ad48fb846_B1;
    mwee613a14_bfe0_43e8_bae8_1f0f83e16135_B1_TXTL_RNAdeg_F = 0.002777778;
  mwb7f61065_72d2_46f5_bb6f_37beed98539c_B1: mw3f61c48c_778f_42d0_bc92_da35a18105d3_B1 + mw4f453c9c_a4a1_4d03_a1b9_243580f1d942_B1 -> mwa1fc1ae9_7ea5_4b19_bfdd_e783762ed1b9_B1; mwb7f61065_72d2_46f5_bb6f_37beed98539c_B1_TXTL_RNAdeg_F*mw3f61c48c_778f_42d0_bc92_da35a18105d3_B1*mw4f453c9c_a4a1_4d03_a1b9_243580f1d942_B1 - mwb7f61065_72d2_46f5_bb6f_37beed98539c_B1_TXTL_RNAdeg_R*mwa1fc1ae9_7ea5_4b19_bfdd_e783762ed1b9_B1;
    mwb7f61065_72d2_46f5_bb6f_37beed98539c_B1_TXTL_RNAdeg_F = 10; mwb7f61065_72d2_46f5_bb6f_37beed98539c_B1_TXTL_RNAdeg_R = 2000;
  mw597bebe5_a96a_4610_ac5b_f36a7cccfb65_B1: mwa1fc1ae9_7ea5_4b19_bfdd_e783762ed1b9_B1 => mw4f453c9c_a4a1_4d03_a1b9_243580f1d942_B1 + mwe288cc4d_bd5c_430e_acab_0b3cd6abf225_B1; mw597bebe5_a96a_4610_ac5b_f36a7cccfb65_B1_TXTL_RNAdeg_F*mwa1fc1ae9_7ea5_4b19_bfdd_e783762ed1b9_B1;
    mw597bebe5_a96a_4610_ac5b_f36a7cccfb65_B1_TXTL_RNAdeg_F = 0.002777778;
  mwdc07340f_d8c6_4ef9_a771_267251e21f6d_B1: mw28e4173c_cdc1_46d3_a5fc_1ef799b41f32_B1 + mw4f453c9c_a4a1_4d03_a1b9_243580f1d942_B1 -> mw2f9c1825_57e6_48b8_878b_5f84570d0f7b_B1; mwdc07340f_d8c6_4ef9_a771_267251e21f6d_B1_TXTL_RNAdeg_F*mw28e4173c_cdc1_46d3_a5fc_1ef799b41f32_B1*mw4f453c9c_a4a1_4d03_a1b9_243580f1d942_B1 - mwdc07340f_d8c6_4ef9_a771_267251e21f6d_B1_TXTL_RNAdeg_R*mw2f9c1825_57e6_48b8_878b_5f84570d0f7b_B1;
    mwdc07340f_d8c6_4ef9_a771_267251e21f6d_B1_TXTL_RNAdeg_F = 10; mwdc07340f_d8c6_4ef9_a771_267251e21f6d_B1_TXTL_RNAdeg_R = 2000;
  mw1e52bda6_b7a1_4628_b19b_af839f3dd831_B1: mw2f9c1825_57e6_48b8_878b_5f84570d0f7b_B1 => mw4f453c9c_a4a1_4d03_a1b9_243580f1d942_B1 + mwe9049d27_bfa6_4d5d_a0d3_42922e3af392_B1 + 2 mwe041b8b1_92b6_4c2b_8e78_5212f5644e01_B1 + mwe288cc4d_bd5c_430e_acab_0b3cd6abf225_B1; mw1e52bda6_b7a1_4628_b19b_af839f3dd831_B1_TXTL_RNAdeg_F*mw2f9c1825_57e6_48b8_878b_5f84570d0f7b_B1;
    mw1e52bda6_b7a1_4628_b19b_af839f3dd831_B1_TXTL_RNAdeg_F = 0.002777778;
  mw94ec40e4_c61a_44d4_adef_4fc7db33db29_B1: mw859e0e3a_63c1_4ffd_95c2_a67b83b1d1d6_B1 + mw4f453c9c_a4a1_4d03_a1b9_243580f1d942_B1 -> mw6de5993d_c5be_4d0b_8507_656ff4d0b17b_B1; mw94ec40e4_c61a_44d4_adef_4fc7db33db29_B1_TXTL_RNAdeg_F*mw859e0e3a_63c1_4ffd_95c2_a67b83b1d1d6_B1*mw4f453c9c_a4a1_4d03_a1b9_243580f1d942_B1 - mw94ec40e4_c61a_44d4_adef_4fc7db33db29_B1_TXTL_RNAdeg_R*mw6de5993d_c5be_4d0b_8507_656ff4d0b17b_B1;
    mw94ec40e4_c61a_44d4_adef_4fc7db33db29_B1_TXTL_RNAdeg_F = 10; mw94ec40e4_c61a_44d4_adef_4fc7db33db29_B1_TXTL_RNAdeg_R = 2000;
  mw10dbdd40_a144_4e94_ae79_6cebc3c137db_B1: mw6de5993d_c5be_4d0b_8507_656ff4d0b17b_B1 => mw4f453c9c_a4a1_4d03_a1b9_243580f1d942_B1 + mwe288cc4d_bd5c_430e_acab_0b3cd6abf225_B1; mw10dbdd40_a144_4e94_ae79_6cebc3c137db_B1_TXTL_RNAdeg_F*mw6de5993d_c5be_4d0b_8507_656ff4d0b17b_B1;
    mw10dbdd40_a144_4e94_ae79_6cebc3c137db_B1_TXTL_RNAdeg_F = 0.002777778;
  mwe97790e5_c559_40b7_9ca9_160f3cecbc82_B1: mw5295d527_9f1d_4e8e_b95c_86adacac9bbf_B1 + mw4f453c9c_a4a1_4d03_a1b9_243580f1d942_B1 -> mw8b8e7de3_298d_4e5b_9ad2_f3adb3660424_B1; mwe97790e5_c559_40b7_9ca9_160f3cecbc82_B1_TXTL_RNAdeg_F*mw5295d527_9f1d_4e8e_b95c_86adacac9bbf_B1*mw4f453c9c_a4a1_4d03_a1b9_243580f1d942_B1 - mwe97790e5_c559_40b7_9ca9_160f3cecbc82_B1_TXTL_RNAdeg_R*mw8b8e7de3_298d_4e5b_9ad2_f3adb3660424_B1;
    mwe97790e5_c559_40b7_9ca9_160f3cecbc82_B1_TXTL_RNAdeg_F = 10; mwe97790e5_c559_40b7_9ca9_160f3cecbc82_B1_TXTL_RNAdeg_R = 2000;
  mw04d87a2d_939b_480b_ad42_abb512e42089_B1: mw8b8e7de3_298d_4e5b_9ad2_f3adb3660424_B1 => mw4f453c9c_a4a1_4d03_a1b9_243580f1d942_B1 + mwe9049d27_bfa6_4d5d_a0d3_42922e3af392_B1 + mwe288cc4d_bd5c_430e_acab_0b3cd6abf225_B1; mw04d87a2d_939b_480b_ad42_abb512e42089_B1_TXTL_RNAdeg_F*mw8b8e7de3_298d_4e5b_9ad2_f3adb3660424_B1;
    mw04d87a2d_939b_480b_ad42_abb512e42089_B1_TXTL_RNAdeg_F = 0.002777778;
  mw0e13176a_be8d_4e51_998b_103195c25fc2_B1: mwe041b8b1_92b6_4c2b_8e78_5212f5644e01_B1 => mwff9bade0_4398_4b01_a00e_4bb92b82929f_B1; mw786a2e83_d802_4211_81cc_786f08db726f_B1*mwe041b8b1_92b6_4c2b_8e78_5212f5644e01_B1;

  // Events:
  event_174: at (time <= 5400): mw1b3c7b9e_a9ce_4463_ac55_43201909284a_A0 = 0;
  event_175: at (time > 5400): mw1b3c7b9e_a9ce_4463_ac55_43201909284a_A0 = 0.0002;
  event_176: at (time <= 5400): mw786a2e83_d802_4211_81cc_786f08db726f_B1 = 0;
  event_177: at (time > 5400): mw786a2e83_d802_4211_81cc_786f08db726f_B1 = 0.0002;

  // Unit definitions:
  unit volume = litre;
  unit substance = mole;
  unit area = metre^2;
end
