// SBML level 3 version 2

model combined_model_of__mw967a8ab1_b005_4143_b8a9_50eb345f7156_mwb7b30f7e_2bb5_4b6c_8324_279211b36574()
  // model units - substance: substance, time: second, volume: volume, area: area, length: metre, extent: substance

  // Compartments:
  compartment cell = 5 volume;

  // Species:
  species mwbc293b51_8dc7_482a_a166_48a08fcf70c0_A1 in cell = 100.0001/cell; mwbc293b51_8dc7_482a_a166_48a08fcf70c0_A1 is "RNAP";
  species mw594b7843_33b7_4d56_8d09_d26fee2a0f42_A1 in cell = 30.00002/cell; mw594b7843_33b7_4d56_8d09_d26fee2a0f42_A1 is "Ribo";
  species mw113bfdc1_1a35_487b_a1d3_4e87711c7ad9_A1 in cell = 5.000003/cell; mw113bfdc1_1a35_487b_a1d3_4e87711c7ad9_A1 is "RecBCD";
  species mw27046043_506c_4103_934f_0748df8dafa4_A1 in cell = 100.0001/cell; mw27046043_506c_4103_934f_0748df8dafa4_A1 is "RNase";
  species mwd8ef21ee_e9ca_4fc9_8dcb_29c5bd7134bf_A1 in cell = 3180048/cell; mwd8ef21ee_e9ca_4fc9_8dcb_29c5bd7134bf_A1 is "AGTP";
  species mw8088dcad_75d7_4cb8_b044_4b2f2554ea24_A1 in cell = 1908029/cell; mw8088dcad_75d7_4cb8_b044_4b2f2554ea24_A1 is "CUTP";
  species mwe2d770f4_9878_44f4_b4a1_e7f76d106315_A1 in cell = 3.180048e7/cell; mwe2d770f4_9878_44f4_b4a1_e7f76d106315_A1 is "AA";
  species mwcd1c814e_f9b8_4d24_884f_d5704904c450_A1 in cell = 0; mwcd1c814e_f9b8_4d24_884f_d5704904c450_A1 is "protein deGFP";
  species mwf2ce0d3a_c24a_40e1_97ae_5d8239face0e_A1 in cell = 0; mwf2ce0d3a_c24a_40e1_97ae_5d8239face0e_A1 is "protein deGFP*";
  species mwbd0de251_9de9_4624_94eb_1d758cdcf826_A1 in cell = 0; mwbd0de251_9de9_4624_94eb_1d758cdcf826_A1 is "RNA utr1--deGFP";
  species mw37e1a28e_e2b4_401d_b9d3_c1ea5bda1065_A1 in cell = 0; mw37e1a28e_e2b4_401d_b9d3_c1ea5bda1065_A1 is "Ribo:RNA utr1--deGFP";
  species mw87691a6b_7cd2_4ddd_839b_43c6d02d7331_A1 in cell = 2.000001/cell; mw87691a6b_7cd2_4ddd_839b_43c6d02d7331_A1 is "DNA p28_ptet--utr1--deGFP";
  species mw20a1da32_7c46_4a5c_8879_3ad39876a732_A1 in cell = 0; mw20a1da32_7c46_4a5c_8879_3ad39876a732_A1 is "RNAP28";
  species mwdf0c8dc3_f696_4ab1_86ce_7dfb1a89edb0_A1 in cell = 0; mwdf0c8dc3_f696_4ab1_86ce_7dfb1a89edb0_A1 is "RNAP28:DNA p28_ptet--utr1--deGFP";
  species mw39fc0fca_dcae_441f_895a_36ffd39fb240_A1 in cell = 0; mw39fc0fca_dcae_441f_895a_36ffd39fb240_A1 is "protein sigma28";
  species mw6e225233_4608_4bf8_9195_7e11a89791f2_A1 in cell = 0; mw6e225233_4608_4bf8_9195_7e11a89791f2_A1 is "protein tetRdimer";
  species mw767cfd85_1821_4540_a684_152047e82155_A1 in cell = 0; mw767cfd85_1821_4540_a684_152047e82155_A1 is "CUTP:AGTP:RNAP28:DNA p28_ptet--utr1--deGFP";
  species mw160f7d4f_5670_4840_8fd1_2b77a0ee69a5_A1 in cell = 0; mw160f7d4f_5670_4840_8fd1_2b77a0ee69a5_A1 is "term_RNAP28:DNA p28_ptet--utr1--deGFP";
  species mw2b7b6b31_58f9_4148_b27d_9e4e41a5e0b6_A1 in cell = 0; mw2b7b6b31_58f9_4148_b27d_9e4e41a5e0b6_A1 is "RNAP28:DNA p28_ptet--utr1--deGFP:protein tetRdimer";
  species mw33d7e051_c27d_4612_baf5_1288c43a7aa2_A1 in cell = 0; mw33d7e051_c27d_4612_baf5_1288c43a7aa2_A1 is "CUTP:AGTP:RNAP28:DNA p28_ptet--utr1--deGFP:protein tetRdimer";
  species mw51c25126_57a0_4186_9809_4aae5461f0c3_A1 in cell = 0; mw51c25126_57a0_4186_9809_4aae5461f0c3_A1 is "term_RNAP28:DNA p28_ptet--utr1--deGFP:protein tetRdimer";
  species mw26fe5026_1c10_4917_b448_ebc246eac265_A1 in cell = 0; mw26fe5026_1c10_4917_b448_ebc246eac265_A1 is "AA:2AGTP:Ribo:RNA utr1--deGFP";
  species mw15465405_e52f_419d_855c_6598432b9882_A1 in cell = 0; mw15465405_e52f_419d_855c_6598432b9882_A1 is "term_Ribo:RNA utr1--deGFP";
  species mw159b5269_c579_43b5_abc6_26e4f63e7bbe_A1 in cell = 0; mw159b5269_c579_43b5_abc6_26e4f63e7bbe_A1 is "RNA utr1--sigma28";
  species mw723b9f32_93c9_43a1_8211_96ed49f884fc_A1 in cell = 0; mw723b9f32_93c9_43a1_8211_96ed49f884fc_A1 is "Ribo:RNA utr1--sigma28";
  species mwe0637f7e_f800_4cab_a905_3d73c03f4421_A1 in cell = 0.2000001/cell; mwe0637f7e_f800_4cab_a905_3d73c03f4421_A1 is "DNA plac--utr1--sigma28";
  species mwaa84c5c4_3442_413c_9e85_94a1701809bc_A1 in cell = 0; mwaa84c5c4_3442_413c_9e85_94a1701809bc_A1 is "RNAP:DNA plac--utr1--sigma28";
  species mw12b99714_0096_4228_8bd1_56f6f073b8fc_A1 in cell = 0; mw12b99714_0096_4228_8bd1_56f6f073b8fc_A1 is "CUTP:AGTP:RNAP:DNA plac--utr1--sigma28";
  species mwd42f73fc_1ebd_4594_9b18_c6dc092c4988_A1 in cell = 0; mwd42f73fc_1ebd_4594_9b18_c6dc092c4988_A1 is "term_RNAP:DNA plac--utr1--sigma28";
  species mw3a503b2f_f902_4b3d_aa4c_f902f0264a37_A1 in cell = 0; mw3a503b2f_f902_4b3d_aa4c_f902f0264a37_A1 is "AA:2AGTP:Ribo:RNA utr1--sigma28";
  species mw92db7974_c165_491c_8c88_79dd770dbc24_A1 in cell = 0; mw92db7974_c165_491c_8c88_79dd770dbc24_A1 is "term_Ribo:RNA utr1--sigma28";
  species mwef07ee12_d243_46b6_89d4_bc28da816df2_A1 in cell = 0; mwef07ee12_d243_46b6_89d4_bc28da816df2_A1 is "protein tetR";
  species mw3a0e9d86_a92b_48f1_9223_3cfccc763b62_A1 in cell = 0; mw3a0e9d86_a92b_48f1_9223_3cfccc763b62_A1 is "aTc";
  species mwb068be83_9a00_46e5_aba9_9f0397045c72_A1 in cell = 0; mwb068be83_9a00_46e5_aba9_9f0397045c72_A1 is "2 aTc:protein tetRdimer";
  species mwf9018752_1c9d_4f16_9589_f9f097925a05_A1 in cell = 0; mwf9018752_1c9d_4f16_9589_f9f097925a05_A1 is "DNA p28_ptet--utr1--deGFP:protein tetRdimer";
  species mwb814d2ca_9454_4d78_98cd_0b4149c00f23_A1 in cell = 0; mwb814d2ca_9454_4d78_98cd_0b4149c00f23_A1 is "AGTP:RNAP28:DNA p28_ptet--utr1--deGFP";
  species mw3f43dd50_395a_41c0_b13a_cafb4df0cbc0_A1 in cell = 0; mw3f43dd50_395a_41c0_b13a_cafb4df0cbc0_A1 is "CUTP:RNAP28:DNA p28_ptet--utr1--deGFP";
  species mw6ec81de9_8855_488e_8573_5f723ada6335_A1 in cell = 0; mw6ec81de9_8855_488e_8573_5f723ada6335_A1 is "AGTP:RNAP28:DNA p28_ptet--utr1--deGFP:protein tetRdimer";
  species mwba8c5d42_edfd_45cf_8015_44d6c0292132_A1 in cell = 0; mwba8c5d42_edfd_45cf_8015_44d6c0292132_A1 is "CUTP:RNAP28:DNA p28_ptet--utr1--deGFP:protein tetRdimer";
  species mw0622e252_6a81_4d00_87d0_bc1b92321eda_A1 in cell = 0; mw0622e252_6a81_4d00_87d0_bc1b92321eda_A1 is "AA:Ribo:RNA utr1--deGFP";
  species mw4bae209d_759b_43de_b743_890e224c3c89_A1 in cell = 0; mw4bae209d_759b_43de_b743_890e224c3c89_A1 is "RNA utr1--deGFP:RNase";
  species mw77d678ec_db89_4b4f_931a_1ec88923ef06_A1 in cell = 0; mw77d678ec_db89_4b4f_931a_1ec88923ef06_A1 is "Ribo:RNA utr1--deGFP:RNase";
  species mw6bdd6a42_9a73_4258_be16_ffb0862f4562_A1 in cell = 0; mw6bdd6a42_9a73_4258_be16_ffb0862f4562_A1 is "AA:2AGTP:Ribo:RNA utr1--deGFP:RNase";
  species mw119364e8_fa9c_40f2_96cc_db4b33a0963c_A1 in cell = 0; mw119364e8_fa9c_40f2_96cc_db4b33a0963c_A1 is "term_Ribo:RNA utr1--deGFP:RNase";
  species mwc9810a52_fda0_4aed_ac03_1d0888c20bed_A1 in cell = 0; mwc9810a52_fda0_4aed_ac03_1d0888c20bed_A1 is "AA:Ribo:RNA utr1--deGFP:RNase";
  species mw51a418e8_c9ef_4962_ba5d_cbba756856d4_A1 in cell = 0; mw51a418e8_c9ef_4962_ba5d_cbba756856d4_A1 is "AGTP:RNAP:DNA plac--utr1--sigma28";
  species mwd8d88450_7aa2_4a23_9f23_9f35b73ef802_A1 in cell = 0; mwd8d88450_7aa2_4a23_9f23_9f35b73ef802_A1 is "CUTP:RNAP:DNA plac--utr1--sigma28";
  species mw7629a538_33fa_422e_9578_e65d19d44075_A1 in cell = 0; mw7629a538_33fa_422e_9578_e65d19d44075_A1 is "AA:Ribo:RNA utr1--sigma28";
  species mw0f226cf0_c928_4c2a_9129_2dbecb533b8a_A1 in cell = 0; mw0f226cf0_c928_4c2a_9129_2dbecb533b8a_A1 is "RNA utr1--sigma28:RNase";
  species mw78d86b82_eb53_4471_a341_dc0987b8c524_A1 in cell = 0; mw78d86b82_eb53_4471_a341_dc0987b8c524_A1 is "Ribo:RNA utr1--sigma28:RNase";
  species mwf2948b32_54ad_4e76_be2a_39ecc8d961c6_A1 in cell = 0; mwf2948b32_54ad_4e76_be2a_39ecc8d961c6_A1 is "AA:2AGTP:Ribo:RNA utr1--sigma28:RNase";
  species mw32f64a96_a32d_492d_9e54_605c79f936ad_A1 in cell = 0; mw32f64a96_a32d_492d_9e54_605c79f936ad_A1 is "term_Ribo:RNA utr1--sigma28:RNase";
  species mwe99f1695_b38c_4adc_bdfc_014007d37ad3_A1 in cell = 0; mwe99f1695_b38c_4adc_bdfc_014007d37ad3_A1 is "AA:Ribo:RNA utr1--sigma28:RNase";
  species mweb394987_d45b_41cf_8716_52dc428a420b_A1 in cell = 0; mweb394987_d45b_41cf_8716_52dc428a420b_A1 is "AGTP_USED";
  species mw73633641_2eca_4c24_9c40_f1a831a85ce6_B0 in cell = 100.0001/cell; mw73633641_2eca_4c24_9c40_f1a831a85ce6_B0 is "RNAP";
  species mw2b343d8b_4d07_4836_844b_b44127112e3d_B0 in cell = 30.00002/cell; mw2b343d8b_4d07_4836_844b_b44127112e3d_B0 is "Ribo";
  species mw7f68c32d_d97e_4c82_ab9f_8a2c381c40c8_B0 in cell = 5.000003/cell; mw7f68c32d_d97e_4c82_ab9f_8a2c381c40c8_B0 is "RecBCD";
  species mwe84e6e02_afc6_4ec7_8e8c_c6cfee2e4870_B0 in cell = 100.0001/cell; mwe84e6e02_afc6_4ec7_8e8c_c6cfee2e4870_B0 is "RNase";
  species mwb62b7991_b106_4a2f_931f_40a65f85ab0d_B0 in cell = 3180048/cell; mwb62b7991_b106_4a2f_931f_40a65f85ab0d_B0 is "AGTP";
  species mw4d3dc3a0_c7e7_4793_bd6f_f38b03662af0_B0 in cell = 1908029/cell; mw4d3dc3a0_c7e7_4793_bd6f_f38b03662af0_B0 is "CUTP";
  species mw8304bde5_acc0_4aea_b6a2_f12c80948065_B0 in cell = 3.180048e7/cell; mw8304bde5_acc0_4aea_b6a2_f12c80948065_B0 is "AA";
  species mw4069bf5e_f87a_409a_8490_c7d740c73042_B0 in cell = 0; mw4069bf5e_f87a_409a_8490_c7d740c73042_B0 is "protein tetR";
  species mw0fad3201_6cd9_4687_8519_5cfd5e5092b1_B0 in cell = 0; mw0fad3201_6cd9_4687_8519_5cfd5e5092b1_B0 is "aTc";
  species mw9a01a893_6b8b_42bb_8c14_609b768e905d_B0 in cell = 0; mw9a01a893_6b8b_42bb_8c14_609b768e905d_B0 is "protein tetRdimer";
  species mw62fc188b_4039_4e2f_bf56_f8890887ccd3_B0 in cell = 0; mw62fc188b_4039_4e2f_bf56_f8890887ccd3_B0 is "RNA utr1--tetR";
  species mwb97b2b35_db15_4990_98ba_5a74215259ad_B0 in cell = 0; mwb97b2b35_db15_4990_98ba_5a74215259ad_B0 is "Ribo:RNA utr1--tetR";
  species mw874d6152_56ef_47b1_949c_9ed7b73480aa_B0 in cell = 0.5000003/cell; mw874d6152_56ef_47b1_949c_9ed7b73480aa_B0 is "DNA psigX--utr1--tetR";
  species mwd22ece93_f44b_48e4_bb8c_177fa0067589_B0 in cell = 0; mwd22ece93_f44b_48e4_bb8c_177fa0067589_B0 is "RNAPSIGX";
  species mw2dc1bd9a_10f3_4348_9fb4_b504286689ca_B0 in cell = 0; mw2dc1bd9a_10f3_4348_9fb4_b504286689ca_B0 is "RNAPSIGX:DNA psigX--utr1--tetR";
  species mw36352cbe_a247_45e6_b9e6_354dcc798511_B0 in cell = 0; mw36352cbe_a247_45e6_b9e6_354dcc798511_B0 is "AA:2AGTP:Ribo:RNA utr1--tetR";
  species mwd2f4a46e_c44c_455e_9bf7_a737b25087c5_B0 in cell = 0; mwd2f4a46e_c44c_455e_9bf7_a737b25087c5_B0 is "term_Ribo:RNA utr1--tetR";
  species mw3399a33c_c6bb_48bf_9b85_92187da7755e_B0 in cell = 0; mw3399a33c_c6bb_48bf_9b85_92187da7755e_B0 is "2 aTc:protein tetRdimer";
  species mw183f8092_3f68_4011_a9e5_e94287ff842e_B0 in cell = 0; mw183f8092_3f68_4011_a9e5_e94287ff842e_B0 is "CUTP:AGTP:RNAPSIGX:DNA psigX--utr1--tetR";
  species mw5dec5dad_6074_4727_acc8_cd49277114bb_B0 in cell = 0; mw5dec5dad_6074_4727_acc8_cd49277114bb_B0 is "term_RNAPSIGX:DNA psigX--utr1--tetR";
  species mw36f04b11_2109_44eb_89a8_e15c0b4d283d_B0 in cell = 0; mw36f04b11_2109_44eb_89a8_e15c0b4d283d_B0 is "AGTP:RNAPSIGX:DNA psigX--utr1--tetR";
  species mw368d475f_4f12_4e7f_af0a_98d65de40bd3_B0 in cell = 0; mw368d475f_4f12_4e7f_af0a_98d65de40bd3_B0 is "CUTP:RNAPSIGX:DNA psigX--utr1--tetR";
  species mwbef6706d_0ceb_4dbc_a1bf_58886b077efa_B0 in cell = 0; mwbef6706d_0ceb_4dbc_a1bf_58886b077efa_B0 is "AA:Ribo:RNA utr1--tetR";
  species mwf1fe5659_5ec5_45eb_9c43_16e33a2a8c10_B0 in cell = 0; mwf1fe5659_5ec5_45eb_9c43_16e33a2a8c10_B0 is "RNA utr1--tetR:RNase";
  species mw644b56a3_225e_4905_b91d_65641194fb7b_B0 in cell = 0; mw644b56a3_225e_4905_b91d_65641194fb7b_B0 is "Ribo:RNA utr1--tetR:RNase";
  species mw0b2d0b19_df92_4fa0_a113_72605c1f5822_B0 in cell = 0; mw0b2d0b19_df92_4fa0_a113_72605c1f5822_B0 is "AA:2AGTP:Ribo:RNA utr1--tetR:RNase";
  species mw9e19e54e_9c37_4f15_8e19_5b74b0445750_B0 in cell = 0; mw9e19e54e_9c37_4f15_8e19_5b74b0445750_B0 is "term_Ribo:RNA utr1--tetR:RNase";
  species mwf698caa3_a223_4f23_a862_f770f6446ab9_B0 in cell = 0; mwf698caa3_a223_4f23_a862_f770f6446ab9_B0 is "AA:Ribo:RNA utr1--tetR:RNase";
  species mw987fd738_fa8b_4146_9d23_664ff607676f_B0 in cell = 0; mw987fd738_fa8b_4146_9d23_664ff607676f_B0 is "AGTP_USED";

  // Parameters:
  mw5996d02e_ace7_48f3_a137_02e414010144_A1 = 0; mw5996d02e_ace7_48f3_a137_02e414010144_A1 is "AGTPdeg_F";
  mwcc808c82_e2e9_4595_a7df_a5d245930dcd_B0 = 0; mwcc808c82_e2e9_4595_a7df_a5d245930dcd_B0 is "AGTPdeg_F";

  // Reactions:
  mw959d31fc_757b_482f_9952_6a2ad51d115a_A1: mw6e225233_4608_4bf8_9195_7e11a89791f2_A1 + 2 mw3a0e9d86_a92b_48f1_9223_3cfccc763b62_A1 -> mwb068be83_9a00_46e5_aba9_9f0397045c72_A1; mw959d31fc_757b_482f_9952_6a2ad51d115a_A1_TXTL_INDUCER_TETR_ATC_F*mw6e225233_4608_4bf8_9195_7e11a89791f2_A1*mw3a0e9d86_a92b_48f1_9223_3cfccc763b62_A1^2 - mw959d31fc_757b_482f_9952_6a2ad51d115a_A1_TXTL_INDUCER_TETR_ATC_R*mwb068be83_9a00_46e5_aba9_9f0397045c72_A1;
    mw959d31fc_757b_482f_9952_6a2ad51d115a_A1_TXTL_INDUCER_TETR_ATC_F = 1e-5; mw959d31fc_757b_482f_9952_6a2ad51d115a_A1_TXTL_INDUCER_TETR_ATC_R = 0.1;
  mwc457ec48_5146_43f1_b82b_c658314430c8_A1: 2 mwef07ee12_d243_46b6_89d4_bc28da816df2_A1 -> mw6e225233_4608_4bf8_9195_7e11a89791f2_A1; mwc457ec48_5146_43f1_b82b_c658314430c8_A1_kf*mwef07ee12_d243_46b6_89d4_bc28da816df2_A1^2 - mwc457ec48_5146_43f1_b82b_c658314430c8_A1_kr*mw6e225233_4608_4bf8_9195_7e11a89791f2_A1;
    mwc457ec48_5146_43f1_b82b_c658314430c8_A1_kf = 1; mwc457ec48_5146_43f1_b82b_c658314430c8_A1_kr = 1;
  mw4ce2286a_12a9_4730_a483_d2ad525d600e_A1: mwcd1c814e_f9b8_4d24_884f_d5704904c450_A1 => mwf2ce0d3a_c24a_40e1_97ae_5d8239face0e_A1; TXTL_PROT_deGFP_MATURATION*mwcd1c814e_f9b8_4d24_884f_d5704904c450_A1;
    TXTL_PROT_deGFP_MATURATION = 0.002310491;
  mwd856cc35_c672_4cb6_b131_978bc7eb0839_A1: mwbd0de251_9de9_4624_94eb_1d758cdcf826_A1 + mw594b7843_33b7_4d56_8d09_d26fee2a0f42_A1 -> mw37e1a28e_e2b4_401d_b9d3_c1ea5bda1065_A1; mwd856cc35_c672_4cb6_b131_978bc7eb0839_A1_TXTL_UTR_UTR1_F*mwbd0de251_9de9_4624_94eb_1d758cdcf826_A1*mw594b7843_33b7_4d56_8d09_d26fee2a0f42_A1 - mwd856cc35_c672_4cb6_b131_978bc7eb0839_A1_TXTL_UTR_UTR1_R*mw37e1a28e_e2b4_401d_b9d3_c1ea5bda1065_A1;
    mwd856cc35_c672_4cb6_b131_978bc7eb0839_A1_TXTL_UTR_UTR1_F = 0.2; mwd856cc35_c672_4cb6_b131_978bc7eb0839_A1_TXTL_UTR_UTR1_R = 4;
  mw433c0e2e_474e_475a_8d07_a975fb6f7d4e_A1: mw87691a6b_7cd2_4ddd_839b_43c6d02d7331_A1 + mw20a1da32_7c46_4a5c_8879_3ad39876a732_A1 -> mwdf0c8dc3_f696_4ab1_86ce_7dfb1a89edb0_A1; TXTL_PTET_RNAPbound_F*mw87691a6b_7cd2_4ddd_839b_43c6d02d7331_A1*mw20a1da32_7c46_4a5c_8879_3ad39876a732_A1 - TXTL_PTET_RNAPbound_R*mwdf0c8dc3_f696_4ab1_86ce_7dfb1a89edb0_A1;
    TXTL_PTET_RNAPbound_F = 0.006; TXTL_PTET_RNAPbound_R = 5;
  mw78df2b18_f0dd_4192_8d11_77d6713b680d_A1: mw87691a6b_7cd2_4ddd_839b_43c6d02d7331_A1 + mw6e225233_4608_4bf8_9195_7e11a89791f2_A1 -> mwf9018752_1c9d_4f16_9589_f9f097925a05_A1; mw78df2b18_f0dd_4192_8d11_77d6713b680d_A1_kf*mw87691a6b_7cd2_4ddd_839b_43c6d02d7331_A1*mw6e225233_4608_4bf8_9195_7e11a89791f2_A1 - mw78df2b18_f0dd_4192_8d11_77d6713b680d_A1_kr*mwf9018752_1c9d_4f16_9589_f9f097925a05_A1;
    mw78df2b18_f0dd_4192_8d11_77d6713b680d_A1_kf = 0.00286; mw78df2b18_f0dd_4192_8d11_77d6713b680d_A1_kr = 1.1e-5;
  mwe57535e5_c85c_416b_8bc5_6dbf9d52da2c_A1: mwdf0c8dc3_f696_4ab1_86ce_7dfb1a89edb0_A1 + mw6e225233_4608_4bf8_9195_7e11a89791f2_A1 -> mw2b7b6b31_58f9_4148_b27d_9e4e41a5e0b6_A1; mwe57535e5_c85c_416b_8bc5_6dbf9d52da2c_A1_kf*mwdf0c8dc3_f696_4ab1_86ce_7dfb1a89edb0_A1*mw6e225233_4608_4bf8_9195_7e11a89791f2_A1 - mwe57535e5_c85c_416b_8bc5_6dbf9d52da2c_A1_kr*mw2b7b6b31_58f9_4148_b27d_9e4e41a5e0b6_A1;
    mwe57535e5_c85c_416b_8bc5_6dbf9d52da2c_A1_kf = 0.00286; mwe57535e5_c85c_416b_8bc5_6dbf9d52da2c_A1_kr = 1.1e-5;
  mw3274d922_543b_41bd_969b_6b8a7f754faf_A1: mwf9018752_1c9d_4f16_9589_f9f097925a05_A1 + mw20a1da32_7c46_4a5c_8879_3ad39876a732_A1 -> mw2b7b6b31_58f9_4148_b27d_9e4e41a5e0b6_A1; mw3274d922_543b_41bd_969b_6b8a7f754faf_A1_kf*mwf9018752_1c9d_4f16_9589_f9f097925a05_A1*mw20a1da32_7c46_4a5c_8879_3ad39876a732_A1 - mw3274d922_543b_41bd_969b_6b8a7f754faf_A1_kr*mw2b7b6b31_58f9_4148_b27d_9e4e41a5e0b6_A1;
    mw3274d922_543b_41bd_969b_6b8a7f754faf_A1_kf = 0.006; mw3274d922_543b_41bd_969b_6b8a7f754faf_A1_kr = 5000;
  mwb85784d9_5df8_4259_9d4a_31b464bee546_A1: mw767cfd85_1821_4540_a684_152047e82155_A1 => mwdf0c8dc3_f696_4ab1_86ce_7dfb1a89edb0_A1; mwb85784d9_5df8_4259_9d4a_31b464bee546_A1_TXTL_NTP_consumption*mw767cfd85_1821_4540_a684_152047e82155_A1;
    mwb85784d9_5df8_4259_9d4a_31b464bee546_A1_TXTL_NTP_consumption = 0.7485294;
  mw9dfe45c1_0cd6_4c4c_9148_a073eaa2669d_A1: mw160f7d4f_5670_4840_8fd1_2b77a0ee69a5_A1 => mw20a1da32_7c46_4a5c_8879_3ad39876a732_A1 + mw87691a6b_7cd2_4ddd_839b_43c6d02d7331_A1; mw9dfe45c1_0cd6_4c4c_9148_a073eaa2669d_A1_TXTL_RNAPBOUND_TERMINATION_RATE*mw160f7d4f_5670_4840_8fd1_2b77a0ee69a5_A1;
    mw9dfe45c1_0cd6_4c4c_9148_a073eaa2669d_A1_TXTL_RNAPBOUND_TERMINATION_RATE = 0.05;
  mwb7633c86_f985_49b2_b29d_b6b39baced26_A1: mwdf0c8dc3_f696_4ab1_86ce_7dfb1a89edb0_A1 + mwd8ef21ee_e9ca_4fc9_8dcb_29c5bd7134bf_A1 -> mwb814d2ca_9454_4d78_98cd_0b4149c00f23_A1; mwb7633c86_f985_49b2_b29d_b6b39baced26_A1_TXTL_NTP_RNAP_F*mwdf0c8dc3_f696_4ab1_86ce_7dfb1a89edb0_A1*mwd8ef21ee_e9ca_4fc9_8dcb_29c5bd7134bf_A1 - mwb7633c86_f985_49b2_b29d_b6b39baced26_A1_TXTL_NTP_RNAP_R*mwb814d2ca_9454_4d78_98cd_0b4149c00f23_A1;
    mwb7633c86_f985_49b2_b29d_b6b39baced26_A1_TXTL_NTP_RNAP_F = 1000; mwb7633c86_f985_49b2_b29d_b6b39baced26_A1_TXTL_NTP_RNAP_R = 120000000;
  mw0cf85fbd_e158_4b8d_ad2a_8ce5910eba0d_A1: mwdf0c8dc3_f696_4ab1_86ce_7dfb1a89edb0_A1 + mw8088dcad_75d7_4cb8_b044_4b2f2554ea24_A1 -> mw3f43dd50_395a_41c0_b13a_cafb4df0cbc0_A1; mw0cf85fbd_e158_4b8d_ad2a_8ce5910eba0d_A1_TXTL_NTP_RNAP_F*mwdf0c8dc3_f696_4ab1_86ce_7dfb1a89edb0_A1*mw8088dcad_75d7_4cb8_b044_4b2f2554ea24_A1 - mw0cf85fbd_e158_4b8d_ad2a_8ce5910eba0d_A1_TXTL_NTP_RNAP_R*mw3f43dd50_395a_41c0_b13a_cafb4df0cbc0_A1;
    mw0cf85fbd_e158_4b8d_ad2a_8ce5910eba0d_A1_TXTL_NTP_RNAP_F = 1000; mw0cf85fbd_e158_4b8d_ad2a_8ce5910eba0d_A1_TXTL_NTP_RNAP_R = 120000000;
  mwc8124978_60bc_4b9f_8c9c_f6ad50621a11_A1: mwb814d2ca_9454_4d78_98cd_0b4149c00f23_A1 + mw8088dcad_75d7_4cb8_b044_4b2f2554ea24_A1 -> mw767cfd85_1821_4540_a684_152047e82155_A1; mwc8124978_60bc_4b9f_8c9c_f6ad50621a11_A1_TXTL_NTP_RNAP_F*mwb814d2ca_9454_4d78_98cd_0b4149c00f23_A1*mw8088dcad_75d7_4cb8_b044_4b2f2554ea24_A1 - mwc8124978_60bc_4b9f_8c9c_f6ad50621a11_A1_TXTL_NTP_RNAP_R*mw767cfd85_1821_4540_a684_152047e82155_A1;
    mwc8124978_60bc_4b9f_8c9c_f6ad50621a11_A1_TXTL_NTP_RNAP_F = 1; mwc8124978_60bc_4b9f_8c9c_f6ad50621a11_A1_TXTL_NTP_RNAP_R = 120000;
  mwd939d8c8_fef3_4105_95ab_f9c2c9c6023d_A1: mw3f43dd50_395a_41c0_b13a_cafb4df0cbc0_A1 + mwd8ef21ee_e9ca_4fc9_8dcb_29c5bd7134bf_A1 -> mw767cfd85_1821_4540_a684_152047e82155_A1; mwd939d8c8_fef3_4105_95ab_f9c2c9c6023d_A1_TXTL_NTP_RNAP_F*mw3f43dd50_395a_41c0_b13a_cafb4df0cbc0_A1*mwd8ef21ee_e9ca_4fc9_8dcb_29c5bd7134bf_A1 - mwd939d8c8_fef3_4105_95ab_f9c2c9c6023d_A1_TXTL_NTP_RNAP_R*mw767cfd85_1821_4540_a684_152047e82155_A1;
    mwd939d8c8_fef3_4105_95ab_f9c2c9c6023d_A1_TXTL_NTP_RNAP_F = 1; mwd939d8c8_fef3_4105_95ab_f9c2c9c6023d_A1_TXTL_NTP_RNAP_R = 120000;
  mwa78172e5_3de3_4476_a3e6_17b965a3f33c_A1: mw767cfd85_1821_4540_a684_152047e82155_A1 => mw160f7d4f_5670_4840_8fd1_2b77a0ee69a5_A1 + mwbd0de251_9de9_4624_94eb_1d758cdcf826_A1; mwa78172e5_3de3_4476_a3e6_17b965a3f33c_A1_TXTL_transcription_rate1*mw767cfd85_1821_4540_a684_152047e82155_A1;
    mwa78172e5_3de3_4476_a3e6_17b965a3f33c_A1_TXTL_transcription_rate1 = 0.001470588;
  mwd3ef7341_bdce_4242_bcf8_19d88d38779a_A1: mw33d7e051_c27d_4612_baf5_1288c43a7aa2_A1 => mw2b7b6b31_58f9_4148_b27d_9e4e41a5e0b6_A1; mwd3ef7341_bdce_4242_bcf8_19d88d38779a_A1_TXTL_NTP_consumption*mw33d7e051_c27d_4612_baf5_1288c43a7aa2_A1;
    mwd3ef7341_bdce_4242_bcf8_19d88d38779a_A1_TXTL_NTP_consumption = 0.7485294;
  mwd02e763c_e342_44c5_8c72_8e981900ba77_A1: mw51c25126_57a0_4186_9809_4aae5461f0c3_A1 => mw20a1da32_7c46_4a5c_8879_3ad39876a732_A1 + mw87691a6b_7cd2_4ddd_839b_43c6d02d7331_A1 + mw6e225233_4608_4bf8_9195_7e11a89791f2_A1; mwd02e763c_e342_44c5_8c72_8e981900ba77_A1_TXTL_RNAPBOUND_TERMINATION_RATE*mw51c25126_57a0_4186_9809_4aae5461f0c3_A1;
    mwd02e763c_e342_44c5_8c72_8e981900ba77_A1_TXTL_RNAPBOUND_TERMINATION_RATE = 0.05;
  mw675dd10e_3073_45ff_922d_9f2cab18881f_A1: mw2b7b6b31_58f9_4148_b27d_9e4e41a5e0b6_A1 + mwd8ef21ee_e9ca_4fc9_8dcb_29c5bd7134bf_A1 -> mw6ec81de9_8855_488e_8573_5f723ada6335_A1; mw675dd10e_3073_45ff_922d_9f2cab18881f_A1_TXTL_NTP_RNAP_F*mw2b7b6b31_58f9_4148_b27d_9e4e41a5e0b6_A1*mwd8ef21ee_e9ca_4fc9_8dcb_29c5bd7134bf_A1 - mw675dd10e_3073_45ff_922d_9f2cab18881f_A1_TXTL_NTP_RNAP_R*mw6ec81de9_8855_488e_8573_5f723ada6335_A1;
    mw675dd10e_3073_45ff_922d_9f2cab18881f_A1_TXTL_NTP_RNAP_F = 1000; mw675dd10e_3073_45ff_922d_9f2cab18881f_A1_TXTL_NTP_RNAP_R = 120000000;
  mw5c298bc2_0a9d_4b8a_ba63_4078247a5f11_A1: mw2b7b6b31_58f9_4148_b27d_9e4e41a5e0b6_A1 + mw8088dcad_75d7_4cb8_b044_4b2f2554ea24_A1 -> mwba8c5d42_edfd_45cf_8015_44d6c0292132_A1; mw5c298bc2_0a9d_4b8a_ba63_4078247a5f11_A1_TXTL_NTP_RNAP_F*mw2b7b6b31_58f9_4148_b27d_9e4e41a5e0b6_A1*mw8088dcad_75d7_4cb8_b044_4b2f2554ea24_A1 - mw5c298bc2_0a9d_4b8a_ba63_4078247a5f11_A1_TXTL_NTP_RNAP_R*mwba8c5d42_edfd_45cf_8015_44d6c0292132_A1;
    mw5c298bc2_0a9d_4b8a_ba63_4078247a5f11_A1_TXTL_NTP_RNAP_F = 1000; mw5c298bc2_0a9d_4b8a_ba63_4078247a5f11_A1_TXTL_NTP_RNAP_R = 120000000;
  mw1ef5caca_8004_4215_bbcf_d77ad8cf4b43_A1: mw6ec81de9_8855_488e_8573_5f723ada6335_A1 + mw8088dcad_75d7_4cb8_b044_4b2f2554ea24_A1 -> mw33d7e051_c27d_4612_baf5_1288c43a7aa2_A1; mw1ef5caca_8004_4215_bbcf_d77ad8cf4b43_A1_TXTL_NTP_RNAP_F*mw6ec81de9_8855_488e_8573_5f723ada6335_A1*mw8088dcad_75d7_4cb8_b044_4b2f2554ea24_A1 - mw1ef5caca_8004_4215_bbcf_d77ad8cf4b43_A1_TXTL_NTP_RNAP_R*mw33d7e051_c27d_4612_baf5_1288c43a7aa2_A1;
    mw1ef5caca_8004_4215_bbcf_d77ad8cf4b43_A1_TXTL_NTP_RNAP_F = 1; mw1ef5caca_8004_4215_bbcf_d77ad8cf4b43_A1_TXTL_NTP_RNAP_R = 120000;
  mw1a6687b6_6236_480c_a538_92787d3bc03d_A1: mwba8c5d42_edfd_45cf_8015_44d6c0292132_A1 + mwd8ef21ee_e9ca_4fc9_8dcb_29c5bd7134bf_A1 -> mw33d7e051_c27d_4612_baf5_1288c43a7aa2_A1; mw1a6687b6_6236_480c_a538_92787d3bc03d_A1_TXTL_NTP_RNAP_F*mwba8c5d42_edfd_45cf_8015_44d6c0292132_A1*mwd8ef21ee_e9ca_4fc9_8dcb_29c5bd7134bf_A1 - mw1a6687b6_6236_480c_a538_92787d3bc03d_A1_TXTL_NTP_RNAP_R*mw33d7e051_c27d_4612_baf5_1288c43a7aa2_A1;
    mw1a6687b6_6236_480c_a538_92787d3bc03d_A1_TXTL_NTP_RNAP_F = 1; mw1a6687b6_6236_480c_a538_92787d3bc03d_A1_TXTL_NTP_RNAP_R = 120000;
  mw92381b32_38ee_4904_bddd_0e157135ea6b_A1: mw33d7e051_c27d_4612_baf5_1288c43a7aa2_A1 => mw51c25126_57a0_4186_9809_4aae5461f0c3_A1 + mwbd0de251_9de9_4624_94eb_1d758cdcf826_A1; mw92381b32_38ee_4904_bddd_0e157135ea6b_A1_TXTL_transcription_rate1*mw33d7e051_c27d_4612_baf5_1288c43a7aa2_A1;
    mw92381b32_38ee_4904_bddd_0e157135ea6b_A1_TXTL_transcription_rate1 = 0.001470588;
  mw39f6f6d5_d601_45b2_8609_a84f743830dd_A1: mw37e1a28e_e2b4_401d_b9d3_c1ea5bda1065_A1 + mwe2d770f4_9878_44f4_b4a1_e7f76d106315_A1 -> mw0622e252_6a81_4d00_87d0_bc1b92321eda_A1; mw39f6f6d5_d601_45b2_8609_a84f743830dd_A1_TL_AA_F*mw37e1a28e_e2b4_401d_b9d3_c1ea5bda1065_A1*mwe2d770f4_9878_44f4_b4a1_e7f76d106315_A1 - mw39f6f6d5_d601_45b2_8609_a84f743830dd_A1_TL_AA_R*mw0622e252_6a81_4d00_87d0_bc1b92321eda_A1;
    mw39f6f6d5_d601_45b2_8609_a84f743830dd_A1_TL_AA_F = 300; mw39f6f6d5_d601_45b2_8609_a84f743830dd_A1_TL_AA_R = 0.1;
  mwd6328e6d_505f_4a69_bc8f_00637d954640_A1: mw0622e252_6a81_4d00_87d0_bc1b92321eda_A1 + 2 mwd8ef21ee_e9ca_4fc9_8dcb_29c5bd7134bf_A1 -> mw26fe5026_1c10_4917_b448_ebc246eac265_A1; mwd6328e6d_505f_4a69_bc8f_00637d954640_A1_TL_AGTP_F*mw0622e252_6a81_4d00_87d0_bc1b92321eda_A1*mwd8ef21ee_e9ca_4fc9_8dcb_29c5bd7134bf_A1^2 - mwd6328e6d_505f_4a69_bc8f_00637d954640_A1_TL_AGTP_R*mw26fe5026_1c10_4917_b448_ebc246eac265_A1;
    mwd6328e6d_505f_4a69_bc8f_00637d954640_A1_TL_AGTP_F = 30; mwd6328e6d_505f_4a69_bc8f_00637d954640_A1_TL_AGTP_R = 10;
  mw07591209_96dc_4b15_901b_c59287b70f81_A1: mw26fe5026_1c10_4917_b448_ebc246eac265_A1 => mw15465405_e52f_419d_855c_6598432b9882_A1; mw07591209_96dc_4b15_901b_c59287b70f81_A1_TXTL_TL_AA_consumption*mw26fe5026_1c10_4917_b448_ebc246eac265_A1;
    mw07591209_96dc_4b15_901b_c59287b70f81_A1_TXTL_TL_AA_consumption = 0.024;
  mw34565fb0_16cd_429d_91aa_5c922fc65c45_A1: mw26fe5026_1c10_4917_b448_ebc246eac265_A1 => mw15465405_e52f_419d_855c_6598432b9882_A1 + mwcd1c814e_f9b8_4d24_884f_d5704904c450_A1; mw34565fb0_16cd_429d_91aa_5c922fc65c45_A1_TXTL_TL_rate*mw26fe5026_1c10_4917_b448_ebc246eac265_A1;
    mw34565fb0_16cd_429d_91aa_5c922fc65c45_A1_TXTL_TL_rate = 0.012;
  mw5f650476_18b2_4859_a7cc_c73ce604c68e_A1: mw15465405_e52f_419d_855c_6598432b9882_A1 => mwbd0de251_9de9_4624_94eb_1d758cdcf826_A1 + mw594b7843_33b7_4d56_8d09_d26fee2a0f42_A1; mw5f650476_18b2_4859_a7cc_c73ce604c68e_A1_TXTL_RIBOBOUND_TERMINATION_RATE*mw15465405_e52f_419d_855c_6598432b9882_A1;
    mw5f650476_18b2_4859_a7cc_c73ce604c68e_A1_TXTL_RIBOBOUND_TERMINATION_RATE = 50;
  mw70298902_0343_45e4_b99c_fedb969ac541_A1: mwbd0de251_9de9_4624_94eb_1d758cdcf826_A1 + mw27046043_506c_4103_934f_0748df8dafa4_A1 -> mw4bae209d_759b_43de_b743_890e224c3c89_A1; mw70298902_0343_45e4_b99c_fedb969ac541_A1_TXTL_RNAdeg_F*mwbd0de251_9de9_4624_94eb_1d758cdcf826_A1*mw27046043_506c_4103_934f_0748df8dafa4_A1 - mw70298902_0343_45e4_b99c_fedb969ac541_A1_TXTL_RNAdeg_R*mw4bae209d_759b_43de_b743_890e224c3c89_A1;
    mw70298902_0343_45e4_b99c_fedb969ac541_A1_TXTL_RNAdeg_F = 10; mw70298902_0343_45e4_b99c_fedb969ac541_A1_TXTL_RNAdeg_R = 2000;
  mw71cba258_1897_4260_8ebf_ddef2ea4bff7_A1: mw4bae209d_759b_43de_b743_890e224c3c89_A1 => mw27046043_506c_4103_934f_0748df8dafa4_A1; mw71cba258_1897_4260_8ebf_ddef2ea4bff7_A1_TXTL_RNAdeg_F*mw4bae209d_759b_43de_b743_890e224c3c89_A1;
    mw71cba258_1897_4260_8ebf_ddef2ea4bff7_A1_TXTL_RNAdeg_F = 0.002777778;
  mwceec1524_85b4_4b66_9a69_1a45ed6addb9_A1: mw37e1a28e_e2b4_401d_b9d3_c1ea5bda1065_A1 + mw27046043_506c_4103_934f_0748df8dafa4_A1 -> mw77d678ec_db89_4b4f_931a_1ec88923ef06_A1; mwceec1524_85b4_4b66_9a69_1a45ed6addb9_A1_TXTL_RNAdeg_F*mw37e1a28e_e2b4_401d_b9d3_c1ea5bda1065_A1*mw27046043_506c_4103_934f_0748df8dafa4_A1 - mwceec1524_85b4_4b66_9a69_1a45ed6addb9_A1_TXTL_RNAdeg_R*mw77d678ec_db89_4b4f_931a_1ec88923ef06_A1;
    mwceec1524_85b4_4b66_9a69_1a45ed6addb9_A1_TXTL_RNAdeg_F = 10; mwceec1524_85b4_4b66_9a69_1a45ed6addb9_A1_TXTL_RNAdeg_R = 2000;
  mw393a0506_204d_4152_8bcd_3a82ac31e5fa_A1: mw77d678ec_db89_4b4f_931a_1ec88923ef06_A1 => mw27046043_506c_4103_934f_0748df8dafa4_A1 + mw594b7843_33b7_4d56_8d09_d26fee2a0f42_A1; mw393a0506_204d_4152_8bcd_3a82ac31e5fa_A1_TXTL_RNAdeg_F*mw77d678ec_db89_4b4f_931a_1ec88923ef06_A1;
    mw393a0506_204d_4152_8bcd_3a82ac31e5fa_A1_TXTL_RNAdeg_F = 0.002777778;
  mw0c453f93_6e21_4d3d_9d19_b0eade646d71_A1: mw26fe5026_1c10_4917_b448_ebc246eac265_A1 + mw27046043_506c_4103_934f_0748df8dafa4_A1 -> mw6bdd6a42_9a73_4258_be16_ffb0862f4562_A1; mw0c453f93_6e21_4d3d_9d19_b0eade646d71_A1_TXTL_RNAdeg_F*mw26fe5026_1c10_4917_b448_ebc246eac265_A1*mw27046043_506c_4103_934f_0748df8dafa4_A1 - mw0c453f93_6e21_4d3d_9d19_b0eade646d71_A1_TXTL_RNAdeg_R*mw6bdd6a42_9a73_4258_be16_ffb0862f4562_A1;
    mw0c453f93_6e21_4d3d_9d19_b0eade646d71_A1_TXTL_RNAdeg_F = 10; mw0c453f93_6e21_4d3d_9d19_b0eade646d71_A1_TXTL_RNAdeg_R = 2000;
  mw097c38aa_ccac_4731_8c13_c5bfeb8ffaa9_A1: mw6bdd6a42_9a73_4258_be16_ffb0862f4562_A1 => mw27046043_506c_4103_934f_0748df8dafa4_A1 + mwe2d770f4_9878_44f4_b4a1_e7f76d106315_A1 + 2 mwd8ef21ee_e9ca_4fc9_8dcb_29c5bd7134bf_A1 + mw594b7843_33b7_4d56_8d09_d26fee2a0f42_A1; mw097c38aa_ccac_4731_8c13_c5bfeb8ffaa9_A1_TXTL_RNAdeg_F*mw6bdd6a42_9a73_4258_be16_ffb0862f4562_A1;
    mw097c38aa_ccac_4731_8c13_c5bfeb8ffaa9_A1_TXTL_RNAdeg_F = 0.002777778;
  mwc3f36725_78cc_47fa_bce3_5ed497c13da9_A1: mw15465405_e52f_419d_855c_6598432b9882_A1 + mw27046043_506c_4103_934f_0748df8dafa4_A1 -> mw119364e8_fa9c_40f2_96cc_db4b33a0963c_A1; mwc3f36725_78cc_47fa_bce3_5ed497c13da9_A1_TXTL_RNAdeg_F*mw15465405_e52f_419d_855c_6598432b9882_A1*mw27046043_506c_4103_934f_0748df8dafa4_A1 - mwc3f36725_78cc_47fa_bce3_5ed497c13da9_A1_TXTL_RNAdeg_R*mw119364e8_fa9c_40f2_96cc_db4b33a0963c_A1;
    mwc3f36725_78cc_47fa_bce3_5ed497c13da9_A1_TXTL_RNAdeg_F = 10; mwc3f36725_78cc_47fa_bce3_5ed497c13da9_A1_TXTL_RNAdeg_R = 2000;
  mwe2f8ca51_06ff_42e4_acd3_fda16cbdb05f_A1: mw119364e8_fa9c_40f2_96cc_db4b33a0963c_A1 => mw27046043_506c_4103_934f_0748df8dafa4_A1 + mw594b7843_33b7_4d56_8d09_d26fee2a0f42_A1; mwe2f8ca51_06ff_42e4_acd3_fda16cbdb05f_A1_TXTL_RNAdeg_F*mw119364e8_fa9c_40f2_96cc_db4b33a0963c_A1;
    mwe2f8ca51_06ff_42e4_acd3_fda16cbdb05f_A1_TXTL_RNAdeg_F = 0.002777778;
  mw5e56ef74_1b33_4c8b_8eb4_a963bacc4994_A1: mw0622e252_6a81_4d00_87d0_bc1b92321eda_A1 + mw27046043_506c_4103_934f_0748df8dafa4_A1 -> mwc9810a52_fda0_4aed_ac03_1d0888c20bed_A1; mw5e56ef74_1b33_4c8b_8eb4_a963bacc4994_A1_TXTL_RNAdeg_F*mw0622e252_6a81_4d00_87d0_bc1b92321eda_A1*mw27046043_506c_4103_934f_0748df8dafa4_A1 - mw5e56ef74_1b33_4c8b_8eb4_a963bacc4994_A1_TXTL_RNAdeg_R*mwc9810a52_fda0_4aed_ac03_1d0888c20bed_A1;
    mw5e56ef74_1b33_4c8b_8eb4_a963bacc4994_A1_TXTL_RNAdeg_F = 10; mw5e56ef74_1b33_4c8b_8eb4_a963bacc4994_A1_TXTL_RNAdeg_R = 2000;
  mw91b1418c_0d08_48c2_a9c5_fdf9a4610daf_A1: mwc9810a52_fda0_4aed_ac03_1d0888c20bed_A1 => mw27046043_506c_4103_934f_0748df8dafa4_A1 + mwe2d770f4_9878_44f4_b4a1_e7f76d106315_A1 + mw594b7843_33b7_4d56_8d09_d26fee2a0f42_A1; mw91b1418c_0d08_48c2_a9c5_fdf9a4610daf_A1_TXTL_RNAdeg_F*mwc9810a52_fda0_4aed_ac03_1d0888c20bed_A1;
    mw91b1418c_0d08_48c2_a9c5_fdf9a4610daf_A1_TXTL_RNAdeg_F = 0.002777778;
  mwed50d314_7128_4ba0_8da0_0b151eb7fa69_A1: mwbc293b51_8dc7_482a_a166_48a08fcf70c0_A1 + mw39fc0fca_dcae_441f_895a_36ffd39fb240_A1 -> mw20a1da32_7c46_4a5c_8879_3ad39876a732_A1; Sigma28_RNAP_F*mwbc293b51_8dc7_482a_a166_48a08fcf70c0_A1*mw39fc0fca_dcae_441f_895a_36ffd39fb240_A1 - Sigma28_RNAP_R*mw20a1da32_7c46_4a5c_8879_3ad39876a732_A1;
    Sigma28_RNAP_F = 100; Sigma28_RNAP_R = 0.1;
  mw11501d9f_2ef6_4193_808a_f7b8b8bc69b3_A1: mw159b5269_c579_43b5_abc6_26e4f63e7bbe_A1 + mw594b7843_33b7_4d56_8d09_d26fee2a0f42_A1 -> mw723b9f32_93c9_43a1_8211_96ed49f884fc_A1; mw11501d9f_2ef6_4193_808a_f7b8b8bc69b3_A1_TXTL_UTR_UTR1_F*mw159b5269_c579_43b5_abc6_26e4f63e7bbe_A1*mw594b7843_33b7_4d56_8d09_d26fee2a0f42_A1 - mw11501d9f_2ef6_4193_808a_f7b8b8bc69b3_A1_TXTL_UTR_UTR1_R*mw723b9f32_93c9_43a1_8211_96ed49f884fc_A1;
    mw11501d9f_2ef6_4193_808a_f7b8b8bc69b3_A1_TXTL_UTR_UTR1_F = 0.2; mw11501d9f_2ef6_4193_808a_f7b8b8bc69b3_A1_TXTL_UTR_UTR1_R = 4;
  mwca8c0bd4_3cc1_4f33_9407_25a184b5ee33_A1: mwe0637f7e_f800_4cab_a905_3d73c03f4421_A1 + mwbc293b51_8dc7_482a_a166_48a08fcf70c0_A1 -> mwaa84c5c4_3442_413c_9e85_94a1701809bc_A1; TXTL_PLAC_RNAPbound_F*mwe0637f7e_f800_4cab_a905_3d73c03f4421_A1*mwbc293b51_8dc7_482a_a166_48a08fcf70c0_A1 - TXTL_PLAC_RNAPbound_R*mwaa84c5c4_3442_413c_9e85_94a1701809bc_A1;
    TXTL_PLAC_RNAPbound_F = 20; TXTL_PLAC_RNAPbound_R = 400;
  mw824b3dcc_bed0_4fb8_b5e3_e124094c12f6_A1: mw12b99714_0096_4228_8bd1_56f6f073b8fc_A1 => mwaa84c5c4_3442_413c_9e85_94a1701809bc_A1; mw824b3dcc_bed0_4fb8_b5e3_e124094c12f6_A1_TXTL_NTP_consumption*mw12b99714_0096_4228_8bd1_56f6f073b8fc_A1;
    mw824b3dcc_bed0_4fb8_b5e3_e124094c12f6_A1_TXTL_NTP_consumption = 0.7487705;
  mw249ee912_8f1a_4532_a0a1_93d5c28f3420_A1: mwd42f73fc_1ebd_4594_9b18_c6dc092c4988_A1 => mwbc293b51_8dc7_482a_a166_48a08fcf70c0_A1 + mwe0637f7e_f800_4cab_a905_3d73c03f4421_A1; mw249ee912_8f1a_4532_a0a1_93d5c28f3420_A1_TXTL_RNAPBOUND_TERMINATION_RATE*mwd42f73fc_1ebd_4594_9b18_c6dc092c4988_A1;
    mw249ee912_8f1a_4532_a0a1_93d5c28f3420_A1_TXTL_RNAPBOUND_TERMINATION_RATE = 0.05;
  mw06f5afc2_7cdd_48ae_b0b7_fff908268728_A1: mwaa84c5c4_3442_413c_9e85_94a1701809bc_A1 + mwd8ef21ee_e9ca_4fc9_8dcb_29c5bd7134bf_A1 -> mw51a418e8_c9ef_4962_ba5d_cbba756856d4_A1; mw06f5afc2_7cdd_48ae_b0b7_fff908268728_A1_TXTL_NTP_RNAP_F*mwaa84c5c4_3442_413c_9e85_94a1701809bc_A1*mwd8ef21ee_e9ca_4fc9_8dcb_29c5bd7134bf_A1 - mw06f5afc2_7cdd_48ae_b0b7_fff908268728_A1_TXTL_NTP_RNAP_R*mw51a418e8_c9ef_4962_ba5d_cbba756856d4_A1;
    mw06f5afc2_7cdd_48ae_b0b7_fff908268728_A1_TXTL_NTP_RNAP_F = 1000; mw06f5afc2_7cdd_48ae_b0b7_fff908268728_A1_TXTL_NTP_RNAP_R = 120000000;
  mw3fba55eb_49a0_4b31_a4ef_115f917ca5ab_A1: mwaa84c5c4_3442_413c_9e85_94a1701809bc_A1 + mw8088dcad_75d7_4cb8_b044_4b2f2554ea24_A1 -> mwd8d88450_7aa2_4a23_9f23_9f35b73ef802_A1; mw3fba55eb_49a0_4b31_a4ef_115f917ca5ab_A1_TXTL_NTP_RNAP_F*mwaa84c5c4_3442_413c_9e85_94a1701809bc_A1*mw8088dcad_75d7_4cb8_b044_4b2f2554ea24_A1 - mw3fba55eb_49a0_4b31_a4ef_115f917ca5ab_A1_TXTL_NTP_RNAP_R*mwd8d88450_7aa2_4a23_9f23_9f35b73ef802_A1;
    mw3fba55eb_49a0_4b31_a4ef_115f917ca5ab_A1_TXTL_NTP_RNAP_F = 1000; mw3fba55eb_49a0_4b31_a4ef_115f917ca5ab_A1_TXTL_NTP_RNAP_R = 120000000;
  mw7597e874_8dbf_47c9_a639_1e58a609bc4e_A1: mw51a418e8_c9ef_4962_ba5d_cbba756856d4_A1 + mw8088dcad_75d7_4cb8_b044_4b2f2554ea24_A1 -> mw12b99714_0096_4228_8bd1_56f6f073b8fc_A1; mw7597e874_8dbf_47c9_a639_1e58a609bc4e_A1_TXTL_NTP_RNAP_F*mw51a418e8_c9ef_4962_ba5d_cbba756856d4_A1*mw8088dcad_75d7_4cb8_b044_4b2f2554ea24_A1 - mw7597e874_8dbf_47c9_a639_1e58a609bc4e_A1_TXTL_NTP_RNAP_R*mw12b99714_0096_4228_8bd1_56f6f073b8fc_A1;
    mw7597e874_8dbf_47c9_a639_1e58a609bc4e_A1_TXTL_NTP_RNAP_F = 1; mw7597e874_8dbf_47c9_a639_1e58a609bc4e_A1_TXTL_NTP_RNAP_R = 120000;
  mw5e184351_16f8_4207_96bc_55d32762aee0_A1: mwd8d88450_7aa2_4a23_9f23_9f35b73ef802_A1 + mwd8ef21ee_e9ca_4fc9_8dcb_29c5bd7134bf_A1 -> mw12b99714_0096_4228_8bd1_56f6f073b8fc_A1; mw5e184351_16f8_4207_96bc_55d32762aee0_A1_TXTL_NTP_RNAP_F*mwd8d88450_7aa2_4a23_9f23_9f35b73ef802_A1*mwd8ef21ee_e9ca_4fc9_8dcb_29c5bd7134bf_A1 - mw5e184351_16f8_4207_96bc_55d32762aee0_A1_TXTL_NTP_RNAP_R*mw12b99714_0096_4228_8bd1_56f6f073b8fc_A1;
    mw5e184351_16f8_4207_96bc_55d32762aee0_A1_TXTL_NTP_RNAP_F = 1; mw5e184351_16f8_4207_96bc_55d32762aee0_A1_TXTL_NTP_RNAP_R = 120000;
  mw9a08fbf7_6987_4371_9d49_ffd155dfba1e_A1: mw12b99714_0096_4228_8bd1_56f6f073b8fc_A1 => mwd42f73fc_1ebd_4594_9b18_c6dc092c4988_A1 + mw159b5269_c579_43b5_abc6_26e4f63e7bbe_A1; mw9a08fbf7_6987_4371_9d49_ffd155dfba1e_A1_TXTL_transcription_rate1*mw12b99714_0096_4228_8bd1_56f6f073b8fc_A1;
    mw9a08fbf7_6987_4371_9d49_ffd155dfba1e_A1_TXTL_transcription_rate1 = 0.001229508;
  mw8ad60da1_aaf3_4422_abed_3133c93b5b39_A1: mw723b9f32_93c9_43a1_8211_96ed49f884fc_A1 + mwe2d770f4_9878_44f4_b4a1_e7f76d106315_A1 -> mw7629a538_33fa_422e_9578_e65d19d44075_A1; mw8ad60da1_aaf3_4422_abed_3133c93b5b39_A1_TL_AA_F*mw723b9f32_93c9_43a1_8211_96ed49f884fc_A1*mwe2d770f4_9878_44f4_b4a1_e7f76d106315_A1 - mw8ad60da1_aaf3_4422_abed_3133c93b5b39_A1_TL_AA_R*mw7629a538_33fa_422e_9578_e65d19d44075_A1;
    mw8ad60da1_aaf3_4422_abed_3133c93b5b39_A1_TL_AA_F = 300; mw8ad60da1_aaf3_4422_abed_3133c93b5b39_A1_TL_AA_R = 0.1;
  mw83c6b254_6e6c_466b_9a4f_877e17c13e52_A1: mw7629a538_33fa_422e_9578_e65d19d44075_A1 + 2 mwd8ef21ee_e9ca_4fc9_8dcb_29c5bd7134bf_A1 -> mw3a503b2f_f902_4b3d_aa4c_f902f0264a37_A1; mw83c6b254_6e6c_466b_9a4f_877e17c13e52_A1_TL_AGTP_F*mw7629a538_33fa_422e_9578_e65d19d44075_A1*mwd8ef21ee_e9ca_4fc9_8dcb_29c5bd7134bf_A1^2 - mw83c6b254_6e6c_466b_9a4f_877e17c13e52_A1_TL_AGTP_R*mw3a503b2f_f902_4b3d_aa4c_f902f0264a37_A1;
    mw83c6b254_6e6c_466b_9a4f_877e17c13e52_A1_TL_AGTP_F = 30; mw83c6b254_6e6c_466b_9a4f_877e17c13e52_A1_TL_AGTP_R = 10;
  mw98ba071f_ef73_426d_9fbc_f0c70146d701_A1: mw3a503b2f_f902_4b3d_aa4c_f902f0264a37_A1 => mw92db7974_c165_491c_8c88_79dd770dbc24_A1; mw98ba071f_ef73_426d_9fbc_f0c70146d701_A1_TXTL_TL_AA_consumption*mw3a503b2f_f902_4b3d_aa4c_f902f0264a37_A1;
    mw98ba071f_ef73_426d_9fbc_f0c70146d701_A1_TXTL_TL_AA_consumption = 0.03;
  mw7b5be1c1_029e_4194_9eb6_26b4ba9fcece_A1: mw3a503b2f_f902_4b3d_aa4c_f902f0264a37_A1 => mw92db7974_c165_491c_8c88_79dd770dbc24_A1 + mw39fc0fca_dcae_441f_895a_36ffd39fb240_A1; mw7b5be1c1_029e_4194_9eb6_26b4ba9fcece_A1_TXTL_TL_rate*mw3a503b2f_f902_4b3d_aa4c_f902f0264a37_A1;
    mw7b5be1c1_029e_4194_9eb6_26b4ba9fcece_A1_TXTL_TL_rate = 0.01;
  mwf7da07f2_da22_474a_8867_fe01b1bba546_A1: mw92db7974_c165_491c_8c88_79dd770dbc24_A1 => mw159b5269_c579_43b5_abc6_26e4f63e7bbe_A1 + mw594b7843_33b7_4d56_8d09_d26fee2a0f42_A1; mwf7da07f2_da22_474a_8867_fe01b1bba546_A1_TXTL_RIBOBOUND_TERMINATION_RATE*mw92db7974_c165_491c_8c88_79dd770dbc24_A1;
    mwf7da07f2_da22_474a_8867_fe01b1bba546_A1_TXTL_RIBOBOUND_TERMINATION_RATE = 50;
  mw30f15b9a_bea4_485f_a507_6ca5abdcacbf_A1: mw159b5269_c579_43b5_abc6_26e4f63e7bbe_A1 + mw27046043_506c_4103_934f_0748df8dafa4_A1 -> mw0f226cf0_c928_4c2a_9129_2dbecb533b8a_A1; mw30f15b9a_bea4_485f_a507_6ca5abdcacbf_A1_TXTL_RNAdeg_F*mw159b5269_c579_43b5_abc6_26e4f63e7bbe_A1*mw27046043_506c_4103_934f_0748df8dafa4_A1 - mw30f15b9a_bea4_485f_a507_6ca5abdcacbf_A1_TXTL_RNAdeg_R*mw0f226cf0_c928_4c2a_9129_2dbecb533b8a_A1;
    mw30f15b9a_bea4_485f_a507_6ca5abdcacbf_A1_TXTL_RNAdeg_F = 10; mw30f15b9a_bea4_485f_a507_6ca5abdcacbf_A1_TXTL_RNAdeg_R = 2000;
  mwc10e5939_5d5d_4b16_af63_f5ad16c882e4_A1: mw0f226cf0_c928_4c2a_9129_2dbecb533b8a_A1 => mw27046043_506c_4103_934f_0748df8dafa4_A1; mwc10e5939_5d5d_4b16_af63_f5ad16c882e4_A1_TXTL_RNAdeg_F*mw0f226cf0_c928_4c2a_9129_2dbecb533b8a_A1;
    mwc10e5939_5d5d_4b16_af63_f5ad16c882e4_A1_TXTL_RNAdeg_F = 0.002777778;
  mwab3d7526_b3ab_46d4_bbc0_8de662896453_A1: mw723b9f32_93c9_43a1_8211_96ed49f884fc_A1 + mw27046043_506c_4103_934f_0748df8dafa4_A1 -> mw78d86b82_eb53_4471_a341_dc0987b8c524_A1; mwab3d7526_b3ab_46d4_bbc0_8de662896453_A1_TXTL_RNAdeg_F*mw723b9f32_93c9_43a1_8211_96ed49f884fc_A1*mw27046043_506c_4103_934f_0748df8dafa4_A1 - mwab3d7526_b3ab_46d4_bbc0_8de662896453_A1_TXTL_RNAdeg_R*mw78d86b82_eb53_4471_a341_dc0987b8c524_A1;
    mwab3d7526_b3ab_46d4_bbc0_8de662896453_A1_TXTL_RNAdeg_F = 10; mwab3d7526_b3ab_46d4_bbc0_8de662896453_A1_TXTL_RNAdeg_R = 2000;
  mw91bfbd13_8432_4298_b289_01216823d5fa_A1: mw78d86b82_eb53_4471_a341_dc0987b8c524_A1 => mw27046043_506c_4103_934f_0748df8dafa4_A1 + mw594b7843_33b7_4d56_8d09_d26fee2a0f42_A1; mw91bfbd13_8432_4298_b289_01216823d5fa_A1_TXTL_RNAdeg_F*mw78d86b82_eb53_4471_a341_dc0987b8c524_A1;
    mw91bfbd13_8432_4298_b289_01216823d5fa_A1_TXTL_RNAdeg_F = 0.002777778;
  mw88a58346_e8fe_4c02_9c73_09fd0f6161af_A1: mw3a503b2f_f902_4b3d_aa4c_f902f0264a37_A1 + mw27046043_506c_4103_934f_0748df8dafa4_A1 -> mwf2948b32_54ad_4e76_be2a_39ecc8d961c6_A1; mw88a58346_e8fe_4c02_9c73_09fd0f6161af_A1_TXTL_RNAdeg_F*mw3a503b2f_f902_4b3d_aa4c_f902f0264a37_A1*mw27046043_506c_4103_934f_0748df8dafa4_A1 - mw88a58346_e8fe_4c02_9c73_09fd0f6161af_A1_TXTL_RNAdeg_R*mwf2948b32_54ad_4e76_be2a_39ecc8d961c6_A1;
    mw88a58346_e8fe_4c02_9c73_09fd0f6161af_A1_TXTL_RNAdeg_F = 10; mw88a58346_e8fe_4c02_9c73_09fd0f6161af_A1_TXTL_RNAdeg_R = 2000;
  mwa6b889ec_3938_498f_adf3_86bb8e7c42ed_A1: mwf2948b32_54ad_4e76_be2a_39ecc8d961c6_A1 => mw27046043_506c_4103_934f_0748df8dafa4_A1 + mwe2d770f4_9878_44f4_b4a1_e7f76d106315_A1 + 2 mwd8ef21ee_e9ca_4fc9_8dcb_29c5bd7134bf_A1 + mw594b7843_33b7_4d56_8d09_d26fee2a0f42_A1; mwa6b889ec_3938_498f_adf3_86bb8e7c42ed_A1_TXTL_RNAdeg_F*mwf2948b32_54ad_4e76_be2a_39ecc8d961c6_A1;
    mwa6b889ec_3938_498f_adf3_86bb8e7c42ed_A1_TXTL_RNAdeg_F = 0.002777778;
  mw5fccd80e_d4e4_4052_a6c0_51eb03043734_A1: mw92db7974_c165_491c_8c88_79dd770dbc24_A1 + mw27046043_506c_4103_934f_0748df8dafa4_A1 -> mw32f64a96_a32d_492d_9e54_605c79f936ad_A1; mw5fccd80e_d4e4_4052_a6c0_51eb03043734_A1_TXTL_RNAdeg_F*mw92db7974_c165_491c_8c88_79dd770dbc24_A1*mw27046043_506c_4103_934f_0748df8dafa4_A1 - mw5fccd80e_d4e4_4052_a6c0_51eb03043734_A1_TXTL_RNAdeg_R*mw32f64a96_a32d_492d_9e54_605c79f936ad_A1;
    mw5fccd80e_d4e4_4052_a6c0_51eb03043734_A1_TXTL_RNAdeg_F = 10; mw5fccd80e_d4e4_4052_a6c0_51eb03043734_A1_TXTL_RNAdeg_R = 2000;
  mwd0481bd2_93fa_455f_8d3b_5e815a6933cf_A1: mw32f64a96_a32d_492d_9e54_605c79f936ad_A1 => mw27046043_506c_4103_934f_0748df8dafa4_A1 + mw594b7843_33b7_4d56_8d09_d26fee2a0f42_A1; mwd0481bd2_93fa_455f_8d3b_5e815a6933cf_A1_TXTL_RNAdeg_F*mw32f64a96_a32d_492d_9e54_605c79f936ad_A1;
    mwd0481bd2_93fa_455f_8d3b_5e815a6933cf_A1_TXTL_RNAdeg_F = 0.002777778;
  mw1c895eca_6fa6_4b96_a135_6d43c2ebc77c_A1: mw7629a538_33fa_422e_9578_e65d19d44075_A1 + mw27046043_506c_4103_934f_0748df8dafa4_A1 -> mwe99f1695_b38c_4adc_bdfc_014007d37ad3_A1; mw1c895eca_6fa6_4b96_a135_6d43c2ebc77c_A1_TXTL_RNAdeg_F*mw7629a538_33fa_422e_9578_e65d19d44075_A1*mw27046043_506c_4103_934f_0748df8dafa4_A1 - mw1c895eca_6fa6_4b96_a135_6d43c2ebc77c_A1_TXTL_RNAdeg_R*mwe99f1695_b38c_4adc_bdfc_014007d37ad3_A1;
    mw1c895eca_6fa6_4b96_a135_6d43c2ebc77c_A1_TXTL_RNAdeg_F = 10; mw1c895eca_6fa6_4b96_a135_6d43c2ebc77c_A1_TXTL_RNAdeg_R = 2000;
  mw377d50de_3047_4adc_bcb5_f895ef4e2fa6_A1: mwe99f1695_b38c_4adc_bdfc_014007d37ad3_A1 => mw27046043_506c_4103_934f_0748df8dafa4_A1 + mwe2d770f4_9878_44f4_b4a1_e7f76d106315_A1 + mw594b7843_33b7_4d56_8d09_d26fee2a0f42_A1; mw377d50de_3047_4adc_bcb5_f895ef4e2fa6_A1_TXTL_RNAdeg_F*mwe99f1695_b38c_4adc_bdfc_014007d37ad3_A1;
    mw377d50de_3047_4adc_bcb5_f895ef4e2fa6_A1_TXTL_RNAdeg_F = 0.002777778;
  mw48179675_3904_4841_9999_5fdb348851e4_A1: mwd8ef21ee_e9ca_4fc9_8dcb_29c5bd7134bf_A1 => mweb394987_d45b_41cf_8716_52dc428a420b_A1; mw5996d02e_ace7_48f3_a137_02e414010144_A1*mwd8ef21ee_e9ca_4fc9_8dcb_29c5bd7134bf_A1;
  mw992b20db_8cb1_4fc6_8953_3f52044ee46d_B0: mw9a01a893_6b8b_42bb_8c14_609b768e905d_B0 + 2 mw0fad3201_6cd9_4687_8519_5cfd5e5092b1_B0 -> mw3399a33c_c6bb_48bf_9b85_92187da7755e_B0; mw992b20db_8cb1_4fc6_8953_3f52044ee46d_B0_TXTL_INDUCER_TETR_ATC_F*mw9a01a893_6b8b_42bb_8c14_609b768e905d_B0*mw0fad3201_6cd9_4687_8519_5cfd5e5092b1_B0^2 - mw992b20db_8cb1_4fc6_8953_3f52044ee46d_B0_TXTL_INDUCER_TETR_ATC_R*mw3399a33c_c6bb_48bf_9b85_92187da7755e_B0;
    mw992b20db_8cb1_4fc6_8953_3f52044ee46d_B0_TXTL_INDUCER_TETR_ATC_F = 1e-5; mw992b20db_8cb1_4fc6_8953_3f52044ee46d_B0_TXTL_INDUCER_TETR_ATC_R = 0.1;
  mw98ecff50_6eaf_4545_8263_2a29f9ca3ed4_B0: 2 mw4069bf5e_f87a_409a_8490_c7d740c73042_B0 -> mw9a01a893_6b8b_42bb_8c14_609b768e905d_B0; mw98ecff50_6eaf_4545_8263_2a29f9ca3ed4_B0_kf*mw4069bf5e_f87a_409a_8490_c7d740c73042_B0^2 - mw98ecff50_6eaf_4545_8263_2a29f9ca3ed4_B0_kr*mw9a01a893_6b8b_42bb_8c14_609b768e905d_B0;
    mw98ecff50_6eaf_4545_8263_2a29f9ca3ed4_B0_kf = 1; mw98ecff50_6eaf_4545_8263_2a29f9ca3ed4_B0_kr = 1;
  mw5f73a082_a97e_42bd_a95d_884a701f5efc_B0: mw62fc188b_4039_4e2f_bf56_f8890887ccd3_B0 + mw2b343d8b_4d07_4836_844b_b44127112e3d_B0 -> mwb97b2b35_db15_4990_98ba_5a74215259ad_B0; mw5f73a082_a97e_42bd_a95d_884a701f5efc_B0_TXTL_UTR_UTR1_F*mw62fc188b_4039_4e2f_bf56_f8890887ccd3_B0*mw2b343d8b_4d07_4836_844b_b44127112e3d_B0 - mw5f73a082_a97e_42bd_a95d_884a701f5efc_B0_TXTL_UTR_UTR1_R*mwb97b2b35_db15_4990_98ba_5a74215259ad_B0;
    mw5f73a082_a97e_42bd_a95d_884a701f5efc_B0_TXTL_UTR_UTR1_F = 0.2; mw5f73a082_a97e_42bd_a95d_884a701f5efc_B0_TXTL_UTR_UTR1_R = 4;
  mwb243d6df_ff16_4547_ad1c_b6137ce24055_B0: mw874d6152_56ef_47b1_949c_9ed7b73480aa_B0 + mwd22ece93_f44b_48e4_bb8c_177fa0067589_B0 -> mw2dc1bd9a_10f3_4348_9fb4_b504286689ca_B0; TXTL_SIGX_RNAPbound_F*mw874d6152_56ef_47b1_949c_9ed7b73480aa_B0*mwd22ece93_f44b_48e4_bb8c_177fa0067589_B0 - TXTL_SIGX_RNAPbound_R*mw2dc1bd9a_10f3_4348_9fb4_b504286689ca_B0;
    TXTL_SIGX_RNAPbound_F = 10; TXTL_SIGX_RNAPbound_R = 0.1;
  mwdba330e3_ba61_4ec6_8547_df2f72fac148_B0: mw183f8092_3f68_4011_a9e5_e94287ff842e_B0 => mw2dc1bd9a_10f3_4348_9fb4_b504286689ca_B0; mwdba330e3_ba61_4ec6_8547_df2f72fac148_B0_TXTL_NTP_consumption*mw183f8092_3f68_4011_a9e5_e94287ff842e_B0;
    mwdba330e3_ba61_4ec6_8547_df2f72fac148_B0_TXTL_NTP_consumption = 0.7487705;
  mw156986dd_841d_414d_b68a_5df8ef67870f_B0: mw5dec5dad_6074_4727_acc8_cd49277114bb_B0 => mwd22ece93_f44b_48e4_bb8c_177fa0067589_B0 + mw874d6152_56ef_47b1_949c_9ed7b73480aa_B0; mw156986dd_841d_414d_b68a_5df8ef67870f_B0_TXTL_RNAPBOUND_TERMINATION_RATE*mw5dec5dad_6074_4727_acc8_cd49277114bb_B0;
    mw156986dd_841d_414d_b68a_5df8ef67870f_B0_TXTL_RNAPBOUND_TERMINATION_RATE = 0.05;
  mwd9a70698_960c_4a15_a32a_1dab6b9764de_B0: mw2dc1bd9a_10f3_4348_9fb4_b504286689ca_B0 + mwb62b7991_b106_4a2f_931f_40a65f85ab0d_B0 -> mw36f04b11_2109_44eb_89a8_e15c0b4d283d_B0; mwd9a70698_960c_4a15_a32a_1dab6b9764de_B0_TXTL_NTP_RNAP_F*mw2dc1bd9a_10f3_4348_9fb4_b504286689ca_B0*mwb62b7991_b106_4a2f_931f_40a65f85ab0d_B0 - mwd9a70698_960c_4a15_a32a_1dab6b9764de_B0_TXTL_NTP_RNAP_R*mw36f04b11_2109_44eb_89a8_e15c0b4d283d_B0;
    mwd9a70698_960c_4a15_a32a_1dab6b9764de_B0_TXTL_NTP_RNAP_F = 1000; mwd9a70698_960c_4a15_a32a_1dab6b9764de_B0_TXTL_NTP_RNAP_R = 120000000;
  mwf427960c_a13e_4fca_a63b_4c6a42eb54c3_B0: mw2dc1bd9a_10f3_4348_9fb4_b504286689ca_B0 + mw4d3dc3a0_c7e7_4793_bd6f_f38b03662af0_B0 -> mw368d475f_4f12_4e7f_af0a_98d65de40bd3_B0; mwf427960c_a13e_4fca_a63b_4c6a42eb54c3_B0_TXTL_NTP_RNAP_F*mw2dc1bd9a_10f3_4348_9fb4_b504286689ca_B0*mw4d3dc3a0_c7e7_4793_bd6f_f38b03662af0_B0 - mwf427960c_a13e_4fca_a63b_4c6a42eb54c3_B0_TXTL_NTP_RNAP_R*mw368d475f_4f12_4e7f_af0a_98d65de40bd3_B0;
    mwf427960c_a13e_4fca_a63b_4c6a42eb54c3_B0_TXTL_NTP_RNAP_F = 1000; mwf427960c_a13e_4fca_a63b_4c6a42eb54c3_B0_TXTL_NTP_RNAP_R = 120000000;
  mw83cd2708_c554_43de_b0ad_f276f6ed8394_B0: mw36f04b11_2109_44eb_89a8_e15c0b4d283d_B0 + mw4d3dc3a0_c7e7_4793_bd6f_f38b03662af0_B0 -> mw183f8092_3f68_4011_a9e5_e94287ff842e_B0; mw83cd2708_c554_43de_b0ad_f276f6ed8394_B0_TXTL_NTP_RNAP_F*mw36f04b11_2109_44eb_89a8_e15c0b4d283d_B0*mw4d3dc3a0_c7e7_4793_bd6f_f38b03662af0_B0 - mw83cd2708_c554_43de_b0ad_f276f6ed8394_B0_TXTL_NTP_RNAP_R*mw183f8092_3f68_4011_a9e5_e94287ff842e_B0;
    mw83cd2708_c554_43de_b0ad_f276f6ed8394_B0_TXTL_NTP_RNAP_F = 1; mw83cd2708_c554_43de_b0ad_f276f6ed8394_B0_TXTL_NTP_RNAP_R = 120000;
  mw374292dd_4f4f_4655_806b_d761e1e038e4_B0: mw368d475f_4f12_4e7f_af0a_98d65de40bd3_B0 + mwb62b7991_b106_4a2f_931f_40a65f85ab0d_B0 -> mw183f8092_3f68_4011_a9e5_e94287ff842e_B0; mw374292dd_4f4f_4655_806b_d761e1e038e4_B0_TXTL_NTP_RNAP_F*mw368d475f_4f12_4e7f_af0a_98d65de40bd3_B0*mwb62b7991_b106_4a2f_931f_40a65f85ab0d_B0 - mw374292dd_4f4f_4655_806b_d761e1e038e4_B0_TXTL_NTP_RNAP_R*mw183f8092_3f68_4011_a9e5_e94287ff842e_B0;
    mw374292dd_4f4f_4655_806b_d761e1e038e4_B0_TXTL_NTP_RNAP_F = 1; mw374292dd_4f4f_4655_806b_d761e1e038e4_B0_TXTL_NTP_RNAP_R = 120000;
  mwf66db316_43f9_41eb_900c_5caf0d1678cf_B0: mw183f8092_3f68_4011_a9e5_e94287ff842e_B0 => mw5dec5dad_6074_4727_acc8_cd49277114bb_B0 + mw62fc188b_4039_4e2f_bf56_f8890887ccd3_B0; mwf66db316_43f9_41eb_900c_5caf0d1678cf_B0_TXTL_transcription_rate1*mw183f8092_3f68_4011_a9e5_e94287ff842e_B0;
    mwf66db316_43f9_41eb_900c_5caf0d1678cf_B0_TXTL_transcription_rate1 = 0.001229508;
  mw7689eae1_0ae1_4db4_9f14_5e0683f68430_B0: mwb97b2b35_db15_4990_98ba_5a74215259ad_B0 + mw8304bde5_acc0_4aea_b6a2_f12c80948065_B0 -> mwbef6706d_0ceb_4dbc_a1bf_58886b077efa_B0; mw7689eae1_0ae1_4db4_9f14_5e0683f68430_B0_TL_AA_F*mwb97b2b35_db15_4990_98ba_5a74215259ad_B0*mw8304bde5_acc0_4aea_b6a2_f12c80948065_B0 - mw7689eae1_0ae1_4db4_9f14_5e0683f68430_B0_TL_AA_R*mwbef6706d_0ceb_4dbc_a1bf_58886b077efa_B0;
    mw7689eae1_0ae1_4db4_9f14_5e0683f68430_B0_TL_AA_F = 300; mw7689eae1_0ae1_4db4_9f14_5e0683f68430_B0_TL_AA_R = 0.1;
  mw0da90e86_f5d1_49bf_9b8d_dc6770b3eb15_B0: mwbef6706d_0ceb_4dbc_a1bf_58886b077efa_B0 + 2 mwb62b7991_b106_4a2f_931f_40a65f85ab0d_B0 -> mw36352cbe_a247_45e6_b9e6_354dcc798511_B0; mw0da90e86_f5d1_49bf_9b8d_dc6770b3eb15_B0_TL_AGTP_F*mwbef6706d_0ceb_4dbc_a1bf_58886b077efa_B0*mwb62b7991_b106_4a2f_931f_40a65f85ab0d_B0^2 - mw0da90e86_f5d1_49bf_9b8d_dc6770b3eb15_B0_TL_AGTP_R*mw36352cbe_a247_45e6_b9e6_354dcc798511_B0;
    mw0da90e86_f5d1_49bf_9b8d_dc6770b3eb15_B0_TL_AGTP_F = 30; mw0da90e86_f5d1_49bf_9b8d_dc6770b3eb15_B0_TL_AGTP_R = 10;
  mwae44000e_d938_4e82_84d8_dcb761c561df_B0: mw36352cbe_a247_45e6_b9e6_354dcc798511_B0 => mwd2f4a46e_c44c_455e_9bf7_a737b25087c5_B0; mwae44000e_d938_4e82_84d8_dcb761c561df_B0_TXTL_TL_AA_consumption*mw36352cbe_a247_45e6_b9e6_354dcc798511_B0;
    mwae44000e_d938_4e82_84d8_dcb761c561df_B0_TXTL_TL_AA_consumption = 0.03;
  mw287a7dfa_f848_42a7_8cb6_64e97785d94a_B0: mw36352cbe_a247_45e6_b9e6_354dcc798511_B0 => mwd2f4a46e_c44c_455e_9bf7_a737b25087c5_B0 + mw4069bf5e_f87a_409a_8490_c7d740c73042_B0; mw287a7dfa_f848_42a7_8cb6_64e97785d94a_B0_TXTL_TL_rate*mw36352cbe_a247_45e6_b9e6_354dcc798511_B0;
    mw287a7dfa_f848_42a7_8cb6_64e97785d94a_B0_TXTL_TL_rate = 0.01;
  mw770b7254_05ee_4217_88f3_73a407a1a443_B0: mwd2f4a46e_c44c_455e_9bf7_a737b25087c5_B0 => mw62fc188b_4039_4e2f_bf56_f8890887ccd3_B0 + mw2b343d8b_4d07_4836_844b_b44127112e3d_B0; mw770b7254_05ee_4217_88f3_73a407a1a443_B0_TXTL_RIBOBOUND_TERMINATION_RATE*mwd2f4a46e_c44c_455e_9bf7_a737b25087c5_B0;
    mw770b7254_05ee_4217_88f3_73a407a1a443_B0_TXTL_RIBOBOUND_TERMINATION_RATE = 50;
  mw438fee1d_1a73_41ea_9568_b3c4ba0bdc98_B0: mw62fc188b_4039_4e2f_bf56_f8890887ccd3_B0 + mwe84e6e02_afc6_4ec7_8e8c_c6cfee2e4870_B0 -> mwf1fe5659_5ec5_45eb_9c43_16e33a2a8c10_B0; mw438fee1d_1a73_41ea_9568_b3c4ba0bdc98_B0_TXTL_RNAdeg_F*mw62fc188b_4039_4e2f_bf56_f8890887ccd3_B0*mwe84e6e02_afc6_4ec7_8e8c_c6cfee2e4870_B0 - mw438fee1d_1a73_41ea_9568_b3c4ba0bdc98_B0_TXTL_RNAdeg_R*mwf1fe5659_5ec5_45eb_9c43_16e33a2a8c10_B0;
    mw438fee1d_1a73_41ea_9568_b3c4ba0bdc98_B0_TXTL_RNAdeg_F = 10; mw438fee1d_1a73_41ea_9568_b3c4ba0bdc98_B0_TXTL_RNAdeg_R = 2000;
  mw8ec5eeb3_68e8_4b67_9cc7_890419bb39db_B0: mwf1fe5659_5ec5_45eb_9c43_16e33a2a8c10_B0 => mwe84e6e02_afc6_4ec7_8e8c_c6cfee2e4870_B0; mw8ec5eeb3_68e8_4b67_9cc7_890419bb39db_B0_TXTL_RNAdeg_F*mwf1fe5659_5ec5_45eb_9c43_16e33a2a8c10_B0;
    mw8ec5eeb3_68e8_4b67_9cc7_890419bb39db_B0_TXTL_RNAdeg_F = 0.002777778;
  mw1d2715e3_54b3_4592_a616_32c6df52c1d2_B0: mwb97b2b35_db15_4990_98ba_5a74215259ad_B0 + mwe84e6e02_afc6_4ec7_8e8c_c6cfee2e4870_B0 -> mw644b56a3_225e_4905_b91d_65641194fb7b_B0; mw1d2715e3_54b3_4592_a616_32c6df52c1d2_B0_TXTL_RNAdeg_F*mwb97b2b35_db15_4990_98ba_5a74215259ad_B0*mwe84e6e02_afc6_4ec7_8e8c_c6cfee2e4870_B0 - mw1d2715e3_54b3_4592_a616_32c6df52c1d2_B0_TXTL_RNAdeg_R*mw644b56a3_225e_4905_b91d_65641194fb7b_B0;
    mw1d2715e3_54b3_4592_a616_32c6df52c1d2_B0_TXTL_RNAdeg_F = 10; mw1d2715e3_54b3_4592_a616_32c6df52c1d2_B0_TXTL_RNAdeg_R = 2000;
  mwb6a40eb0_5b97_4b86_a0f3_1b743a2d4b50_B0: mw644b56a3_225e_4905_b91d_65641194fb7b_B0 => mwe84e6e02_afc6_4ec7_8e8c_c6cfee2e4870_B0 + mw2b343d8b_4d07_4836_844b_b44127112e3d_B0; mwb6a40eb0_5b97_4b86_a0f3_1b743a2d4b50_B0_TXTL_RNAdeg_F*mw644b56a3_225e_4905_b91d_65641194fb7b_B0;
    mwb6a40eb0_5b97_4b86_a0f3_1b743a2d4b50_B0_TXTL_RNAdeg_F = 0.002777778;
  mw50ae8258_2d92_40c9_83c4_5fc0f5b7c027_B0: mw36352cbe_a247_45e6_b9e6_354dcc798511_B0 + mwe84e6e02_afc6_4ec7_8e8c_c6cfee2e4870_B0 -> mw0b2d0b19_df92_4fa0_a113_72605c1f5822_B0; mw50ae8258_2d92_40c9_83c4_5fc0f5b7c027_B0_TXTL_RNAdeg_F*mw36352cbe_a247_45e6_b9e6_354dcc798511_B0*mwe84e6e02_afc6_4ec7_8e8c_c6cfee2e4870_B0 - mw50ae8258_2d92_40c9_83c4_5fc0f5b7c027_B0_TXTL_RNAdeg_R*mw0b2d0b19_df92_4fa0_a113_72605c1f5822_B0;
    mw50ae8258_2d92_40c9_83c4_5fc0f5b7c027_B0_TXTL_RNAdeg_F = 10; mw50ae8258_2d92_40c9_83c4_5fc0f5b7c027_B0_TXTL_RNAdeg_R = 2000;
  mw90efdff8_d377_47b1_a092_e844214a13cc_B0: mw0b2d0b19_df92_4fa0_a113_72605c1f5822_B0 => mwe84e6e02_afc6_4ec7_8e8c_c6cfee2e4870_B0 + mw8304bde5_acc0_4aea_b6a2_f12c80948065_B0 + 2 mwb62b7991_b106_4a2f_931f_40a65f85ab0d_B0 + mw2b343d8b_4d07_4836_844b_b44127112e3d_B0; mw90efdff8_d377_47b1_a092_e844214a13cc_B0_TXTL_RNAdeg_F*mw0b2d0b19_df92_4fa0_a113_72605c1f5822_B0;
    mw90efdff8_d377_47b1_a092_e844214a13cc_B0_TXTL_RNAdeg_F = 0.002777778;
  mwf40f2087_8235_4b0b_b956_86f42c1f1a8a_B0: mwd2f4a46e_c44c_455e_9bf7_a737b25087c5_B0 + mwe84e6e02_afc6_4ec7_8e8c_c6cfee2e4870_B0 -> mw9e19e54e_9c37_4f15_8e19_5b74b0445750_B0; mwf40f2087_8235_4b0b_b956_86f42c1f1a8a_B0_TXTL_RNAdeg_F*mwd2f4a46e_c44c_455e_9bf7_a737b25087c5_B0*mwe84e6e02_afc6_4ec7_8e8c_c6cfee2e4870_B0 - mwf40f2087_8235_4b0b_b956_86f42c1f1a8a_B0_TXTL_RNAdeg_R*mw9e19e54e_9c37_4f15_8e19_5b74b0445750_B0;
    mwf40f2087_8235_4b0b_b956_86f42c1f1a8a_B0_TXTL_RNAdeg_F = 10; mwf40f2087_8235_4b0b_b956_86f42c1f1a8a_B0_TXTL_RNAdeg_R = 2000;
  mwbdca5a43_6bc6_43bc_9525_5a19c03e6f90_B0: mw9e19e54e_9c37_4f15_8e19_5b74b0445750_B0 => mwe84e6e02_afc6_4ec7_8e8c_c6cfee2e4870_B0 + mw2b343d8b_4d07_4836_844b_b44127112e3d_B0; mwbdca5a43_6bc6_43bc_9525_5a19c03e6f90_B0_TXTL_RNAdeg_F*mw9e19e54e_9c37_4f15_8e19_5b74b0445750_B0;
    mwbdca5a43_6bc6_43bc_9525_5a19c03e6f90_B0_TXTL_RNAdeg_F = 0.002777778;
  mwb940ab2c_0ab4_4fd4_9b65_1b9a48e6147b_B0: mwbef6706d_0ceb_4dbc_a1bf_58886b077efa_B0 + mwe84e6e02_afc6_4ec7_8e8c_c6cfee2e4870_B0 -> mwf698caa3_a223_4f23_a862_f770f6446ab9_B0; mwb940ab2c_0ab4_4fd4_9b65_1b9a48e6147b_B0_TXTL_RNAdeg_F*mwbef6706d_0ceb_4dbc_a1bf_58886b077efa_B0*mwe84e6e02_afc6_4ec7_8e8c_c6cfee2e4870_B0 - mwb940ab2c_0ab4_4fd4_9b65_1b9a48e6147b_B0_TXTL_RNAdeg_R*mwf698caa3_a223_4f23_a862_f770f6446ab9_B0;
    mwb940ab2c_0ab4_4fd4_9b65_1b9a48e6147b_B0_TXTL_RNAdeg_F = 10; mwb940ab2c_0ab4_4fd4_9b65_1b9a48e6147b_B0_TXTL_RNAdeg_R = 2000;
  mw8312da9a_0ca1_44e3_9941_cc2a52bfb41c_B0: mwf698caa3_a223_4f23_a862_f770f6446ab9_B0 => mwe84e6e02_afc6_4ec7_8e8c_c6cfee2e4870_B0 + mw8304bde5_acc0_4aea_b6a2_f12c80948065_B0 + mw2b343d8b_4d07_4836_844b_b44127112e3d_B0; mw8312da9a_0ca1_44e3_9941_cc2a52bfb41c_B0_TXTL_RNAdeg_F*mwf698caa3_a223_4f23_a862_f770f6446ab9_B0;
    mw8312da9a_0ca1_44e3_9941_cc2a52bfb41c_B0_TXTL_RNAdeg_F = 0.002777778;
  mw92882118_14cc_452d_99cd_26e3e65974a2_B0: mwb62b7991_b106_4a2f_931f_40a65f85ab0d_B0 => mw987fd738_fa8b_4146_9d23_664ff607676f_B0; mwcc808c82_e2e9_4595_a7df_a5d245930dcd_B0*mwb62b7991_b106_4a2f_931f_40a65f85ab0d_B0;

  // Events:
  event_177: at (time <= 5400): mw5996d02e_ace7_48f3_a137_02e414010144_A1 = 0;
  event_178: at (time > 5400): mw5996d02e_ace7_48f3_a137_02e414010144_A1 = 0.0002;
  event_179: at (time <= 5400): mwcc808c82_e2e9_4595_a7df_a5d245930dcd_B0 = 0;
  event_180: at (time > 5400): mwcc808c82_e2e9_4595_a7df_a5d245930dcd_B0 = 0.0002;

  // Unit definitions:
  unit volume = litre;
  unit substance = mole;
  unit area = metre^2;
end
