// SBML level 3 version 2

model combined_model_of__mw967a8ab1_b005_4143_b8a9_50eb345f7156_A1_mw66ac99a0_0b6e_4b34_9d1d_e2300e577675_B1()
  // model units - substance: substance, time: second, volume: volume, area: area, length: metre, extent: substance

  // Compartments:
  compartment cell = 5 volume;

  // Species:
  species mwbc293b51_8dc7_482a_a166_48a08fcf70c0_A1 in cell = 100.0001/cell; mwbc293b51_8dc7_482a_a166_48a08fcf70c0_A1 is "RNAP";
  species mw594b7843_33b7_4d56_8d09_d26fee2a0f42_A1 in cell = 30.00002/cell; mw594b7843_33b7_4d56_8d09_d26fee2a0f42_A1 is "Ribo";
  species mw113bfdc1_1a35_487b_a1d3_4e87711c7ad9_A1 in cell = 5.000003/cell; mw113bfdc1_1a35_487b_a1d3_4e87711c7ad9_A1 is "RecBCD";
  species mw27046043_506c_4103_934f_0748df8dafa4_A1 in cell = 100.0001/cell; mw27046043_506c_4103_934f_0748df8dafa4_A1 is "RNase";
  species mwd8ef21ee_e9ca_4fc9_8dcb_29c5bd7134bf_A1 in cell = 3180048/cell; mwd8ef21ee_e9ca_4fc9_8dcb_29c5bd7134bf_A1 is "AGTP";
  species mw8088dcad_75d7_4cb8_b044_4b2f2554ea24_A1 in cell = 1908029/cell; mw8088dcad_75d7_4cb8_b044_4b2f2554ea24_A1 is "CUTP";
  species mwe2d770f4_9878_44f4_b4a1_e7f76d106315_A1 in cell = 3.180048e7/cell; mwe2d770f4_9878_44f4_b4a1_e7f76d106315_A1 is "AA";
  species mwcd1c814e_f9b8_4d24_884f_d5704904c450_A1 in cell = 0; mwcd1c814e_f9b8_4d24_884f_d5704904c450_A1 is "protein deGFP";
  species mwf2ce0d3a_c24a_40e1_97ae_5d8239face0e_A1 in cell = 0; mwf2ce0d3a_c24a_40e1_97ae_5d8239face0e_A1 is "protein deGFP*";
  species mwbd0de251_9de9_4624_94eb_1d758cdcf826_A1 in cell = 0; mwbd0de251_9de9_4624_94eb_1d758cdcf826_A1 is "RNA utr1--deGFP";
  species mw37e1a28e_e2b4_401d_b9d3_c1ea5bda1065_A1 in cell = 0; mw37e1a28e_e2b4_401d_b9d3_c1ea5bda1065_A1 is "Ribo:RNA utr1--deGFP";
  species mw87691a6b_7cd2_4ddd_839b_43c6d02d7331_A1 in cell = 2.000001/cell; mw87691a6b_7cd2_4ddd_839b_43c6d02d7331_A1 is "DNA p28_ptet--utr1--deGFP";
  species mw20a1da32_7c46_4a5c_8879_3ad39876a732_A1 in cell = 0; mw20a1da32_7c46_4a5c_8879_3ad39876a732_A1 is "RNAP28";
  species mwdf0c8dc3_f696_4ab1_86ce_7dfb1a89edb0_A1 in cell = 0; mwdf0c8dc3_f696_4ab1_86ce_7dfb1a89edb0_A1 is "RNAP28:DNA p28_ptet--utr1--deGFP";
  species mw39fc0fca_dcae_441f_895a_36ffd39fb240_A1 in cell = 0; mw39fc0fca_dcae_441f_895a_36ffd39fb240_A1 is "protein sigma28";
  species mw6e225233_4608_4bf8_9195_7e11a89791f2_A1 in cell = 0; mw6e225233_4608_4bf8_9195_7e11a89791f2_A1 is "protein tetRdimer";
  species mw767cfd85_1821_4540_a684_152047e82155_A1 in cell = 0; mw767cfd85_1821_4540_a684_152047e82155_A1 is "CUTP:AGTP:RNAP28:DNA p28_ptet--utr1--deGFP";
  species mw160f7d4f_5670_4840_8fd1_2b77a0ee69a5_A1 in cell = 0; mw160f7d4f_5670_4840_8fd1_2b77a0ee69a5_A1 is "term_RNAP28:DNA p28_ptet--utr1--deGFP";
  species mw2b7b6b31_58f9_4148_b27d_9e4e41a5e0b6_A1 in cell = 0; mw2b7b6b31_58f9_4148_b27d_9e4e41a5e0b6_A1 is "RNAP28:DNA p28_ptet--utr1--deGFP:protein tetRdimer";
  species mw33d7e051_c27d_4612_baf5_1288c43a7aa2_A1 in cell = 0; mw33d7e051_c27d_4612_baf5_1288c43a7aa2_A1 is "CUTP:AGTP:RNAP28:DNA p28_ptet--utr1--deGFP:protein tetRdimer";
  species mw51c25126_57a0_4186_9809_4aae5461f0c3_A1 in cell = 0; mw51c25126_57a0_4186_9809_4aae5461f0c3_A1 is "term_RNAP28:DNA p28_ptet--utr1--deGFP:protein tetRdimer";
  species mw26fe5026_1c10_4917_b448_ebc246eac265_A1 in cell = 0; mw26fe5026_1c10_4917_b448_ebc246eac265_A1 is "AA:2AGTP:Ribo:RNA utr1--deGFP";
  species mw15465405_e52f_419d_855c_6598432b9882_A1 in cell = 0; mw15465405_e52f_419d_855c_6598432b9882_A1 is "term_Ribo:RNA utr1--deGFP";
  species mw159b5269_c579_43b5_abc6_26e4f63e7bbe_A1 in cell = 0; mw159b5269_c579_43b5_abc6_26e4f63e7bbe_A1 is "RNA utr1--sigma28";
  species mw723b9f32_93c9_43a1_8211_96ed49f884fc_A1 in cell = 0; mw723b9f32_93c9_43a1_8211_96ed49f884fc_A1 is "Ribo:RNA utr1--sigma28";
  species mwe0637f7e_f800_4cab_a905_3d73c03f4421_A1 in cell = 0.2000001/cell; mwe0637f7e_f800_4cab_a905_3d73c03f4421_A1 is "DNA plac--utr1--sigma28";
  species mwaa84c5c4_3442_413c_9e85_94a1701809bc_A1 in cell = 0; mwaa84c5c4_3442_413c_9e85_94a1701809bc_A1 is "RNAP:DNA plac--utr1--sigma28";
  species mw12b99714_0096_4228_8bd1_56f6f073b8fc_A1 in cell = 0; mw12b99714_0096_4228_8bd1_56f6f073b8fc_A1 is "CUTP:AGTP:RNAP:DNA plac--utr1--sigma28";
  species mwd42f73fc_1ebd_4594_9b18_c6dc092c4988_A1 in cell = 0; mwd42f73fc_1ebd_4594_9b18_c6dc092c4988_A1 is "term_RNAP:DNA plac--utr1--sigma28";
  species mw3a503b2f_f902_4b3d_aa4c_f902f0264a37_A1 in cell = 0; mw3a503b2f_f902_4b3d_aa4c_f902f0264a37_A1 is "AA:2AGTP:Ribo:RNA utr1--sigma28";
  species mw92db7974_c165_491c_8c88_79dd770dbc24_A1 in cell = 0; mw92db7974_c165_491c_8c88_79dd770dbc24_A1 is "term_Ribo:RNA utr1--sigma28";
  species mwef07ee12_d243_46b6_89d4_bc28da816df2_A1 in cell = 0; mwef07ee12_d243_46b6_89d4_bc28da816df2_A1 is "protein tetR";
  species mw3a0e9d86_a92b_48f1_9223_3cfccc763b62_A1 in cell = 0; mw3a0e9d86_a92b_48f1_9223_3cfccc763b62_A1 is "aTc";
  species mwb068be83_9a00_46e5_aba9_9f0397045c72_A1 in cell = 0; mwb068be83_9a00_46e5_aba9_9f0397045c72_A1 is "2 aTc:protein tetRdimer";
  species mwf9018752_1c9d_4f16_9589_f9f097925a05_A1 in cell = 0; mwf9018752_1c9d_4f16_9589_f9f097925a05_A1 is "DNA p28_ptet--utr1--deGFP:protein tetRdimer";
  species mwb814d2ca_9454_4d78_98cd_0b4149c00f23_A1 in cell = 0; mwb814d2ca_9454_4d78_98cd_0b4149c00f23_A1 is "AGTP:RNAP28:DNA p28_ptet--utr1--deGFP";
  species mw3f43dd50_395a_41c0_b13a_cafb4df0cbc0_A1 in cell = 0; mw3f43dd50_395a_41c0_b13a_cafb4df0cbc0_A1 is "CUTP:RNAP28:DNA p28_ptet--utr1--deGFP";
  species mw6ec81de9_8855_488e_8573_5f723ada6335_A1 in cell = 0; mw6ec81de9_8855_488e_8573_5f723ada6335_A1 is "AGTP:RNAP28:DNA p28_ptet--utr1--deGFP:protein tetRdimer";
  species mwba8c5d42_edfd_45cf_8015_44d6c0292132_A1 in cell = 0; mwba8c5d42_edfd_45cf_8015_44d6c0292132_A1 is "CUTP:RNAP28:DNA p28_ptet--utr1--deGFP:protein tetRdimer";
  species mw0622e252_6a81_4d00_87d0_bc1b92321eda_A1 in cell = 0; mw0622e252_6a81_4d00_87d0_bc1b92321eda_A1 is "AA:Ribo:RNA utr1--deGFP";
  species mw4bae209d_759b_43de_b743_890e224c3c89_A1 in cell = 0; mw4bae209d_759b_43de_b743_890e224c3c89_A1 is "RNA utr1--deGFP:RNase";
  species mw77d678ec_db89_4b4f_931a_1ec88923ef06_A1 in cell = 0; mw77d678ec_db89_4b4f_931a_1ec88923ef06_A1 is "Ribo:RNA utr1--deGFP:RNase";
  species mw6bdd6a42_9a73_4258_be16_ffb0862f4562_A1 in cell = 0; mw6bdd6a42_9a73_4258_be16_ffb0862f4562_A1 is "AA:2AGTP:Ribo:RNA utr1--deGFP:RNase";
  species mw119364e8_fa9c_40f2_96cc_db4b33a0963c_A1 in cell = 0; mw119364e8_fa9c_40f2_96cc_db4b33a0963c_A1 is "term_Ribo:RNA utr1--deGFP:RNase";
  species mwc9810a52_fda0_4aed_ac03_1d0888c20bed_A1 in cell = 0; mwc9810a52_fda0_4aed_ac03_1d0888c20bed_A1 is "AA:Ribo:RNA utr1--deGFP:RNase";
  species mw51a418e8_c9ef_4962_ba5d_cbba756856d4_A1 in cell = 0; mw51a418e8_c9ef_4962_ba5d_cbba756856d4_A1 is "AGTP:RNAP:DNA plac--utr1--sigma28";
  species mwd8d88450_7aa2_4a23_9f23_9f35b73ef802_A1 in cell = 0; mwd8d88450_7aa2_4a23_9f23_9f35b73ef802_A1 is "CUTP:RNAP:DNA plac--utr1--sigma28";
  species mw7629a538_33fa_422e_9578_e65d19d44075_A1 in cell = 0; mw7629a538_33fa_422e_9578_e65d19d44075_A1 is "AA:Ribo:RNA utr1--sigma28";
  species mw0f226cf0_c928_4c2a_9129_2dbecb533b8a_A1 in cell = 0; mw0f226cf0_c928_4c2a_9129_2dbecb533b8a_A1 is "RNA utr1--sigma28:RNase";
  species mw78d86b82_eb53_4471_a341_dc0987b8c524_A1 in cell = 0; mw78d86b82_eb53_4471_a341_dc0987b8c524_A1 is "Ribo:RNA utr1--sigma28:RNase";
  species mwf2948b32_54ad_4e76_be2a_39ecc8d961c6_A1 in cell = 0; mwf2948b32_54ad_4e76_be2a_39ecc8d961c6_A1 is "AA:2AGTP:Ribo:RNA utr1--sigma28:RNase";
  species mw32f64a96_a32d_492d_9e54_605c79f936ad_A1 in cell = 0; mw32f64a96_a32d_492d_9e54_605c79f936ad_A1 is "term_Ribo:RNA utr1--sigma28:RNase";
  species mwe99f1695_b38c_4adc_bdfc_014007d37ad3_A1 in cell = 0; mwe99f1695_b38c_4adc_bdfc_014007d37ad3_A1 is "AA:Ribo:RNA utr1--sigma28:RNase";
  species mweb394987_d45b_41cf_8716_52dc428a420b_A1 in cell = 0; mweb394987_d45b_41cf_8716_52dc428a420b_A1 is "AGTP_USED";
  species mwce985125_4033_4878_99c7_9fa79ad26a8b_B1 in cell = 100.0001/cell; mwce985125_4033_4878_99c7_9fa79ad26a8b_B1 is "RNAP";
  species mwe288cc4d_bd5c_430e_acab_0b3cd6abf225_B1 in cell = 30.00002/cell; mwe288cc4d_bd5c_430e_acab_0b3cd6abf225_B1 is "Ribo";
  species mwc7abc1f1_3749_496b_a53e_d815e6bc4e98_B1 in cell = 5.000003/cell; mwc7abc1f1_3749_496b_a53e_d815e6bc4e98_B1 is "RecBCD";
  species mw4f453c9c_a4a1_4d03_a1b9_243580f1d942_B1 in cell = 100.0001/cell; mw4f453c9c_a4a1_4d03_a1b9_243580f1d942_B1 is "RNase";
  species mwe041b8b1_92b6_4c2b_8e78_5212f5644e01_B1 in cell = 3180048/cell; mwe041b8b1_92b6_4c2b_8e78_5212f5644e01_B1 is "AGTP";
  species mw0224b269_aae5_4ca1_a6e6_3607229b0a5b_B1 in cell = 1908029/cell; mw0224b269_aae5_4ca1_a6e6_3607229b0a5b_B1 is "CUTP";
  species mwe9049d27_bfa6_4d5d_a0d3_42922e3af392_B1 in cell = 3.180048e7/cell; mwe9049d27_bfa6_4d5d_a0d3_42922e3af392_B1 is "AA";
  species mwb072cf50_050b_4bec_97e3_cacc9c6c80b7_B1 in cell = 0; mwb072cf50_050b_4bec_97e3_cacc9c6c80b7_B1 is "protein tetR";
  species mwc00f5b5a_e21d_42e7_a0ca_6a931ffb4ec0_B1 in cell = 0; mwc00f5b5a_e21d_42e7_a0ca_6a931ffb4ec0_B1 is "aTc";
  species mweeccb4d5_ef92_4f38_88ef_1113e7e2f961_B1 in cell = 0; mweeccb4d5_ef92_4f38_88ef_1113e7e2f961_B1 is "protein tetRdimer";
  species mwcab9d721_d5fe_46ba_8abd_db6023744051_B1 in cell = 0; mwcab9d721_d5fe_46ba_8abd_db6023744051_B1 is "RNA utr1--tetR";
  species mwe49f90af_dd8c_43dd_948f_ad0a5a401277_B1 in cell = 0; mwe49f90af_dd8c_43dd_948f_ad0a5a401277_B1 is "Ribo:RNA utr1--tetR";
  species mwfb07f4d9_670f_4329_bed5_e109f421698e_B1 in cell = 0.5000003/cell; mwfb07f4d9_670f_4329_bed5_e109f421698e_B1 is "DNA psigX--utr1--tetR";
  species mwdc1e07fe_9c7d_43d2_9ae9_2e9bb4e826f3_B1 in cell = 0; mwdc1e07fe_9c7d_43d2_9ae9_2e9bb4e826f3_B1 is "RNAPSIGX";
  species mw3b47668e_6c7d_4a08_9772_b34bca7fb884_B1 in cell = 0; mw3b47668e_6c7d_4a08_9772_b34bca7fb884_B1 is "RNAPSIGX:DNA psigX--utr1--tetR";
  species mwe8451d4a_d4c8_405c_8ad4_6540824528ee_B1 in cell = 0; mwe8451d4a_d4c8_405c_8ad4_6540824528ee_B1 is "AA:2AGTP:Ribo:RNA utr1--tetR";
  species mwaff2c6b9_d770_4f47_a543_6039b764a7aa_B1 in cell = 0; mwaff2c6b9_d770_4f47_a543_6039b764a7aa_B1 is "term_Ribo:RNA utr1--tetR";
  species mw877e5da9_7092_45a9_a813_ef218b4c657d_B1 in cell = 0; mw877e5da9_7092_45a9_a813_ef218b4c657d_B1 is "protein sigmaX";
  species mw36edb9f5_273a_49e0_934c_53af44826f29_B1 in cell = 0; mw36edb9f5_273a_49e0_934c_53af44826f29_B1 is "RNA utr1--sigmaX";
  species mw3f61c48c_778f_42d0_bc92_da35a18105d3_B1 in cell = 0; mw3f61c48c_778f_42d0_bc92_da35a18105d3_B1 is "Ribo:RNA utr1--sigmaX";
  species mw29bca20f_bb74_4aea_a37a_0df7c5808987_B1 in cell = 5.000003/cell; mw29bca20f_bb74_4aea_a37a_0df7c5808987_B1 is "DNA plac--utr1--sigmaX";
  species mw2ee2aa24_784a_4146_b966_da635c45f303_B1 in cell = 0; mw2ee2aa24_784a_4146_b966_da635c45f303_B1 is "RNAP:DNA plac--utr1--sigmaX";
  species mwc92d9367_0957_4147_8d27_b4d8aaf06cb6_B1 in cell = 0; mwc92d9367_0957_4147_8d27_b4d8aaf06cb6_B1 is "CUTP:AGTP:RNAP:DNA plac--utr1--sigmaX";
  species mw6ff72b56_f396_433c_8b68_d4b90158ef92_B1 in cell = 0; mw6ff72b56_f396_433c_8b68_d4b90158ef92_B1 is "term_RNAP:DNA plac--utr1--sigmaX";
  species mw28e4173c_cdc1_46d3_a5fc_1ef799b41f32_B1 in cell = 0; mw28e4173c_cdc1_46d3_a5fc_1ef799b41f32_B1 is "AA:2AGTP:Ribo:RNA utr1--sigmaX";
  species mw859e0e3a_63c1_4ffd_95c2_a67b83b1d1d6_B1 in cell = 0; mw859e0e3a_63c1_4ffd_95c2_a67b83b1d1d6_B1 is "term_Ribo:RNA utr1--sigmaX";
  species mwe5d4529b_d02b_475a_8ba1_4c9f568c47f3_B1 in cell = 0; mwe5d4529b_d02b_475a_8ba1_4c9f568c47f3_B1 is "2 aTc:protein tetRdimer";
  species mw39a79b9e_eb59_423a_b844_153e6aa7934d_B1 in cell = 0; mw39a79b9e_eb59_423a_b844_153e6aa7934d_B1 is "CUTP:AGTP:RNAPSIGX:DNA psigX--utr1--tetR";
  species mw6b52fa43_ee57_4ca8_95ac_e79f61a74a41_B1 in cell = 0; mw6b52fa43_ee57_4ca8_95ac_e79f61a74a41_B1 is "term_RNAPSIGX:DNA psigX--utr1--tetR";
  species mw1731539c_93c9_4968_a47b_f95e241210a2_B1 in cell = 0; mw1731539c_93c9_4968_a47b_f95e241210a2_B1 is "AGTP:RNAPSIGX:DNA psigX--utr1--tetR";
  species mwa075b409_1abd_4858_af4d_da62f73a89dd_B1 in cell = 0; mwa075b409_1abd_4858_af4d_da62f73a89dd_B1 is "CUTP:RNAPSIGX:DNA psigX--utr1--tetR";
  species mwb4630ba2_e015_4781_ae70_8c24b6e740a9_B1 in cell = 0; mwb4630ba2_e015_4781_ae70_8c24b6e740a9_B1 is "AA:Ribo:RNA utr1--tetR";
  species mwc983a153_460d_4570_95dd_30cb763a952d_B1 in cell = 0; mwc983a153_460d_4570_95dd_30cb763a952d_B1 is "RNA utr1--tetR:RNase";
  species mw939fe071_4f16_4ba8_9242_f1c904939ffa_B1 in cell = 0; mw939fe071_4f16_4ba8_9242_f1c904939ffa_B1 is "Ribo:RNA utr1--tetR:RNase";
  species mwb8f06eb4_04c7_41dd_95fd_da65ad77558d_B1 in cell = 0; mwb8f06eb4_04c7_41dd_95fd_da65ad77558d_B1 is "AA:2AGTP:Ribo:RNA utr1--tetR:RNase";
  species mw2b48d717_964b_4fde_80eb_31dfc8f9aaae_B1 in cell = 0; mw2b48d717_964b_4fde_80eb_31dfc8f9aaae_B1 is "term_Ribo:RNA utr1--tetR:RNase";
  species mw538a3c71_29fe_4d44_9325_c8a1ffafb19d_B1 in cell = 0; mw538a3c71_29fe_4d44_9325_c8a1ffafb19d_B1 is "AA:Ribo:RNA utr1--tetR:RNase";
  species mw9bde46ed_23e4_4399_ac0a_9c28ab16893e_B1 in cell = 0; mw9bde46ed_23e4_4399_ac0a_9c28ab16893e_B1 is "AGTP:RNAP:DNA plac--utr1--sigmaX";
  species mw90d19c58_7381_4cb3_8dfb_787c23b6ebeb_B1 in cell = 0; mw90d19c58_7381_4cb3_8dfb_787c23b6ebeb_B1 is "CUTP:RNAP:DNA plac--utr1--sigmaX";
  species mw5295d527_9f1d_4e8e_b95c_86adacac9bbf_B1 in cell = 0; mw5295d527_9f1d_4e8e_b95c_86adacac9bbf_B1 is "AA:Ribo:RNA utr1--sigmaX";
  species mwbe15e58d_ded7_4bf5_aadd_ae1ad48fb846_B1 in cell = 0; mwbe15e58d_ded7_4bf5_aadd_ae1ad48fb846_B1 is "RNA utr1--sigmaX:RNase";
  species mwa1fc1ae9_7ea5_4b19_bfdd_e783762ed1b9_B1 in cell = 0; mwa1fc1ae9_7ea5_4b19_bfdd_e783762ed1b9_B1 is "Ribo:RNA utr1--sigmaX:RNase";
  species mw2f9c1825_57e6_48b8_878b_5f84570d0f7b_B1 in cell = 0; mw2f9c1825_57e6_48b8_878b_5f84570d0f7b_B1 is "AA:2AGTP:Ribo:RNA utr1--sigmaX:RNase";
  species mw6de5993d_c5be_4d0b_8507_656ff4d0b17b_B1 in cell = 0; mw6de5993d_c5be_4d0b_8507_656ff4d0b17b_B1 is "term_Ribo:RNA utr1--sigmaX:RNase";
  species mw8b8e7de3_298d_4e5b_9ad2_f3adb3660424_B1 in cell = 0; mw8b8e7de3_298d_4e5b_9ad2_f3adb3660424_B1 is "AA:Ribo:RNA utr1--sigmaX:RNase";
  species mwff9bade0_4398_4b01_a00e_4bb92b82929f_B1 in cell = 0; mwff9bade0_4398_4b01_a00e_4bb92b82929f_B1 is "AGTP_USED";

  // Parameters:
  mw5996d02e_ace7_48f3_a137_02e414010144_A1 = 0; mw5996d02e_ace7_48f3_a137_02e414010144_A1 is "AGTPdeg_F";
  mw786a2e83_d802_4211_81cc_786f08db726f_B1 = 0; mw786a2e83_d802_4211_81cc_786f08db726f_B1 is "AGTPdeg_F";

  // Reactions:
  mw959d31fc_757b_482f_9952_6a2ad51d115a_A1: mw6e225233_4608_4bf8_9195_7e11a89791f2_A1 + 2 mw3a0e9d86_a92b_48f1_9223_3cfccc763b62_A1 -> mwb068be83_9a00_46e5_aba9_9f0397045c72_A1; mw959d31fc_757b_482f_9952_6a2ad51d115a_A1_TXTL_INDUCER_TETR_ATC_F*mw6e225233_4608_4bf8_9195_7e11a89791f2_A1*mw3a0e9d86_a92b_48f1_9223_3cfccc763b62_A1^2 - mw959d31fc_757b_482f_9952_6a2ad51d115a_A1_TXTL_INDUCER_TETR_ATC_R*mwb068be83_9a00_46e5_aba9_9f0397045c72_A1;
    mw959d31fc_757b_482f_9952_6a2ad51d115a_A1_TXTL_INDUCER_TETR_ATC_F = 1e-5; mw959d31fc_757b_482f_9952_6a2ad51d115a_A1_TXTL_INDUCER_TETR_ATC_R = 0.1;
  mwc457ec48_5146_43f1_b82b_c658314430c8_A1: 2 mwef07ee12_d243_46b6_89d4_bc28da816df2_A1 -> mw6e225233_4608_4bf8_9195_7e11a89791f2_A1; mwc457ec48_5146_43f1_b82b_c658314430c8_A1_kf*mwef07ee12_d243_46b6_89d4_bc28da816df2_A1^2 - mwc457ec48_5146_43f1_b82b_c658314430c8_A1_kr*mw6e225233_4608_4bf8_9195_7e11a89791f2_A1;
    mwc457ec48_5146_43f1_b82b_c658314430c8_A1_kf = 1; mwc457ec48_5146_43f1_b82b_c658314430c8_A1_kr = 1;
  mw4ce2286a_12a9_4730_a483_d2ad525d600e_A1: mwcd1c814e_f9b8_4d24_884f_d5704904c450_A1 => mwf2ce0d3a_c24a_40e1_97ae_5d8239face0e_A1; TXTL_PROT_deGFP_MATURATION*mwcd1c814e_f9b8_4d24_884f_d5704904c450_A1;
    TXTL_PROT_deGFP_MATURATION = 0.002310491;
  mwd856cc35_c672_4cb6_b131_978bc7eb0839_A1: mwbd0de251_9de9_4624_94eb_1d758cdcf826_A1 + mw594b7843_33b7_4d56_8d09_d26fee2a0f42_A1 -> mw37e1a28e_e2b4_401d_b9d3_c1ea5bda1065_A1; mwd856cc35_c672_4cb6_b131_978bc7eb0839_A1_TXTL_UTR_UTR1_F*mwbd0de251_9de9_4624_94eb_1d758cdcf826_A1*mw594b7843_33b7_4d56_8d09_d26fee2a0f42_A1 - mwd856cc35_c672_4cb6_b131_978bc7eb0839_A1_TXTL_UTR_UTR1_R*mw37e1a28e_e2b4_401d_b9d3_c1ea5bda1065_A1;
    mwd856cc35_c672_4cb6_b131_978bc7eb0839_A1_TXTL_UTR_UTR1_F = 0.2; mwd856cc35_c672_4cb6_b131_978bc7eb0839_A1_TXTL_UTR_UTR1_R = 4;
  mw433c0e2e_474e_475a_8d07_a975fb6f7d4e_A1: mw87691a6b_7cd2_4ddd_839b_43c6d02d7331_A1 + mw20a1da32_7c46_4a5c_8879_3ad39876a732_A1 -> mwdf0c8dc3_f696_4ab1_86ce_7dfb1a89edb0_A1; TXTL_PTET_RNAPbound_F*mw87691a6b_7cd2_4ddd_839b_43c6d02d7331_A1*mw20a1da32_7c46_4a5c_8879_3ad39876a732_A1 - TXTL_PTET_RNAPbound_R*mwdf0c8dc3_f696_4ab1_86ce_7dfb1a89edb0_A1;
    TXTL_PTET_RNAPbound_F = 0.006; TXTL_PTET_RNAPbound_R = 5;
  mw78df2b18_f0dd_4192_8d11_77d6713b680d_A1: mw87691a6b_7cd2_4ddd_839b_43c6d02d7331_A1 + mw6e225233_4608_4bf8_9195_7e11a89791f2_A1 -> mwf9018752_1c9d_4f16_9589_f9f097925a05_A1; mw78df2b18_f0dd_4192_8d11_77d6713b680d_A1_kf*mw87691a6b_7cd2_4ddd_839b_43c6d02d7331_A1*mw6e225233_4608_4bf8_9195_7e11a89791f2_A1 - mw78df2b18_f0dd_4192_8d11_77d6713b680d_A1_kr*mwf9018752_1c9d_4f16_9589_f9f097925a05_A1;
    mw78df2b18_f0dd_4192_8d11_77d6713b680d_A1_kf = 0.00286; mw78df2b18_f0dd_4192_8d11_77d6713b680d_A1_kr = 1.1e-5;
  mwe57535e5_c85c_416b_8bc5_6dbf9d52da2c_A1: mwdf0c8dc3_f696_4ab1_86ce_7dfb1a89edb0_A1 + mw6e225233_4608_4bf8_9195_7e11a89791f2_A1 -> mw2b7b6b31_58f9_4148_b27d_9e4e41a5e0b6_A1; mwe57535e5_c85c_416b_8bc5_6dbf9d52da2c_A1_kf*mwdf0c8dc3_f696_4ab1_86ce_7dfb1a89edb0_A1*mw6e225233_4608_4bf8_9195_7e11a89791f2_A1 - mwe57535e5_c85c_416b_8bc5_6dbf9d52da2c_A1_kr*mw2b7b6b31_58f9_4148_b27d_9e4e41a5e0b6_A1;
    mwe57535e5_c85c_416b_8bc5_6dbf9d52da2c_A1_kf = 0.00286; mwe57535e5_c85c_416b_8bc5_6dbf9d52da2c_A1_kr = 1.1e-5;
  mw3274d922_543b_41bd_969b_6b8a7f754faf_A1: mwf9018752_1c9d_4f16_9589_f9f097925a05_A1 + mw20a1da32_7c46_4a5c_8879_3ad39876a732_A1 -> mw2b7b6b31_58f9_4148_b27d_9e4e41a5e0b6_A1; mw3274d922_543b_41bd_969b_6b8a7f754faf_A1_kf*mwf9018752_1c9d_4f16_9589_f9f097925a05_A1*mw20a1da32_7c46_4a5c_8879_3ad39876a732_A1 - mw3274d922_543b_41bd_969b_6b8a7f754faf_A1_kr*mw2b7b6b31_58f9_4148_b27d_9e4e41a5e0b6_A1;
    mw3274d922_543b_41bd_969b_6b8a7f754faf_A1_kf = 0.006; mw3274d922_543b_41bd_969b_6b8a7f754faf_A1_kr = 5000;
  mwb85784d9_5df8_4259_9d4a_31b464bee546_A1: mw767cfd85_1821_4540_a684_152047e82155_A1 => mwdf0c8dc3_f696_4ab1_86ce_7dfb1a89edb0_A1; mwb85784d9_5df8_4259_9d4a_31b464bee546_A1_TXTL_NTP_consumption*mw767cfd85_1821_4540_a684_152047e82155_A1;
    mwb85784d9_5df8_4259_9d4a_31b464bee546_A1_TXTL_NTP_consumption = 0.7485294;
  mw9dfe45c1_0cd6_4c4c_9148_a073eaa2669d_A1: mw160f7d4f_5670_4840_8fd1_2b77a0ee69a5_A1 => mw20a1da32_7c46_4a5c_8879_3ad39876a732_A1 + mw87691a6b_7cd2_4ddd_839b_43c6d02d7331_A1; mw9dfe45c1_0cd6_4c4c_9148_a073eaa2669d_A1_TXTL_RNAPBOUND_TERMINATION_RATE*mw160f7d4f_5670_4840_8fd1_2b77a0ee69a5_A1;
    mw9dfe45c1_0cd6_4c4c_9148_a073eaa2669d_A1_TXTL_RNAPBOUND_TERMINATION_RATE = 0.05;
  mwb7633c86_f985_49b2_b29d_b6b39baced26_A1: mwdf0c8dc3_f696_4ab1_86ce_7dfb1a89edb0_A1 + mwd8ef21ee_e9ca_4fc9_8dcb_29c5bd7134bf_A1 -> mwb814d2ca_9454_4d78_98cd_0b4149c00f23_A1; mwb7633c86_f985_49b2_b29d_b6b39baced26_A1_TXTL_NTP_RNAP_F*mwdf0c8dc3_f696_4ab1_86ce_7dfb1a89edb0_A1*mwd8ef21ee_e9ca_4fc9_8dcb_29c5bd7134bf_A1 - mwb7633c86_f985_49b2_b29d_b6b39baced26_A1_TXTL_NTP_RNAP_R*mwb814d2ca_9454_4d78_98cd_0b4149c00f23_A1;
    mwb7633c86_f985_49b2_b29d_b6b39baced26_A1_TXTL_NTP_RNAP_F = 1000; mwb7633c86_f985_49b2_b29d_b6b39baced26_A1_TXTL_NTP_RNAP_R = 120000000;
  mw0cf85fbd_e158_4b8d_ad2a_8ce5910eba0d_A1: mwdf0c8dc3_f696_4ab1_86ce_7dfb1a89edb0_A1 + mw8088dcad_75d7_4cb8_b044_4b2f2554ea24_A1 -> mw3f43dd50_395a_41c0_b13a_cafb4df0cbc0_A1; mw0cf85fbd_e158_4b8d_ad2a_8ce5910eba0d_A1_TXTL_NTP_RNAP_F*mwdf0c8dc3_f696_4ab1_86ce_7dfb1a89edb0_A1*mw8088dcad_75d7_4cb8_b044_4b2f2554ea24_A1 - mw0cf85fbd_e158_4b8d_ad2a_8ce5910eba0d_A1_TXTL_NTP_RNAP_R*mw3f43dd50_395a_41c0_b13a_cafb4df0cbc0_A1;
    mw0cf85fbd_e158_4b8d_ad2a_8ce5910eba0d_A1_TXTL_NTP_RNAP_F = 1000; mw0cf85fbd_e158_4b8d_ad2a_8ce5910eba0d_A1_TXTL_NTP_RNAP_R = 120000000;
  mwc8124978_60bc_4b9f_8c9c_f6ad50621a11_A1: mwb814d2ca_9454_4d78_98cd_0b4149c00f23_A1 + mw8088dcad_75d7_4cb8_b044_4b2f2554ea24_A1 -> mw767cfd85_1821_4540_a684_152047e82155_A1; mwc8124978_60bc_4b9f_8c9c_f6ad50621a11_A1_TXTL_NTP_RNAP_F*mwb814d2ca_9454_4d78_98cd_0b4149c00f23_A1*mw8088dcad_75d7_4cb8_b044_4b2f2554ea24_A1 - mwc8124978_60bc_4b9f_8c9c_f6ad50621a11_A1_TXTL_NTP_RNAP_R*mw767cfd85_1821_4540_a684_152047e82155_A1;
    mwc8124978_60bc_4b9f_8c9c_f6ad50621a11_A1_TXTL_NTP_RNAP_F = 1; mwc8124978_60bc_4b9f_8c9c_f6ad50621a11_A1_TXTL_NTP_RNAP_R = 120000;
  mwd939d8c8_fef3_4105_95ab_f9c2c9c6023d_A1: mw3f43dd50_395a_41c0_b13a_cafb4df0cbc0_A1 + mwd8ef21ee_e9ca_4fc9_8dcb_29c5bd7134bf_A1 -> mw767cfd85_1821_4540_a684_152047e82155_A1; mwd939d8c8_fef3_4105_95ab_f9c2c9c6023d_A1_TXTL_NTP_RNAP_F*mw3f43dd50_395a_41c0_b13a_cafb4df0cbc0_A1*mwd8ef21ee_e9ca_4fc9_8dcb_29c5bd7134bf_A1 - mwd939d8c8_fef3_4105_95ab_f9c2c9c6023d_A1_TXTL_NTP_RNAP_R*mw767cfd85_1821_4540_a684_152047e82155_A1;
    mwd939d8c8_fef3_4105_95ab_f9c2c9c6023d_A1_TXTL_NTP_RNAP_F = 1; mwd939d8c8_fef3_4105_95ab_f9c2c9c6023d_A1_TXTL_NTP_RNAP_R = 120000;
  mwa78172e5_3de3_4476_a3e6_17b965a3f33c_A1: mw767cfd85_1821_4540_a684_152047e82155_A1 => mw160f7d4f_5670_4840_8fd1_2b77a0ee69a5_A1 + mwbd0de251_9de9_4624_94eb_1d758cdcf826_A1; mwa78172e5_3de3_4476_a3e6_17b965a3f33c_A1_TXTL_transcription_rate1*mw767cfd85_1821_4540_a684_152047e82155_A1;
    mwa78172e5_3de3_4476_a3e6_17b965a3f33c_A1_TXTL_transcription_rate1 = 0.001470588;
  mwd3ef7341_bdce_4242_bcf8_19d88d38779a_A1: mw33d7e051_c27d_4612_baf5_1288c43a7aa2_A1 => mw2b7b6b31_58f9_4148_b27d_9e4e41a5e0b6_A1; mwd3ef7341_bdce_4242_bcf8_19d88d38779a_A1_TXTL_NTP_consumption*mw33d7e051_c27d_4612_baf5_1288c43a7aa2_A1;
    mwd3ef7341_bdce_4242_bcf8_19d88d38779a_A1_TXTL_NTP_consumption = 0.7485294;
  mwd02e763c_e342_44c5_8c72_8e981900ba77_A1: mw51c25126_57a0_4186_9809_4aae5461f0c3_A1 => mw20a1da32_7c46_4a5c_8879_3ad39876a732_A1 + mw87691a6b_7cd2_4ddd_839b_43c6d02d7331_A1 + mw6e225233_4608_4bf8_9195_7e11a89791f2_A1; mwd02e763c_e342_44c5_8c72_8e981900ba77_A1_TXTL_RNAPBOUND_TERMINATION_RATE*mw51c25126_57a0_4186_9809_4aae5461f0c3_A1;
    mwd02e763c_e342_44c5_8c72_8e981900ba77_A1_TXTL_RNAPBOUND_TERMINATION_RATE = 0.05;
  mw675dd10e_3073_45ff_922d_9f2cab18881f_A1: mw2b7b6b31_58f9_4148_b27d_9e4e41a5e0b6_A1 + mwd8ef21ee_e9ca_4fc9_8dcb_29c5bd7134bf_A1 -> mw6ec81de9_8855_488e_8573_5f723ada6335_A1; mw675dd10e_3073_45ff_922d_9f2cab18881f_A1_TXTL_NTP_RNAP_F*mw2b7b6b31_58f9_4148_b27d_9e4e41a5e0b6_A1*mwd8ef21ee_e9ca_4fc9_8dcb_29c5bd7134bf_A1 - mw675dd10e_3073_45ff_922d_9f2cab18881f_A1_TXTL_NTP_RNAP_R*mw6ec81de9_8855_488e_8573_5f723ada6335_A1;
    mw675dd10e_3073_45ff_922d_9f2cab18881f_A1_TXTL_NTP_RNAP_F = 1000; mw675dd10e_3073_45ff_922d_9f2cab18881f_A1_TXTL_NTP_RNAP_R = 120000000;
  mw5c298bc2_0a9d_4b8a_ba63_4078247a5f11_A1: mw2b7b6b31_58f9_4148_b27d_9e4e41a5e0b6_A1 + mw8088dcad_75d7_4cb8_b044_4b2f2554ea24_A1 -> mwba8c5d42_edfd_45cf_8015_44d6c0292132_A1; mw5c298bc2_0a9d_4b8a_ba63_4078247a5f11_A1_TXTL_NTP_RNAP_F*mw2b7b6b31_58f9_4148_b27d_9e4e41a5e0b6_A1*mw8088dcad_75d7_4cb8_b044_4b2f2554ea24_A1 - mw5c298bc2_0a9d_4b8a_ba63_4078247a5f11_A1_TXTL_NTP_RNAP_R*mwba8c5d42_edfd_45cf_8015_44d6c0292132_A1;
    mw5c298bc2_0a9d_4b8a_ba63_4078247a5f11_A1_TXTL_NTP_RNAP_F = 1000; mw5c298bc2_0a9d_4b8a_ba63_4078247a5f11_A1_TXTL_NTP_RNAP_R = 120000000;
  mw1ef5caca_8004_4215_bbcf_d77ad8cf4b43_A1: mw6ec81de9_8855_488e_8573_5f723ada6335_A1 + mw8088dcad_75d7_4cb8_b044_4b2f2554ea24_A1 -> mw33d7e051_c27d_4612_baf5_1288c43a7aa2_A1; mw1ef5caca_8004_4215_bbcf_d77ad8cf4b43_A1_TXTL_NTP_RNAP_F*mw6ec81de9_8855_488e_8573_5f723ada6335_A1*mw8088dcad_75d7_4cb8_b044_4b2f2554ea24_A1 - mw1ef5caca_8004_4215_bbcf_d77ad8cf4b43_A1_TXTL_NTP_RNAP_R*mw33d7e051_c27d_4612_baf5_1288c43a7aa2_A1;
    mw1ef5caca_8004_4215_bbcf_d77ad8cf4b43_A1_TXTL_NTP_RNAP_F = 1; mw1ef5caca_8004_4215_bbcf_d77ad8cf4b43_A1_TXTL_NTP_RNAP_R = 120000;
  mw1a6687b6_6236_480c_a538_92787d3bc03d_A1: mwba8c5d42_edfd_45cf_8015_44d6c0292132_A1 + mwd8ef21ee_e9ca_4fc9_8dcb_29c5bd7134bf_A1 -> mw33d7e051_c27d_4612_baf5_1288c43a7aa2_A1; mw1a6687b6_6236_480c_a538_92787d3bc03d_A1_TXTL_NTP_RNAP_F*mwba8c5d42_edfd_45cf_8015_44d6c0292132_A1*mwd8ef21ee_e9ca_4fc9_8dcb_29c5bd7134bf_A1 - mw1a6687b6_6236_480c_a538_92787d3bc03d_A1_TXTL_NTP_RNAP_R*mw33d7e051_c27d_4612_baf5_1288c43a7aa2_A1;
    mw1a6687b6_6236_480c_a538_92787d3bc03d_A1_TXTL_NTP_RNAP_F = 1; mw1a6687b6_6236_480c_a538_92787d3bc03d_A1_TXTL_NTP_RNAP_R = 120000;
  mw92381b32_38ee_4904_bddd_0e157135ea6b_A1: mw33d7e051_c27d_4612_baf5_1288c43a7aa2_A1 => mw51c25126_57a0_4186_9809_4aae5461f0c3_A1 + mwbd0de251_9de9_4624_94eb_1d758cdcf826_A1; mw92381b32_38ee_4904_bddd_0e157135ea6b_A1_TXTL_transcription_rate1*mw33d7e051_c27d_4612_baf5_1288c43a7aa2_A1;
    mw92381b32_38ee_4904_bddd_0e157135ea6b_A1_TXTL_transcription_rate1 = 0.001470588;
  mw39f6f6d5_d601_45b2_8609_a84f743830dd_A1: mw37e1a28e_e2b4_401d_b9d3_c1ea5bda1065_A1 + mwe2d770f4_9878_44f4_b4a1_e7f76d106315_A1 -> mw0622e252_6a81_4d00_87d0_bc1b92321eda_A1; mw39f6f6d5_d601_45b2_8609_a84f743830dd_A1_TL_AA_F*mw37e1a28e_e2b4_401d_b9d3_c1ea5bda1065_A1*mwe2d770f4_9878_44f4_b4a1_e7f76d106315_A1 - mw39f6f6d5_d601_45b2_8609_a84f743830dd_A1_TL_AA_R*mw0622e252_6a81_4d00_87d0_bc1b92321eda_A1;
    mw39f6f6d5_d601_45b2_8609_a84f743830dd_A1_TL_AA_F = 300; mw39f6f6d5_d601_45b2_8609_a84f743830dd_A1_TL_AA_R = 0.1;
  mwd6328e6d_505f_4a69_bc8f_00637d954640_A1: mw0622e252_6a81_4d00_87d0_bc1b92321eda_A1 + 2 mwd8ef21ee_e9ca_4fc9_8dcb_29c5bd7134bf_A1 -> mw26fe5026_1c10_4917_b448_ebc246eac265_A1; mwd6328e6d_505f_4a69_bc8f_00637d954640_A1_TL_AGTP_F*mw0622e252_6a81_4d00_87d0_bc1b92321eda_A1*mwd8ef21ee_e9ca_4fc9_8dcb_29c5bd7134bf_A1^2 - mwd6328e6d_505f_4a69_bc8f_00637d954640_A1_TL_AGTP_R*mw26fe5026_1c10_4917_b448_ebc246eac265_A1;
    mwd6328e6d_505f_4a69_bc8f_00637d954640_A1_TL_AGTP_F = 30; mwd6328e6d_505f_4a69_bc8f_00637d954640_A1_TL_AGTP_R = 10;
  mw07591209_96dc_4b15_901b_c59287b70f81_A1: mw26fe5026_1c10_4917_b448_ebc246eac265_A1 => mw15465405_e52f_419d_855c_6598432b9882_A1; mw07591209_96dc_4b15_901b_c59287b70f81_A1_TXTL_TL_AA_consumption*mw26fe5026_1c10_4917_b448_ebc246eac265_A1;
    mw07591209_96dc_4b15_901b_c59287b70f81_A1_TXTL_TL_AA_consumption = 0.024;
  mw34565fb0_16cd_429d_91aa_5c922fc65c45_A1: mw26fe5026_1c10_4917_b448_ebc246eac265_A1 => mw15465405_e52f_419d_855c_6598432b9882_A1 + mwcd1c814e_f9b8_4d24_884f_d5704904c450_A1; mw34565fb0_16cd_429d_91aa_5c922fc65c45_A1_TXTL_TL_rate*mw26fe5026_1c10_4917_b448_ebc246eac265_A1;
    mw34565fb0_16cd_429d_91aa_5c922fc65c45_A1_TXTL_TL_rate = 0.012;
  mw5f650476_18b2_4859_a7cc_c73ce604c68e_A1: mw15465405_e52f_419d_855c_6598432b9882_A1 => mwbd0de251_9de9_4624_94eb_1d758cdcf826_A1 + mw594b7843_33b7_4d56_8d09_d26fee2a0f42_A1; mw5f650476_18b2_4859_a7cc_c73ce604c68e_A1_TXTL_RIBOBOUND_TERMINATION_RATE*mw15465405_e52f_419d_855c_6598432b9882_A1;
    mw5f650476_18b2_4859_a7cc_c73ce604c68e_A1_TXTL_RIBOBOUND_TERMINATION_RATE = 50;
  mw70298902_0343_45e4_b99c_fedb969ac541_A1: mwbd0de251_9de9_4624_94eb_1d758cdcf826_A1 + mw27046043_506c_4103_934f_0748df8dafa4_A1 -> mw4bae209d_759b_43de_b743_890e224c3c89_A1; mw70298902_0343_45e4_b99c_fedb969ac541_A1_TXTL_RNAdeg_F*mwbd0de251_9de9_4624_94eb_1d758cdcf826_A1*mw27046043_506c_4103_934f_0748df8dafa4_A1 - mw70298902_0343_45e4_b99c_fedb969ac541_A1_TXTL_RNAdeg_R*mw4bae209d_759b_43de_b743_890e224c3c89_A1;
    mw70298902_0343_45e4_b99c_fedb969ac541_A1_TXTL_RNAdeg_F = 10; mw70298902_0343_45e4_b99c_fedb969ac541_A1_TXTL_RNAdeg_R = 2000;
  mw71cba258_1897_4260_8ebf_ddef2ea4bff7_A1: mw4bae209d_759b_43de_b743_890e224c3c89_A1 => mw27046043_506c_4103_934f_0748df8dafa4_A1; mw71cba258_1897_4260_8ebf_ddef2ea4bff7_A1_TXTL_RNAdeg_F*mw4bae209d_759b_43de_b743_890e224c3c89_A1;
    mw71cba258_1897_4260_8ebf_ddef2ea4bff7_A1_TXTL_RNAdeg_F = 0.002777778;
  mwceec1524_85b4_4b66_9a69_1a45ed6addb9_A1: mw37e1a28e_e2b4_401d_b9d3_c1ea5bda1065_A1 + mw27046043_506c_4103_934f_0748df8dafa4_A1 -> mw77d678ec_db89_4b4f_931a_1ec88923ef06_A1; mwceec1524_85b4_4b66_9a69_1a45ed6addb9_A1_TXTL_RNAdeg_F*mw37e1a28e_e2b4_401d_b9d3_c1ea5bda1065_A1*mw27046043_506c_4103_934f_0748df8dafa4_A1 - mwceec1524_85b4_4b66_9a69_1a45ed6addb9_A1_TXTL_RNAdeg_R*mw77d678ec_db89_4b4f_931a_1ec88923ef06_A1;
    mwceec1524_85b4_4b66_9a69_1a45ed6addb9_A1_TXTL_RNAdeg_F = 10; mwceec1524_85b4_4b66_9a69_1a45ed6addb9_A1_TXTL_RNAdeg_R = 2000;
  mw393a0506_204d_4152_8bcd_3a82ac31e5fa_A1: mw77d678ec_db89_4b4f_931a_1ec88923ef06_A1 => mw27046043_506c_4103_934f_0748df8dafa4_A1 + mw594b7843_33b7_4d56_8d09_d26fee2a0f42_A1; mw393a0506_204d_4152_8bcd_3a82ac31e5fa_A1_TXTL_RNAdeg_F*mw77d678ec_db89_4b4f_931a_1ec88923ef06_A1;
    mw393a0506_204d_4152_8bcd_3a82ac31e5fa_A1_TXTL_RNAdeg_F = 0.002777778;
  mw0c453f93_6e21_4d3d_9d19_b0eade646d71_A1: mw26fe5026_1c10_4917_b448_ebc246eac265_A1 + mw27046043_506c_4103_934f_0748df8dafa4_A1 -> mw6bdd6a42_9a73_4258_be16_ffb0862f4562_A1; mw0c453f93_6e21_4d3d_9d19_b0eade646d71_A1_TXTL_RNAdeg_F*mw26fe5026_1c10_4917_b448_ebc246eac265_A1*mw27046043_506c_4103_934f_0748df8dafa4_A1 - mw0c453f93_6e21_4d3d_9d19_b0eade646d71_A1_TXTL_RNAdeg_R*mw6bdd6a42_9a73_4258_be16_ffb0862f4562_A1;
    mw0c453f93_6e21_4d3d_9d19_b0eade646d71_A1_TXTL_RNAdeg_F = 10; mw0c453f93_6e21_4d3d_9d19_b0eade646d71_A1_TXTL_RNAdeg_R = 2000;
  mw097c38aa_ccac_4731_8c13_c5bfeb8ffaa9_A1: mw6bdd6a42_9a73_4258_be16_ffb0862f4562_A1 => mw27046043_506c_4103_934f_0748df8dafa4_A1 + mwe2d770f4_9878_44f4_b4a1_e7f76d106315_A1 + 2 mwd8ef21ee_e9ca_4fc9_8dcb_29c5bd7134bf_A1 + mw594b7843_33b7_4d56_8d09_d26fee2a0f42_A1; mw097c38aa_ccac_4731_8c13_c5bfeb8ffaa9_A1_TXTL_RNAdeg_F*mw6bdd6a42_9a73_4258_be16_ffb0862f4562_A1;
    mw097c38aa_ccac_4731_8c13_c5bfeb8ffaa9_A1_TXTL_RNAdeg_F = 0.002777778;
  mwc3f36725_78cc_47fa_bce3_5ed497c13da9_A1: mw15465405_e52f_419d_855c_6598432b9882_A1 + mw27046043_506c_4103_934f_0748df8dafa4_A1 -> mw119364e8_fa9c_40f2_96cc_db4b33a0963c_A1; mwc3f36725_78cc_47fa_bce3_5ed497c13da9_A1_TXTL_RNAdeg_F*mw15465405_e52f_419d_855c_6598432b9882_A1*mw27046043_506c_4103_934f_0748df8dafa4_A1 - mwc3f36725_78cc_47fa_bce3_5ed497c13da9_A1_TXTL_RNAdeg_R*mw119364e8_fa9c_40f2_96cc_db4b33a0963c_A1;
    mwc3f36725_78cc_47fa_bce3_5ed497c13da9_A1_TXTL_RNAdeg_F = 10; mwc3f36725_78cc_47fa_bce3_5ed497c13da9_A1_TXTL_RNAdeg_R = 2000;
  mwe2f8ca51_06ff_42e4_acd3_fda16cbdb05f_A1: mw119364e8_fa9c_40f2_96cc_db4b33a0963c_A1 => mw27046043_506c_4103_934f_0748df8dafa4_A1 + mw594b7843_33b7_4d56_8d09_d26fee2a0f42_A1; mwe2f8ca51_06ff_42e4_acd3_fda16cbdb05f_A1_TXTL_RNAdeg_F*mw119364e8_fa9c_40f2_96cc_db4b33a0963c_A1;
    mwe2f8ca51_06ff_42e4_acd3_fda16cbdb05f_A1_TXTL_RNAdeg_F = 0.002777778;
  mw5e56ef74_1b33_4c8b_8eb4_a963bacc4994_A1: mw0622e252_6a81_4d00_87d0_bc1b92321eda_A1 + mw27046043_506c_4103_934f_0748df8dafa4_A1 -> mwc9810a52_fda0_4aed_ac03_1d0888c20bed_A1; mw5e56ef74_1b33_4c8b_8eb4_a963bacc4994_A1_TXTL_RNAdeg_F*mw0622e252_6a81_4d00_87d0_bc1b92321eda_A1*mw27046043_506c_4103_934f_0748df8dafa4_A1 - mw5e56ef74_1b33_4c8b_8eb4_a963bacc4994_A1_TXTL_RNAdeg_R*mwc9810a52_fda0_4aed_ac03_1d0888c20bed_A1;
    mw5e56ef74_1b33_4c8b_8eb4_a963bacc4994_A1_TXTL_RNAdeg_F = 10; mw5e56ef74_1b33_4c8b_8eb4_a963bacc4994_A1_TXTL_RNAdeg_R = 2000;
  mw91b1418c_0d08_48c2_a9c5_fdf9a4610daf_A1: mwc9810a52_fda0_4aed_ac03_1d0888c20bed_A1 => mw27046043_506c_4103_934f_0748df8dafa4_A1 + mwe2d770f4_9878_44f4_b4a1_e7f76d106315_A1 + mw594b7843_33b7_4d56_8d09_d26fee2a0f42_A1; mw91b1418c_0d08_48c2_a9c5_fdf9a4610daf_A1_TXTL_RNAdeg_F*mwc9810a52_fda0_4aed_ac03_1d0888c20bed_A1;
    mw91b1418c_0d08_48c2_a9c5_fdf9a4610daf_A1_TXTL_RNAdeg_F = 0.002777778;
  mwed50d314_7128_4ba0_8da0_0b151eb7fa69_A1: mwbc293b51_8dc7_482a_a166_48a08fcf70c0_A1 + mw39fc0fca_dcae_441f_895a_36ffd39fb240_A1 -> mw20a1da32_7c46_4a5c_8879_3ad39876a732_A1; Sigma28_RNAP_F*mwbc293b51_8dc7_482a_a166_48a08fcf70c0_A1*mw39fc0fca_dcae_441f_895a_36ffd39fb240_A1 - Sigma28_RNAP_R*mw20a1da32_7c46_4a5c_8879_3ad39876a732_A1;
    Sigma28_RNAP_F = 100; Sigma28_RNAP_R = 0.1;
  mw11501d9f_2ef6_4193_808a_f7b8b8bc69b3_A1: mw159b5269_c579_43b5_abc6_26e4f63e7bbe_A1 + mw594b7843_33b7_4d56_8d09_d26fee2a0f42_A1 -> mw723b9f32_93c9_43a1_8211_96ed49f884fc_A1; mw11501d9f_2ef6_4193_808a_f7b8b8bc69b3_A1_TXTL_UTR_UTR1_F*mw159b5269_c579_43b5_abc6_26e4f63e7bbe_A1*mw594b7843_33b7_4d56_8d09_d26fee2a0f42_A1 - mw11501d9f_2ef6_4193_808a_f7b8b8bc69b3_A1_TXTL_UTR_UTR1_R*mw723b9f32_93c9_43a1_8211_96ed49f884fc_A1;
    mw11501d9f_2ef6_4193_808a_f7b8b8bc69b3_A1_TXTL_UTR_UTR1_F = 0.2; mw11501d9f_2ef6_4193_808a_f7b8b8bc69b3_A1_TXTL_UTR_UTR1_R = 4;
  mwca8c0bd4_3cc1_4f33_9407_25a184b5ee33_A1: mwe0637f7e_f800_4cab_a905_3d73c03f4421_A1 + mwbc293b51_8dc7_482a_a166_48a08fcf70c0_A1 -> mwaa84c5c4_3442_413c_9e85_94a1701809bc_A1; mwca8c0bd4_3cc1_4f33_9407_25a184b5ee33_A1_TXTL_PLAC_RNAPbound_F*mwe0637f7e_f800_4cab_a905_3d73c03f4421_A1*mwbc293b51_8dc7_482a_a166_48a08fcf70c0_A1 - mwca8c0bd4_3cc1_4f33_9407_25a184b5ee33_A1_TXTL_PLAC_RNAPbound_R*mwaa84c5c4_3442_413c_9e85_94a1701809bc_A1;
    mwca8c0bd4_3cc1_4f33_9407_25a184b5ee33_A1_TXTL_PLAC_RNAPbound_F = 20; mwca8c0bd4_3cc1_4f33_9407_25a184b5ee33_A1_TXTL_PLAC_RNAPbound_R = 400;
  mw824b3dcc_bed0_4fb8_b5e3_e124094c12f6_A1: mw12b99714_0096_4228_8bd1_56f6f073b8fc_A1 => mwaa84c5c4_3442_413c_9e85_94a1701809bc_A1; mw824b3dcc_bed0_4fb8_b5e3_e124094c12f6_A1_TXTL_NTP_consumption*mw12b99714_0096_4228_8bd1_56f6f073b8fc_A1;
    mw824b3dcc_bed0_4fb8_b5e3_e124094c12f6_A1_TXTL_NTP_consumption = 0.7487705;
  mw249ee912_8f1a_4532_a0a1_93d5c28f3420_A1: mwd42f73fc_1ebd_4594_9b18_c6dc092c4988_A1 => mwbc293b51_8dc7_482a_a166_48a08fcf70c0_A1 + mwe0637f7e_f800_4cab_a905_3d73c03f4421_A1; mw249ee912_8f1a_4532_a0a1_93d5c28f3420_A1_TXTL_RNAPBOUND_TERMINATION_RATE*mwd42f73fc_1ebd_4594_9b18_c6dc092c4988_A1;
    mw249ee912_8f1a_4532_a0a1_93d5c28f3420_A1_TXTL_RNAPBOUND_TERMINATION_RATE = 0.05;
  mw06f5afc2_7cdd_48ae_b0b7_fff908268728_A1: mwaa84c5c4_3442_413c_9e85_94a1701809bc_A1 + mwd8ef21ee_e9ca_4fc9_8dcb_29c5bd7134bf_A1 -> mw51a418e8_c9ef_4962_ba5d_cbba756856d4_A1; mw06f5afc2_7cdd_48ae_b0b7_fff908268728_A1_TXTL_NTP_RNAP_F*mwaa84c5c4_3442_413c_9e85_94a1701809bc_A1*mwd8ef21ee_e9ca_4fc9_8dcb_29c5bd7134bf_A1 - mw06f5afc2_7cdd_48ae_b0b7_fff908268728_A1_TXTL_NTP_RNAP_R*mw51a418e8_c9ef_4962_ba5d_cbba756856d4_A1;
    mw06f5afc2_7cdd_48ae_b0b7_fff908268728_A1_TXTL_NTP_RNAP_F = 1000; mw06f5afc2_7cdd_48ae_b0b7_fff908268728_A1_TXTL_NTP_RNAP_R = 120000000;
  mw3fba55eb_49a0_4b31_a4ef_115f917ca5ab_A1: mwaa84c5c4_3442_413c_9e85_94a1701809bc_A1 + mw8088dcad_75d7_4cb8_b044_4b2f2554ea24_A1 -> mwd8d88450_7aa2_4a23_9f23_9f35b73ef802_A1; mw3fba55eb_49a0_4b31_a4ef_115f917ca5ab_A1_TXTL_NTP_RNAP_F*mwaa84c5c4_3442_413c_9e85_94a1701809bc_A1*mw8088dcad_75d7_4cb8_b044_4b2f2554ea24_A1 - mw3fba55eb_49a0_4b31_a4ef_115f917ca5ab_A1_TXTL_NTP_RNAP_R*mwd8d88450_7aa2_4a23_9f23_9f35b73ef802_A1;
    mw3fba55eb_49a0_4b31_a4ef_115f917ca5ab_A1_TXTL_NTP_RNAP_F = 1000; mw3fba55eb_49a0_4b31_a4ef_115f917ca5ab_A1_TXTL_NTP_RNAP_R = 120000000;
  mw7597e874_8dbf_47c9_a639_1e58a609bc4e_A1: mw51a418e8_c9ef_4962_ba5d_cbba756856d4_A1 + mw8088dcad_75d7_4cb8_b044_4b2f2554ea24_A1 -> mw12b99714_0096_4228_8bd1_56f6f073b8fc_A1; mw7597e874_8dbf_47c9_a639_1e58a609bc4e_A1_TXTL_NTP_RNAP_F*mw51a418e8_c9ef_4962_ba5d_cbba756856d4_A1*mw8088dcad_75d7_4cb8_b044_4b2f2554ea24_A1 - mw7597e874_8dbf_47c9_a639_1e58a609bc4e_A1_TXTL_NTP_RNAP_R*mw12b99714_0096_4228_8bd1_56f6f073b8fc_A1;
    mw7597e874_8dbf_47c9_a639_1e58a609bc4e_A1_TXTL_NTP_RNAP_F = 1; mw7597e874_8dbf_47c9_a639_1e58a609bc4e_A1_TXTL_NTP_RNAP_R = 120000;
  mw5e184351_16f8_4207_96bc_55d32762aee0_A1: mwd8d88450_7aa2_4a23_9f23_9f35b73ef802_A1 + mwd8ef21ee_e9ca_4fc9_8dcb_29c5bd7134bf_A1 -> mw12b99714_0096_4228_8bd1_56f6f073b8fc_A1; mw5e184351_16f8_4207_96bc_55d32762aee0_A1_TXTL_NTP_RNAP_F*mwd8d88450_7aa2_4a23_9f23_9f35b73ef802_A1*mwd8ef21ee_e9ca_4fc9_8dcb_29c5bd7134bf_A1 - mw5e184351_16f8_4207_96bc_55d32762aee0_A1_TXTL_NTP_RNAP_R*mw12b99714_0096_4228_8bd1_56f6f073b8fc_A1;
    mw5e184351_16f8_4207_96bc_55d32762aee0_A1_TXTL_NTP_RNAP_F = 1; mw5e184351_16f8_4207_96bc_55d32762aee0_A1_TXTL_NTP_RNAP_R = 120000;
  mw9a08fbf7_6987_4371_9d49_ffd155dfba1e_A1: mw12b99714_0096_4228_8bd1_56f6f073b8fc_A1 => mwd42f73fc_1ebd_4594_9b18_c6dc092c4988_A1 + mw159b5269_c579_43b5_abc6_26e4f63e7bbe_A1; mw9a08fbf7_6987_4371_9d49_ffd155dfba1e_A1_TXTL_transcription_rate1*mw12b99714_0096_4228_8bd1_56f6f073b8fc_A1;
    mw9a08fbf7_6987_4371_9d49_ffd155dfba1e_A1_TXTL_transcription_rate1 = 0.001229508;
  mw8ad60da1_aaf3_4422_abed_3133c93b5b39_A1: mw723b9f32_93c9_43a1_8211_96ed49f884fc_A1 + mwe2d770f4_9878_44f4_b4a1_e7f76d106315_A1 -> mw7629a538_33fa_422e_9578_e65d19d44075_A1; mw8ad60da1_aaf3_4422_abed_3133c93b5b39_A1_TL_AA_F*mw723b9f32_93c9_43a1_8211_96ed49f884fc_A1*mwe2d770f4_9878_44f4_b4a1_e7f76d106315_A1 - mw8ad60da1_aaf3_4422_abed_3133c93b5b39_A1_TL_AA_R*mw7629a538_33fa_422e_9578_e65d19d44075_A1;
    mw8ad60da1_aaf3_4422_abed_3133c93b5b39_A1_TL_AA_F = 300; mw8ad60da1_aaf3_4422_abed_3133c93b5b39_A1_TL_AA_R = 0.1;
  mw83c6b254_6e6c_466b_9a4f_877e17c13e52_A1: mw7629a538_33fa_422e_9578_e65d19d44075_A1 + 2 mwd8ef21ee_e9ca_4fc9_8dcb_29c5bd7134bf_A1 -> mw3a503b2f_f902_4b3d_aa4c_f902f0264a37_A1; mw83c6b254_6e6c_466b_9a4f_877e17c13e52_A1_TL_AGTP_F*mw7629a538_33fa_422e_9578_e65d19d44075_A1*mwd8ef21ee_e9ca_4fc9_8dcb_29c5bd7134bf_A1^2 - mw83c6b254_6e6c_466b_9a4f_877e17c13e52_A1_TL_AGTP_R*mw3a503b2f_f902_4b3d_aa4c_f902f0264a37_A1;
    mw83c6b254_6e6c_466b_9a4f_877e17c13e52_A1_TL_AGTP_F = 30; mw83c6b254_6e6c_466b_9a4f_877e17c13e52_A1_TL_AGTP_R = 10;
  mw98ba071f_ef73_426d_9fbc_f0c70146d701_A1: mw3a503b2f_f902_4b3d_aa4c_f902f0264a37_A1 => mw92db7974_c165_491c_8c88_79dd770dbc24_A1; mw98ba071f_ef73_426d_9fbc_f0c70146d701_A1_TXTL_TL_AA_consumption*mw3a503b2f_f902_4b3d_aa4c_f902f0264a37_A1;
    mw98ba071f_ef73_426d_9fbc_f0c70146d701_A1_TXTL_TL_AA_consumption = 0.03;
  mw7b5be1c1_029e_4194_9eb6_26b4ba9fcece_A1: mw3a503b2f_f902_4b3d_aa4c_f902f0264a37_A1 => mw92db7974_c165_491c_8c88_79dd770dbc24_A1 + mw39fc0fca_dcae_441f_895a_36ffd39fb240_A1; mw7b5be1c1_029e_4194_9eb6_26b4ba9fcece_A1_TXTL_TL_rate*mw3a503b2f_f902_4b3d_aa4c_f902f0264a37_A1;
    mw7b5be1c1_029e_4194_9eb6_26b4ba9fcece_A1_TXTL_TL_rate = 0.01;
  mwf7da07f2_da22_474a_8867_fe01b1bba546_A1: mw92db7974_c165_491c_8c88_79dd770dbc24_A1 => mw159b5269_c579_43b5_abc6_26e4f63e7bbe_A1 + mw594b7843_33b7_4d56_8d09_d26fee2a0f42_A1; mwf7da07f2_da22_474a_8867_fe01b1bba546_A1_TXTL_RIBOBOUND_TERMINATION_RATE*mw92db7974_c165_491c_8c88_79dd770dbc24_A1;
    mwf7da07f2_da22_474a_8867_fe01b1bba546_A1_TXTL_RIBOBOUND_TERMINATION_RATE = 50;
  mw30f15b9a_bea4_485f_a507_6ca5abdcacbf_A1: mw159b5269_c579_43b5_abc6_26e4f63e7bbe_A1 + mw27046043_506c_4103_934f_0748df8dafa4_A1 -> mw0f226cf0_c928_4c2a_9129_2dbecb533b8a_A1; mw30f15b9a_bea4_485f_a507_6ca5abdcacbf_A1_TXTL_RNAdeg_F*mw159b5269_c579_43b5_abc6_26e4f63e7bbe_A1*mw27046043_506c_4103_934f_0748df8dafa4_A1 - mw30f15b9a_bea4_485f_a507_6ca5abdcacbf_A1_TXTL_RNAdeg_R*mw0f226cf0_c928_4c2a_9129_2dbecb533b8a_A1;
    mw30f15b9a_bea4_485f_a507_6ca5abdcacbf_A1_TXTL_RNAdeg_F = 10; mw30f15b9a_bea4_485f_a507_6ca5abdcacbf_A1_TXTL_RNAdeg_R = 2000;
  mwc10e5939_5d5d_4b16_af63_f5ad16c882e4_A1: mw0f226cf0_c928_4c2a_9129_2dbecb533b8a_A1 => mw27046043_506c_4103_934f_0748df8dafa4_A1; mwc10e5939_5d5d_4b16_af63_f5ad16c882e4_A1_TXTL_RNAdeg_F*mw0f226cf0_c928_4c2a_9129_2dbecb533b8a_A1;
    mwc10e5939_5d5d_4b16_af63_f5ad16c882e4_A1_TXTL_RNAdeg_F = 0.002777778;
  mwab3d7526_b3ab_46d4_bbc0_8de662896453_A1: mw723b9f32_93c9_43a1_8211_96ed49f884fc_A1 + mw27046043_506c_4103_934f_0748df8dafa4_A1 -> mw78d86b82_eb53_4471_a341_dc0987b8c524_A1; mwab3d7526_b3ab_46d4_bbc0_8de662896453_A1_TXTL_RNAdeg_F*mw723b9f32_93c9_43a1_8211_96ed49f884fc_A1*mw27046043_506c_4103_934f_0748df8dafa4_A1 - mwab3d7526_b3ab_46d4_bbc0_8de662896453_A1_TXTL_RNAdeg_R*mw78d86b82_eb53_4471_a341_dc0987b8c524_A1;
    mwab3d7526_b3ab_46d4_bbc0_8de662896453_A1_TXTL_RNAdeg_F = 10; mwab3d7526_b3ab_46d4_bbc0_8de662896453_A1_TXTL_RNAdeg_R = 2000;
  mw91bfbd13_8432_4298_b289_01216823d5fa_A1: mw78d86b82_eb53_4471_a341_dc0987b8c524_A1 => mw27046043_506c_4103_934f_0748df8dafa4_A1 + mw594b7843_33b7_4d56_8d09_d26fee2a0f42_A1; mw91bfbd13_8432_4298_b289_01216823d5fa_A1_TXTL_RNAdeg_F*mw78d86b82_eb53_4471_a341_dc0987b8c524_A1;
    mw91bfbd13_8432_4298_b289_01216823d5fa_A1_TXTL_RNAdeg_F = 0.002777778;
  mw88a58346_e8fe_4c02_9c73_09fd0f6161af_A1: mw3a503b2f_f902_4b3d_aa4c_f902f0264a37_A1 + mw27046043_506c_4103_934f_0748df8dafa4_A1 -> mwf2948b32_54ad_4e76_be2a_39ecc8d961c6_A1; mw88a58346_e8fe_4c02_9c73_09fd0f6161af_A1_TXTL_RNAdeg_F*mw3a503b2f_f902_4b3d_aa4c_f902f0264a37_A1*mw27046043_506c_4103_934f_0748df8dafa4_A1 - mw88a58346_e8fe_4c02_9c73_09fd0f6161af_A1_TXTL_RNAdeg_R*mwf2948b32_54ad_4e76_be2a_39ecc8d961c6_A1;
    mw88a58346_e8fe_4c02_9c73_09fd0f6161af_A1_TXTL_RNAdeg_F = 10; mw88a58346_e8fe_4c02_9c73_09fd0f6161af_A1_TXTL_RNAdeg_R = 2000;
  mwa6b889ec_3938_498f_adf3_86bb8e7c42ed_A1: mwf2948b32_54ad_4e76_be2a_39ecc8d961c6_A1 => mw27046043_506c_4103_934f_0748df8dafa4_A1 + mwe2d770f4_9878_44f4_b4a1_e7f76d106315_A1 + 2 mwd8ef21ee_e9ca_4fc9_8dcb_29c5bd7134bf_A1 + mw594b7843_33b7_4d56_8d09_d26fee2a0f42_A1; mwa6b889ec_3938_498f_adf3_86bb8e7c42ed_A1_TXTL_RNAdeg_F*mwf2948b32_54ad_4e76_be2a_39ecc8d961c6_A1;
    mwa6b889ec_3938_498f_adf3_86bb8e7c42ed_A1_TXTL_RNAdeg_F = 0.002777778;
  mw5fccd80e_d4e4_4052_a6c0_51eb03043734_A1: mw92db7974_c165_491c_8c88_79dd770dbc24_A1 + mw27046043_506c_4103_934f_0748df8dafa4_A1 -> mw32f64a96_a32d_492d_9e54_605c79f936ad_A1; mw5fccd80e_d4e4_4052_a6c0_51eb03043734_A1_TXTL_RNAdeg_F*mw92db7974_c165_491c_8c88_79dd770dbc24_A1*mw27046043_506c_4103_934f_0748df8dafa4_A1 - mw5fccd80e_d4e4_4052_a6c0_51eb03043734_A1_TXTL_RNAdeg_R*mw32f64a96_a32d_492d_9e54_605c79f936ad_A1;
    mw5fccd80e_d4e4_4052_a6c0_51eb03043734_A1_TXTL_RNAdeg_F = 10; mw5fccd80e_d4e4_4052_a6c0_51eb03043734_A1_TXTL_RNAdeg_R = 2000;
  mwd0481bd2_93fa_455f_8d3b_5e815a6933cf_A1: mw32f64a96_a32d_492d_9e54_605c79f936ad_A1 => mw27046043_506c_4103_934f_0748df8dafa4_A1 + mw594b7843_33b7_4d56_8d09_d26fee2a0f42_A1; mwd0481bd2_93fa_455f_8d3b_5e815a6933cf_A1_TXTL_RNAdeg_F*mw32f64a96_a32d_492d_9e54_605c79f936ad_A1;
    mwd0481bd2_93fa_455f_8d3b_5e815a6933cf_A1_TXTL_RNAdeg_F = 0.002777778;
  mw1c895eca_6fa6_4b96_a135_6d43c2ebc77c_A1: mw7629a538_33fa_422e_9578_e65d19d44075_A1 + mw27046043_506c_4103_934f_0748df8dafa4_A1 -> mwe99f1695_b38c_4adc_bdfc_014007d37ad3_A1; mw1c895eca_6fa6_4b96_a135_6d43c2ebc77c_A1_TXTL_RNAdeg_F*mw7629a538_33fa_422e_9578_e65d19d44075_A1*mw27046043_506c_4103_934f_0748df8dafa4_A1 - mw1c895eca_6fa6_4b96_a135_6d43c2ebc77c_A1_TXTL_RNAdeg_R*mwe99f1695_b38c_4adc_bdfc_014007d37ad3_A1;
    mw1c895eca_6fa6_4b96_a135_6d43c2ebc77c_A1_TXTL_RNAdeg_F = 10; mw1c895eca_6fa6_4b96_a135_6d43c2ebc77c_A1_TXTL_RNAdeg_R = 2000;
  mw377d50de_3047_4adc_bcb5_f895ef4e2fa6_A1: mwe99f1695_b38c_4adc_bdfc_014007d37ad3_A1 => mw27046043_506c_4103_934f_0748df8dafa4_A1 + mwe2d770f4_9878_44f4_b4a1_e7f76d106315_A1 + mw594b7843_33b7_4d56_8d09_d26fee2a0f42_A1; mw377d50de_3047_4adc_bcb5_f895ef4e2fa6_A1_TXTL_RNAdeg_F*mwe99f1695_b38c_4adc_bdfc_014007d37ad3_A1;
    mw377d50de_3047_4adc_bcb5_f895ef4e2fa6_A1_TXTL_RNAdeg_F = 0.002777778;
  mw48179675_3904_4841_9999_5fdb348851e4_A1: mwd8ef21ee_e9ca_4fc9_8dcb_29c5bd7134bf_A1 => mweb394987_d45b_41cf_8716_52dc428a420b_A1; mw5996d02e_ace7_48f3_a137_02e414010144_A1*mwd8ef21ee_e9ca_4fc9_8dcb_29c5bd7134bf_A1;
  mw45715d9a_add7_43bd_873b_23a5b728a3ea_B1: mweeccb4d5_ef92_4f38_88ef_1113e7e2f961_B1 + 2 mwc00f5b5a_e21d_42e7_a0ca_6a931ffb4ec0_B1 -> mwe5d4529b_d02b_475a_8ba1_4c9f568c47f3_B1; mw45715d9a_add7_43bd_873b_23a5b728a3ea_B1_TXTL_INDUCER_TETR_ATC_F*mweeccb4d5_ef92_4f38_88ef_1113e7e2f961_B1*mwc00f5b5a_e21d_42e7_a0ca_6a931ffb4ec0_B1^2 - mw45715d9a_add7_43bd_873b_23a5b728a3ea_B1_TXTL_INDUCER_TETR_ATC_R*mwe5d4529b_d02b_475a_8ba1_4c9f568c47f3_B1;
    mw45715d9a_add7_43bd_873b_23a5b728a3ea_B1_TXTL_INDUCER_TETR_ATC_F = 1e-5; mw45715d9a_add7_43bd_873b_23a5b728a3ea_B1_TXTL_INDUCER_TETR_ATC_R = 0.1;
  mw20d70dce_c24c_44f5_ad8a_514327dab525_B1: 2 mwb072cf50_050b_4bec_97e3_cacc9c6c80b7_B1 -> mweeccb4d5_ef92_4f38_88ef_1113e7e2f961_B1; mw20d70dce_c24c_44f5_ad8a_514327dab525_B1_kf*mwb072cf50_050b_4bec_97e3_cacc9c6c80b7_B1^2 - mw20d70dce_c24c_44f5_ad8a_514327dab525_B1_kr*mweeccb4d5_ef92_4f38_88ef_1113e7e2f961_B1;
    mw20d70dce_c24c_44f5_ad8a_514327dab525_B1_kf = 1; mw20d70dce_c24c_44f5_ad8a_514327dab525_B1_kr = 1;
  mwc4415d8f_7467_4000_adac_49e8ce637e05_B1: mwcab9d721_d5fe_46ba_8abd_db6023744051_B1 + mwe288cc4d_bd5c_430e_acab_0b3cd6abf225_B1 -> mwe49f90af_dd8c_43dd_948f_ad0a5a401277_B1; mwc4415d8f_7467_4000_adac_49e8ce637e05_B1_TXTL_UTR_UTR1_F*mwcab9d721_d5fe_46ba_8abd_db6023744051_B1*mwe288cc4d_bd5c_430e_acab_0b3cd6abf225_B1 - mwc4415d8f_7467_4000_adac_49e8ce637e05_B1_TXTL_UTR_UTR1_R*mwe49f90af_dd8c_43dd_948f_ad0a5a401277_B1;
    mwc4415d8f_7467_4000_adac_49e8ce637e05_B1_TXTL_UTR_UTR1_F = 0.2; mwc4415d8f_7467_4000_adac_49e8ce637e05_B1_TXTL_UTR_UTR1_R = 4;
  mw27e31c4a_452a_4b7f_a96d_e361a44f06f0_B1: mwfb07f4d9_670f_4329_bed5_e109f421698e_B1 + mwdc1e07fe_9c7d_43d2_9ae9_2e9bb4e826f3_B1 -> mw3b47668e_6c7d_4a08_9772_b34bca7fb884_B1; TXTL_SIGX_RNAPbound_F*mwfb07f4d9_670f_4329_bed5_e109f421698e_B1*mwdc1e07fe_9c7d_43d2_9ae9_2e9bb4e826f3_B1 - TXTL_SIGX_RNAPbound_R*mw3b47668e_6c7d_4a08_9772_b34bca7fb884_B1;
    TXTL_SIGX_RNAPbound_F = 10; TXTL_SIGX_RNAPbound_R = 0.1;
  mw0a724b98_3475_4115_aeea_37344b9f8403_B1: mw39a79b9e_eb59_423a_b844_153e6aa7934d_B1 => mw3b47668e_6c7d_4a08_9772_b34bca7fb884_B1; mw0a724b98_3475_4115_aeea_37344b9f8403_B1_TXTL_NTP_consumption*mw39a79b9e_eb59_423a_b844_153e6aa7934d_B1;
    mw0a724b98_3475_4115_aeea_37344b9f8403_B1_TXTL_NTP_consumption = 0.7487705;
  mw827b8940_3e92_4bef_8143_f89eced8a388_B1: mw6b52fa43_ee57_4ca8_95ac_e79f61a74a41_B1 => mwdc1e07fe_9c7d_43d2_9ae9_2e9bb4e826f3_B1 + mwfb07f4d9_670f_4329_bed5_e109f421698e_B1; mw827b8940_3e92_4bef_8143_f89eced8a388_B1_TXTL_RNAPBOUND_TERMINATION_RATE*mw6b52fa43_ee57_4ca8_95ac_e79f61a74a41_B1;
    mw827b8940_3e92_4bef_8143_f89eced8a388_B1_TXTL_RNAPBOUND_TERMINATION_RATE = 0.05;
  mw269edd06_0c23_48b1_9d3a_cabda2227eb9_B1: mw3b47668e_6c7d_4a08_9772_b34bca7fb884_B1 + mwe041b8b1_92b6_4c2b_8e78_5212f5644e01_B1 -> mw1731539c_93c9_4968_a47b_f95e241210a2_B1; mw269edd06_0c23_48b1_9d3a_cabda2227eb9_B1_TXTL_NTP_RNAP_F*mw3b47668e_6c7d_4a08_9772_b34bca7fb884_B1*mwe041b8b1_92b6_4c2b_8e78_5212f5644e01_B1 - mw269edd06_0c23_48b1_9d3a_cabda2227eb9_B1_TXTL_NTP_RNAP_R*mw1731539c_93c9_4968_a47b_f95e241210a2_B1;
    mw269edd06_0c23_48b1_9d3a_cabda2227eb9_B1_TXTL_NTP_RNAP_F = 1000; mw269edd06_0c23_48b1_9d3a_cabda2227eb9_B1_TXTL_NTP_RNAP_R = 120000000;
  mwca239526_d864_4077_b619_ccbc2a385269_B1: mw3b47668e_6c7d_4a08_9772_b34bca7fb884_B1 + mw0224b269_aae5_4ca1_a6e6_3607229b0a5b_B1 -> mwa075b409_1abd_4858_af4d_da62f73a89dd_B1; mwca239526_d864_4077_b619_ccbc2a385269_B1_TXTL_NTP_RNAP_F*mw3b47668e_6c7d_4a08_9772_b34bca7fb884_B1*mw0224b269_aae5_4ca1_a6e6_3607229b0a5b_B1 - mwca239526_d864_4077_b619_ccbc2a385269_B1_TXTL_NTP_RNAP_R*mwa075b409_1abd_4858_af4d_da62f73a89dd_B1;
    mwca239526_d864_4077_b619_ccbc2a385269_B1_TXTL_NTP_RNAP_F = 1000; mwca239526_d864_4077_b619_ccbc2a385269_B1_TXTL_NTP_RNAP_R = 120000000;
  mwe8f78bc3_474f_4f84_bd0b_5c01a484b7e9_B1: mw1731539c_93c9_4968_a47b_f95e241210a2_B1 + mw0224b269_aae5_4ca1_a6e6_3607229b0a5b_B1 -> mw39a79b9e_eb59_423a_b844_153e6aa7934d_B1; mwe8f78bc3_474f_4f84_bd0b_5c01a484b7e9_B1_TXTL_NTP_RNAP_F*mw1731539c_93c9_4968_a47b_f95e241210a2_B1*mw0224b269_aae5_4ca1_a6e6_3607229b0a5b_B1 - mwe8f78bc3_474f_4f84_bd0b_5c01a484b7e9_B1_TXTL_NTP_RNAP_R*mw39a79b9e_eb59_423a_b844_153e6aa7934d_B1;
    mwe8f78bc3_474f_4f84_bd0b_5c01a484b7e9_B1_TXTL_NTP_RNAP_F = 1; mwe8f78bc3_474f_4f84_bd0b_5c01a484b7e9_B1_TXTL_NTP_RNAP_R = 120000;
  mw5e50b476_1da7_4d8a_938b_edc8b610cf33_B1: mwa075b409_1abd_4858_af4d_da62f73a89dd_B1 + mwe041b8b1_92b6_4c2b_8e78_5212f5644e01_B1 -> mw39a79b9e_eb59_423a_b844_153e6aa7934d_B1; mw5e50b476_1da7_4d8a_938b_edc8b610cf33_B1_TXTL_NTP_RNAP_F*mwa075b409_1abd_4858_af4d_da62f73a89dd_B1*mwe041b8b1_92b6_4c2b_8e78_5212f5644e01_B1 - mw5e50b476_1da7_4d8a_938b_edc8b610cf33_B1_TXTL_NTP_RNAP_R*mw39a79b9e_eb59_423a_b844_153e6aa7934d_B1;
    mw5e50b476_1da7_4d8a_938b_edc8b610cf33_B1_TXTL_NTP_RNAP_F = 1; mw5e50b476_1da7_4d8a_938b_edc8b610cf33_B1_TXTL_NTP_RNAP_R = 120000;
  mw837e9fba_be4e_424e_b1cd_cb57fdb24edf_B1: mw39a79b9e_eb59_423a_b844_153e6aa7934d_B1 => mw6b52fa43_ee57_4ca8_95ac_e79f61a74a41_B1 + mwcab9d721_d5fe_46ba_8abd_db6023744051_B1; mw837e9fba_be4e_424e_b1cd_cb57fdb24edf_B1_TXTL_transcription_rate1*mw39a79b9e_eb59_423a_b844_153e6aa7934d_B1;
    mw837e9fba_be4e_424e_b1cd_cb57fdb24edf_B1_TXTL_transcription_rate1 = 0.001229508;
  mweab1f829_5dd5_49b2_a99a_a50a10e96b63_B1: mwe49f90af_dd8c_43dd_948f_ad0a5a401277_B1 + mwe9049d27_bfa6_4d5d_a0d3_42922e3af392_B1 -> mwb4630ba2_e015_4781_ae70_8c24b6e740a9_B1; mweab1f829_5dd5_49b2_a99a_a50a10e96b63_B1_TL_AA_F*mwe49f90af_dd8c_43dd_948f_ad0a5a401277_B1*mwe9049d27_bfa6_4d5d_a0d3_42922e3af392_B1 - mweab1f829_5dd5_49b2_a99a_a50a10e96b63_B1_TL_AA_R*mwb4630ba2_e015_4781_ae70_8c24b6e740a9_B1;
    mweab1f829_5dd5_49b2_a99a_a50a10e96b63_B1_TL_AA_F = 300; mweab1f829_5dd5_49b2_a99a_a50a10e96b63_B1_TL_AA_R = 0.1;
  mw922b577c_2e88_4360_a426_cccde8c13129_B1: mwb4630ba2_e015_4781_ae70_8c24b6e740a9_B1 + 2 mwe041b8b1_92b6_4c2b_8e78_5212f5644e01_B1 -> mwe8451d4a_d4c8_405c_8ad4_6540824528ee_B1; mw922b577c_2e88_4360_a426_cccde8c13129_B1_TL_AGTP_F*mwb4630ba2_e015_4781_ae70_8c24b6e740a9_B1*mwe041b8b1_92b6_4c2b_8e78_5212f5644e01_B1^2 - mw922b577c_2e88_4360_a426_cccde8c13129_B1_TL_AGTP_R*mwe8451d4a_d4c8_405c_8ad4_6540824528ee_B1;
    mw922b577c_2e88_4360_a426_cccde8c13129_B1_TL_AGTP_F = 30; mw922b577c_2e88_4360_a426_cccde8c13129_B1_TL_AGTP_R = 10;
  mw046142a5_a65b_4cad_b19f_42299799ab0a_B1: mwe8451d4a_d4c8_405c_8ad4_6540824528ee_B1 => mwaff2c6b9_d770_4f47_a543_6039b764a7aa_B1; mw046142a5_a65b_4cad_b19f_42299799ab0a_B1_TXTL_TL_AA_consumption*mwe8451d4a_d4c8_405c_8ad4_6540824528ee_B1;
    mw046142a5_a65b_4cad_b19f_42299799ab0a_B1_TXTL_TL_AA_consumption = 0.03;
  mw88792e2e_5492_46ab_84e3_05d0c6ff44b7_B1: mwe8451d4a_d4c8_405c_8ad4_6540824528ee_B1 => mwaff2c6b9_d770_4f47_a543_6039b764a7aa_B1 + mwb072cf50_050b_4bec_97e3_cacc9c6c80b7_B1; mw88792e2e_5492_46ab_84e3_05d0c6ff44b7_B1_TXTL_TL_rate*mwe8451d4a_d4c8_405c_8ad4_6540824528ee_B1;
    mw88792e2e_5492_46ab_84e3_05d0c6ff44b7_B1_TXTL_TL_rate = 0.01;
  mw56912c5c_4054_4cbe_a72e_464b2bac84c5_B1: mwaff2c6b9_d770_4f47_a543_6039b764a7aa_B1 => mwcab9d721_d5fe_46ba_8abd_db6023744051_B1 + mwe288cc4d_bd5c_430e_acab_0b3cd6abf225_B1; mw56912c5c_4054_4cbe_a72e_464b2bac84c5_B1_TXTL_RIBOBOUND_TERMINATION_RATE*mwaff2c6b9_d770_4f47_a543_6039b764a7aa_B1;
    mw56912c5c_4054_4cbe_a72e_464b2bac84c5_B1_TXTL_RIBOBOUND_TERMINATION_RATE = 50;
  mw7e3e5930_6fce_42e1_8b76_563cc86242de_B1: mwcab9d721_d5fe_46ba_8abd_db6023744051_B1 + mw4f453c9c_a4a1_4d03_a1b9_243580f1d942_B1 -> mwc983a153_460d_4570_95dd_30cb763a952d_B1; mw7e3e5930_6fce_42e1_8b76_563cc86242de_B1_TXTL_RNAdeg_F*mwcab9d721_d5fe_46ba_8abd_db6023744051_B1*mw4f453c9c_a4a1_4d03_a1b9_243580f1d942_B1 - mw7e3e5930_6fce_42e1_8b76_563cc86242de_B1_TXTL_RNAdeg_R*mwc983a153_460d_4570_95dd_30cb763a952d_B1;
    mw7e3e5930_6fce_42e1_8b76_563cc86242de_B1_TXTL_RNAdeg_F = 10; mw7e3e5930_6fce_42e1_8b76_563cc86242de_B1_TXTL_RNAdeg_R = 2000;
  mwcff016a8_1ec2_4c46_a6fc_0f92c4cbf25e_B1: mwc983a153_460d_4570_95dd_30cb763a952d_B1 => mw4f453c9c_a4a1_4d03_a1b9_243580f1d942_B1; mwcff016a8_1ec2_4c46_a6fc_0f92c4cbf25e_B1_TXTL_RNAdeg_F*mwc983a153_460d_4570_95dd_30cb763a952d_B1;
    mwcff016a8_1ec2_4c46_a6fc_0f92c4cbf25e_B1_TXTL_RNAdeg_F = 0.002777778;
  mwfbdb49e8_ccd4_43f1_81fa_241ad4105a69_B1: mwe49f90af_dd8c_43dd_948f_ad0a5a401277_B1 + mw4f453c9c_a4a1_4d03_a1b9_243580f1d942_B1 -> mw939fe071_4f16_4ba8_9242_f1c904939ffa_B1; mwfbdb49e8_ccd4_43f1_81fa_241ad4105a69_B1_TXTL_RNAdeg_F*mwe49f90af_dd8c_43dd_948f_ad0a5a401277_B1*mw4f453c9c_a4a1_4d03_a1b9_243580f1d942_B1 - mwfbdb49e8_ccd4_43f1_81fa_241ad4105a69_B1_TXTL_RNAdeg_R*mw939fe071_4f16_4ba8_9242_f1c904939ffa_B1;
    mwfbdb49e8_ccd4_43f1_81fa_241ad4105a69_B1_TXTL_RNAdeg_F = 10; mwfbdb49e8_ccd4_43f1_81fa_241ad4105a69_B1_TXTL_RNAdeg_R = 2000;
  mwb481be45_00ba_469f_8bff_13dd03cbb7f3_B1: mw939fe071_4f16_4ba8_9242_f1c904939ffa_B1 => mw4f453c9c_a4a1_4d03_a1b9_243580f1d942_B1 + mwe288cc4d_bd5c_430e_acab_0b3cd6abf225_B1; mwb481be45_00ba_469f_8bff_13dd03cbb7f3_B1_TXTL_RNAdeg_F*mw939fe071_4f16_4ba8_9242_f1c904939ffa_B1;
    mwb481be45_00ba_469f_8bff_13dd03cbb7f3_B1_TXTL_RNAdeg_F = 0.002777778;
  mw7d522c74_749f_4ef1_961f_362b9d311ca9_B1: mwe8451d4a_d4c8_405c_8ad4_6540824528ee_B1 + mw4f453c9c_a4a1_4d03_a1b9_243580f1d942_B1 -> mwb8f06eb4_04c7_41dd_95fd_da65ad77558d_B1; mw7d522c74_749f_4ef1_961f_362b9d311ca9_B1_TXTL_RNAdeg_F*mwe8451d4a_d4c8_405c_8ad4_6540824528ee_B1*mw4f453c9c_a4a1_4d03_a1b9_243580f1d942_B1 - mw7d522c74_749f_4ef1_961f_362b9d311ca9_B1_TXTL_RNAdeg_R*mwb8f06eb4_04c7_41dd_95fd_da65ad77558d_B1;
    mw7d522c74_749f_4ef1_961f_362b9d311ca9_B1_TXTL_RNAdeg_F = 10; mw7d522c74_749f_4ef1_961f_362b9d311ca9_B1_TXTL_RNAdeg_R = 2000;
  mwddb04845_6840_42a7_bbf8_2440a13a770d_B1: mwb8f06eb4_04c7_41dd_95fd_da65ad77558d_B1 => mw4f453c9c_a4a1_4d03_a1b9_243580f1d942_B1 + mwe9049d27_bfa6_4d5d_a0d3_42922e3af392_B1 + 2 mwe041b8b1_92b6_4c2b_8e78_5212f5644e01_B1 + mwe288cc4d_bd5c_430e_acab_0b3cd6abf225_B1; mwddb04845_6840_42a7_bbf8_2440a13a770d_B1_TXTL_RNAdeg_F*mwb8f06eb4_04c7_41dd_95fd_da65ad77558d_B1;
    mwddb04845_6840_42a7_bbf8_2440a13a770d_B1_TXTL_RNAdeg_F = 0.002777778;
  mw52f893df_55e2_42cd_a9d2_4cb2392dafa4_B1: mwaff2c6b9_d770_4f47_a543_6039b764a7aa_B1 + mw4f453c9c_a4a1_4d03_a1b9_243580f1d942_B1 -> mw2b48d717_964b_4fde_80eb_31dfc8f9aaae_B1; mw52f893df_55e2_42cd_a9d2_4cb2392dafa4_B1_TXTL_RNAdeg_F*mwaff2c6b9_d770_4f47_a543_6039b764a7aa_B1*mw4f453c9c_a4a1_4d03_a1b9_243580f1d942_B1 - mw52f893df_55e2_42cd_a9d2_4cb2392dafa4_B1_TXTL_RNAdeg_R*mw2b48d717_964b_4fde_80eb_31dfc8f9aaae_B1;
    mw52f893df_55e2_42cd_a9d2_4cb2392dafa4_B1_TXTL_RNAdeg_F = 10; mw52f893df_55e2_42cd_a9d2_4cb2392dafa4_B1_TXTL_RNAdeg_R = 2000;
  mwd520c753_9cdc_4495_9d22_96f451691dbe_B1: mw2b48d717_964b_4fde_80eb_31dfc8f9aaae_B1 => mw4f453c9c_a4a1_4d03_a1b9_243580f1d942_B1 + mwe288cc4d_bd5c_430e_acab_0b3cd6abf225_B1; mwd520c753_9cdc_4495_9d22_96f451691dbe_B1_TXTL_RNAdeg_F*mw2b48d717_964b_4fde_80eb_31dfc8f9aaae_B1;
    mwd520c753_9cdc_4495_9d22_96f451691dbe_B1_TXTL_RNAdeg_F = 0.002777778;
  mw40fc5ec9_5918_4117_96f6_53cebc1515e9_B1: mwb4630ba2_e015_4781_ae70_8c24b6e740a9_B1 + mw4f453c9c_a4a1_4d03_a1b9_243580f1d942_B1 -> mw538a3c71_29fe_4d44_9325_c8a1ffafb19d_B1; mw40fc5ec9_5918_4117_96f6_53cebc1515e9_B1_TXTL_RNAdeg_F*mwb4630ba2_e015_4781_ae70_8c24b6e740a9_B1*mw4f453c9c_a4a1_4d03_a1b9_243580f1d942_B1 - mw40fc5ec9_5918_4117_96f6_53cebc1515e9_B1_TXTL_RNAdeg_R*mw538a3c71_29fe_4d44_9325_c8a1ffafb19d_B1;
    mw40fc5ec9_5918_4117_96f6_53cebc1515e9_B1_TXTL_RNAdeg_F = 10; mw40fc5ec9_5918_4117_96f6_53cebc1515e9_B1_TXTL_RNAdeg_R = 2000;
  mwe3896efa_25fe_4048_9cae_49b3a2133d6c_B1: mw538a3c71_29fe_4d44_9325_c8a1ffafb19d_B1 => mw4f453c9c_a4a1_4d03_a1b9_243580f1d942_B1 + mwe9049d27_bfa6_4d5d_a0d3_42922e3af392_B1 + mwe288cc4d_bd5c_430e_acab_0b3cd6abf225_B1; mwe3896efa_25fe_4048_9cae_49b3a2133d6c_B1_TXTL_RNAdeg_F*mw538a3c71_29fe_4d44_9325_c8a1ffafb19d_B1;
    mwe3896efa_25fe_4048_9cae_49b3a2133d6c_B1_TXTL_RNAdeg_F = 0.002777778;
  mw59bcd6fa_cc8f_4338_b15c_a808ff32cce7_B1: mwce985125_4033_4878_99c7_9fa79ad26a8b_B1 + mw877e5da9_7092_45a9_a813_ef218b4c657d_B1 -> mwdc1e07fe_9c7d_43d2_9ae9_2e9bb4e826f3_B1; SigmaX_RNAP_F*mwce985125_4033_4878_99c7_9fa79ad26a8b_B1*mw877e5da9_7092_45a9_a813_ef218b4c657d_B1 - SigmaX_RNAP_R*mwdc1e07fe_9c7d_43d2_9ae9_2e9bb4e826f3_B1;
    SigmaX_RNAP_F = 100; SigmaX_RNAP_R = 0.1;
  mwc3f28b59_7cb5_4353_bae0_767858ad8c68_B1: mw36edb9f5_273a_49e0_934c_53af44826f29_B1 + mwe288cc4d_bd5c_430e_acab_0b3cd6abf225_B1 -> mw3f61c48c_778f_42d0_bc92_da35a18105d3_B1; mwc3f28b59_7cb5_4353_bae0_767858ad8c68_B1_TXTL_UTR_UTR1_F*mw36edb9f5_273a_49e0_934c_53af44826f29_B1*mwe288cc4d_bd5c_430e_acab_0b3cd6abf225_B1 - mwc3f28b59_7cb5_4353_bae0_767858ad8c68_B1_TXTL_UTR_UTR1_R*mw3f61c48c_778f_42d0_bc92_da35a18105d3_B1;
    mwc3f28b59_7cb5_4353_bae0_767858ad8c68_B1_TXTL_UTR_UTR1_F = 0.2; mwc3f28b59_7cb5_4353_bae0_767858ad8c68_B1_TXTL_UTR_UTR1_R = 4;
  mw0dcc995e_e463_40ed_ad43_74a81107ca2d_B1: mw29bca20f_bb74_4aea_a37a_0df7c5808987_B1 + mwce985125_4033_4878_99c7_9fa79ad26a8b_B1 -> mw2ee2aa24_784a_4146_b966_da635c45f303_B1; mw0dcc995e_e463_40ed_ad43_74a81107ca2d_B1_TXTL_PLAC_RNAPbound_F*mw29bca20f_bb74_4aea_a37a_0df7c5808987_B1*mwce985125_4033_4878_99c7_9fa79ad26a8b_B1 - mw0dcc995e_e463_40ed_ad43_74a81107ca2d_B1_TXTL_PLAC_RNAPbound_R*mw2ee2aa24_784a_4146_b966_da635c45f303_B1;
    mw0dcc995e_e463_40ed_ad43_74a81107ca2d_B1_TXTL_PLAC_RNAPbound_F = 20; mw0dcc995e_e463_40ed_ad43_74a81107ca2d_B1_TXTL_PLAC_RNAPbound_R = 400;
  mw6403af47_569e_42c4_866d_4977450446e3_B1: mwc92d9367_0957_4147_8d27_b4d8aaf06cb6_B1 => mw2ee2aa24_784a_4146_b966_da635c45f303_B1; mw6403af47_569e_42c4_866d_4977450446e3_B1_TXTL_NTP_consumption*mwc92d9367_0957_4147_8d27_b4d8aaf06cb6_B1;
    mw6403af47_569e_42c4_866d_4977450446e3_B1_TXTL_NTP_consumption = 0.7485294;
  mwc774b860_1f93_4404_aac3_2f8e87ebc360_B1: mw6ff72b56_f396_433c_8b68_d4b90158ef92_B1 => mwce985125_4033_4878_99c7_9fa79ad26a8b_B1 + mw29bca20f_bb74_4aea_a37a_0df7c5808987_B1; mwc774b860_1f93_4404_aac3_2f8e87ebc360_B1_TXTL_RNAPBOUND_TERMINATION_RATE*mw6ff72b56_f396_433c_8b68_d4b90158ef92_B1;
    mwc774b860_1f93_4404_aac3_2f8e87ebc360_B1_TXTL_RNAPBOUND_TERMINATION_RATE = 0.05;
  mw4f6441ab_bfba_46d6_9644_73cbc5497d02_B1: mw2ee2aa24_784a_4146_b966_da635c45f303_B1 + mwe041b8b1_92b6_4c2b_8e78_5212f5644e01_B1 -> mw9bde46ed_23e4_4399_ac0a_9c28ab16893e_B1; mw4f6441ab_bfba_46d6_9644_73cbc5497d02_B1_TXTL_NTP_RNAP_F*mw2ee2aa24_784a_4146_b966_da635c45f303_B1*mwe041b8b1_92b6_4c2b_8e78_5212f5644e01_B1 - mw4f6441ab_bfba_46d6_9644_73cbc5497d02_B1_TXTL_NTP_RNAP_R*mw9bde46ed_23e4_4399_ac0a_9c28ab16893e_B1;
    mw4f6441ab_bfba_46d6_9644_73cbc5497d02_B1_TXTL_NTP_RNAP_F = 1000; mw4f6441ab_bfba_46d6_9644_73cbc5497d02_B1_TXTL_NTP_RNAP_R = 120000000;
  mw3b413180_8b6b_4553_9468_7abf0f0f8c87_B1: mw2ee2aa24_784a_4146_b966_da635c45f303_B1 + mw0224b269_aae5_4ca1_a6e6_3607229b0a5b_B1 -> mw90d19c58_7381_4cb3_8dfb_787c23b6ebeb_B1; mw3b413180_8b6b_4553_9468_7abf0f0f8c87_B1_TXTL_NTP_RNAP_F*mw2ee2aa24_784a_4146_b966_da635c45f303_B1*mw0224b269_aae5_4ca1_a6e6_3607229b0a5b_B1 - mw3b413180_8b6b_4553_9468_7abf0f0f8c87_B1_TXTL_NTP_RNAP_R*mw90d19c58_7381_4cb3_8dfb_787c23b6ebeb_B1;
    mw3b413180_8b6b_4553_9468_7abf0f0f8c87_B1_TXTL_NTP_RNAP_F = 1000; mw3b413180_8b6b_4553_9468_7abf0f0f8c87_B1_TXTL_NTP_RNAP_R = 120000000;
  mw1ab61d53_91f3_4289_bfba_9021248ec3ca_B1: mw9bde46ed_23e4_4399_ac0a_9c28ab16893e_B1 + mw0224b269_aae5_4ca1_a6e6_3607229b0a5b_B1 -> mwc92d9367_0957_4147_8d27_b4d8aaf06cb6_B1; mw1ab61d53_91f3_4289_bfba_9021248ec3ca_B1_TXTL_NTP_RNAP_F*mw9bde46ed_23e4_4399_ac0a_9c28ab16893e_B1*mw0224b269_aae5_4ca1_a6e6_3607229b0a5b_B1 - mw1ab61d53_91f3_4289_bfba_9021248ec3ca_B1_TXTL_NTP_RNAP_R*mwc92d9367_0957_4147_8d27_b4d8aaf06cb6_B1;
    mw1ab61d53_91f3_4289_bfba_9021248ec3ca_B1_TXTL_NTP_RNAP_F = 1; mw1ab61d53_91f3_4289_bfba_9021248ec3ca_B1_TXTL_NTP_RNAP_R = 120000;
  mw127157e3_be87_46a4_bc03_e41d6c6a4ab9_B1: mw90d19c58_7381_4cb3_8dfb_787c23b6ebeb_B1 + mwe041b8b1_92b6_4c2b_8e78_5212f5644e01_B1 -> mwc92d9367_0957_4147_8d27_b4d8aaf06cb6_B1; mw127157e3_be87_46a4_bc03_e41d6c6a4ab9_B1_TXTL_NTP_RNAP_F*mw90d19c58_7381_4cb3_8dfb_787c23b6ebeb_B1*mwe041b8b1_92b6_4c2b_8e78_5212f5644e01_B1 - mw127157e3_be87_46a4_bc03_e41d6c6a4ab9_B1_TXTL_NTP_RNAP_R*mwc92d9367_0957_4147_8d27_b4d8aaf06cb6_B1;
    mw127157e3_be87_46a4_bc03_e41d6c6a4ab9_B1_TXTL_NTP_RNAP_F = 1; mw127157e3_be87_46a4_bc03_e41d6c6a4ab9_B1_TXTL_NTP_RNAP_R = 120000;
  mwd6d3384b_3691_41d7_bc41_b3b215bd4a15_B1: mwc92d9367_0957_4147_8d27_b4d8aaf06cb6_B1 => mw6ff72b56_f396_433c_8b68_d4b90158ef92_B1 + mw36edb9f5_273a_49e0_934c_53af44826f29_B1; mwd6d3384b_3691_41d7_bc41_b3b215bd4a15_B1_TXTL_transcription_rate1*mwc92d9367_0957_4147_8d27_b4d8aaf06cb6_B1;
    mwd6d3384b_3691_41d7_bc41_b3b215bd4a15_B1_TXTL_transcription_rate1 = 0.001470588;
  mw1d0d2f91_0b60_446c_a578_088f701f47cf_B1: mw3f61c48c_778f_42d0_bc92_da35a18105d3_B1 + mwe9049d27_bfa6_4d5d_a0d3_42922e3af392_B1 -> mw5295d527_9f1d_4e8e_b95c_86adacac9bbf_B1; mw1d0d2f91_0b60_446c_a578_088f701f47cf_B1_TL_AA_F*mw3f61c48c_778f_42d0_bc92_da35a18105d3_B1*mwe9049d27_bfa6_4d5d_a0d3_42922e3af392_B1 - mw1d0d2f91_0b60_446c_a578_088f701f47cf_B1_TL_AA_R*mw5295d527_9f1d_4e8e_b95c_86adacac9bbf_B1;
    mw1d0d2f91_0b60_446c_a578_088f701f47cf_B1_TL_AA_F = 300; mw1d0d2f91_0b60_446c_a578_088f701f47cf_B1_TL_AA_R = 0.1;
  mw31d784ba_0621_4451_b089_d8c1c05f910c_B1: mw5295d527_9f1d_4e8e_b95c_86adacac9bbf_B1 + 2 mwe041b8b1_92b6_4c2b_8e78_5212f5644e01_B1 -> mw28e4173c_cdc1_46d3_a5fc_1ef799b41f32_B1; mw31d784ba_0621_4451_b089_d8c1c05f910c_B1_TL_AGTP_F*mw5295d527_9f1d_4e8e_b95c_86adacac9bbf_B1*mwe041b8b1_92b6_4c2b_8e78_5212f5644e01_B1^2 - mw31d784ba_0621_4451_b089_d8c1c05f910c_B1_TL_AGTP_R*mw28e4173c_cdc1_46d3_a5fc_1ef799b41f32_B1;
    mw31d784ba_0621_4451_b089_d8c1c05f910c_B1_TL_AGTP_F = 30; mw31d784ba_0621_4451_b089_d8c1c05f910c_B1_TL_AGTP_R = 10;
  mw2bd30743_8e99_4dbf_9f51_4eef5d378d81_B1: mw28e4173c_cdc1_46d3_a5fc_1ef799b41f32_B1 => mw859e0e3a_63c1_4ffd_95c2_a67b83b1d1d6_B1; mw2bd30743_8e99_4dbf_9f51_4eef5d378d81_B1_TXTL_TL_AA_consumption*mw28e4173c_cdc1_46d3_a5fc_1ef799b41f32_B1;
    mw2bd30743_8e99_4dbf_9f51_4eef5d378d81_B1_TXTL_TL_AA_consumption = 0.024;
  mwcbdcc496_6144_4981_8557_8e8a6c0e30ee_B1: mw28e4173c_cdc1_46d3_a5fc_1ef799b41f32_B1 => mw859e0e3a_63c1_4ffd_95c2_a67b83b1d1d6_B1 + mw877e5da9_7092_45a9_a813_ef218b4c657d_B1; mwcbdcc496_6144_4981_8557_8e8a6c0e30ee_B1_TXTL_TL_rate*mw28e4173c_cdc1_46d3_a5fc_1ef799b41f32_B1;
    mwcbdcc496_6144_4981_8557_8e8a6c0e30ee_B1_TXTL_TL_rate = 0.012;
  mwa02d91da_df1f_4606_9eb5_133dd6fd2ef2_B1: mw859e0e3a_63c1_4ffd_95c2_a67b83b1d1d6_B1 => mw36edb9f5_273a_49e0_934c_53af44826f29_B1 + mwe288cc4d_bd5c_430e_acab_0b3cd6abf225_B1; mwa02d91da_df1f_4606_9eb5_133dd6fd2ef2_B1_TXTL_RIBOBOUND_TERMINATION_RATE*mw859e0e3a_63c1_4ffd_95c2_a67b83b1d1d6_B1;
    mwa02d91da_df1f_4606_9eb5_133dd6fd2ef2_B1_TXTL_RIBOBOUND_TERMINATION_RATE = 50;
  mwe6370a56_7fef_432b_b1b7_e0887a1185ba_B1: mw36edb9f5_273a_49e0_934c_53af44826f29_B1 + mw4f453c9c_a4a1_4d03_a1b9_243580f1d942_B1 -> mwbe15e58d_ded7_4bf5_aadd_ae1ad48fb846_B1; mwe6370a56_7fef_432b_b1b7_e0887a1185ba_B1_TXTL_RNAdeg_F*mw36edb9f5_273a_49e0_934c_53af44826f29_B1*mw4f453c9c_a4a1_4d03_a1b9_243580f1d942_B1 - mwe6370a56_7fef_432b_b1b7_e0887a1185ba_B1_TXTL_RNAdeg_R*mwbe15e58d_ded7_4bf5_aadd_ae1ad48fb846_B1;
    mwe6370a56_7fef_432b_b1b7_e0887a1185ba_B1_TXTL_RNAdeg_F = 10; mwe6370a56_7fef_432b_b1b7_e0887a1185ba_B1_TXTL_RNAdeg_R = 2000;
  mwee613a14_bfe0_43e8_bae8_1f0f83e16135_B1: mwbe15e58d_ded7_4bf5_aadd_ae1ad48fb846_B1 => mw4f453c9c_a4a1_4d03_a1b9_243580f1d942_B1; mwee613a14_bfe0_43e8_bae8_1f0f83e16135_B1_TXTL_RNAdeg_F*mwbe15e58d_ded7_4bf5_aadd_ae1ad48fb846_B1;
    mwee613a14_bfe0_43e8_bae8_1f0f83e16135_B1_TXTL_RNAdeg_F = 0.002777778;
  mwb7f61065_72d2_46f5_bb6f_37beed98539c_B1: mw3f61c48c_778f_42d0_bc92_da35a18105d3_B1 + mw4f453c9c_a4a1_4d03_a1b9_243580f1d942_B1 -> mwa1fc1ae9_7ea5_4b19_bfdd_e783762ed1b9_B1; mwb7f61065_72d2_46f5_bb6f_37beed98539c_B1_TXTL_RNAdeg_F*mw3f61c48c_778f_42d0_bc92_da35a18105d3_B1*mw4f453c9c_a4a1_4d03_a1b9_243580f1d942_B1 - mwb7f61065_72d2_46f5_bb6f_37beed98539c_B1_TXTL_RNAdeg_R*mwa1fc1ae9_7ea5_4b19_bfdd_e783762ed1b9_B1;
    mwb7f61065_72d2_46f5_bb6f_37beed98539c_B1_TXTL_RNAdeg_F = 10; mwb7f61065_72d2_46f5_bb6f_37beed98539c_B1_TXTL_RNAdeg_R = 2000;
  mw597bebe5_a96a_4610_ac5b_f36a7cccfb65_B1: mwa1fc1ae9_7ea5_4b19_bfdd_e783762ed1b9_B1 => mw4f453c9c_a4a1_4d03_a1b9_243580f1d942_B1 + mwe288cc4d_bd5c_430e_acab_0b3cd6abf225_B1; mw597bebe5_a96a_4610_ac5b_f36a7cccfb65_B1_TXTL_RNAdeg_F*mwa1fc1ae9_7ea5_4b19_bfdd_e783762ed1b9_B1;
    mw597bebe5_a96a_4610_ac5b_f36a7cccfb65_B1_TXTL_RNAdeg_F = 0.002777778;
  mwdc07340f_d8c6_4ef9_a771_267251e21f6d_B1: mw28e4173c_cdc1_46d3_a5fc_1ef799b41f32_B1 + mw4f453c9c_a4a1_4d03_a1b9_243580f1d942_B1 -> mw2f9c1825_57e6_48b8_878b_5f84570d0f7b_B1; mwdc07340f_d8c6_4ef9_a771_267251e21f6d_B1_TXTL_RNAdeg_F*mw28e4173c_cdc1_46d3_a5fc_1ef799b41f32_B1*mw4f453c9c_a4a1_4d03_a1b9_243580f1d942_B1 - mwdc07340f_d8c6_4ef9_a771_267251e21f6d_B1_TXTL_RNAdeg_R*mw2f9c1825_57e6_48b8_878b_5f84570d0f7b_B1;
    mwdc07340f_d8c6_4ef9_a771_267251e21f6d_B1_TXTL_RNAdeg_F = 10; mwdc07340f_d8c6_4ef9_a771_267251e21f6d_B1_TXTL_RNAdeg_R = 2000;
  mw1e52bda6_b7a1_4628_b19b_af839f3dd831_B1: mw2f9c1825_57e6_48b8_878b_5f84570d0f7b_B1 => mw4f453c9c_a4a1_4d03_a1b9_243580f1d942_B1 + mwe9049d27_bfa6_4d5d_a0d3_42922e3af392_B1 + 2 mwe041b8b1_92b6_4c2b_8e78_5212f5644e01_B1 + mwe288cc4d_bd5c_430e_acab_0b3cd6abf225_B1; mw1e52bda6_b7a1_4628_b19b_af839f3dd831_B1_TXTL_RNAdeg_F*mw2f9c1825_57e6_48b8_878b_5f84570d0f7b_B1;
    mw1e52bda6_b7a1_4628_b19b_af839f3dd831_B1_TXTL_RNAdeg_F = 0.002777778;
  mw94ec40e4_c61a_44d4_adef_4fc7db33db29_B1: mw859e0e3a_63c1_4ffd_95c2_a67b83b1d1d6_B1 + mw4f453c9c_a4a1_4d03_a1b9_243580f1d942_B1 -> mw6de5993d_c5be_4d0b_8507_656ff4d0b17b_B1; mw94ec40e4_c61a_44d4_adef_4fc7db33db29_B1_TXTL_RNAdeg_F*mw859e0e3a_63c1_4ffd_95c2_a67b83b1d1d6_B1*mw4f453c9c_a4a1_4d03_a1b9_243580f1d942_B1 - mw94ec40e4_c61a_44d4_adef_4fc7db33db29_B1_TXTL_RNAdeg_R*mw6de5993d_c5be_4d0b_8507_656ff4d0b17b_B1;
    mw94ec40e4_c61a_44d4_adef_4fc7db33db29_B1_TXTL_RNAdeg_F = 10; mw94ec40e4_c61a_44d4_adef_4fc7db33db29_B1_TXTL_RNAdeg_R = 2000;
  mw10dbdd40_a144_4e94_ae79_6cebc3c137db_B1: mw6de5993d_c5be_4d0b_8507_656ff4d0b17b_B1 => mw4f453c9c_a4a1_4d03_a1b9_243580f1d942_B1 + mwe288cc4d_bd5c_430e_acab_0b3cd6abf225_B1; mw10dbdd40_a144_4e94_ae79_6cebc3c137db_B1_TXTL_RNAdeg_F*mw6de5993d_c5be_4d0b_8507_656ff4d0b17b_B1;
    mw10dbdd40_a144_4e94_ae79_6cebc3c137db_B1_TXTL_RNAdeg_F = 0.002777778;
  mwe97790e5_c559_40b7_9ca9_160f3cecbc82_B1: mw5295d527_9f1d_4e8e_b95c_86adacac9bbf_B1 + mw4f453c9c_a4a1_4d03_a1b9_243580f1d942_B1 -> mw8b8e7de3_298d_4e5b_9ad2_f3adb3660424_B1; mwe97790e5_c559_40b7_9ca9_160f3cecbc82_B1_TXTL_RNAdeg_F*mw5295d527_9f1d_4e8e_b95c_86adacac9bbf_B1*mw4f453c9c_a4a1_4d03_a1b9_243580f1d942_B1 - mwe97790e5_c559_40b7_9ca9_160f3cecbc82_B1_TXTL_RNAdeg_R*mw8b8e7de3_298d_4e5b_9ad2_f3adb3660424_B1;
    mwe97790e5_c559_40b7_9ca9_160f3cecbc82_B1_TXTL_RNAdeg_F = 10; mwe97790e5_c559_40b7_9ca9_160f3cecbc82_B1_TXTL_RNAdeg_R = 2000;
  mw04d87a2d_939b_480b_ad42_abb512e42089_B1: mw8b8e7de3_298d_4e5b_9ad2_f3adb3660424_B1 => mw4f453c9c_a4a1_4d03_a1b9_243580f1d942_B1 + mwe9049d27_bfa6_4d5d_a0d3_42922e3af392_B1 + mwe288cc4d_bd5c_430e_acab_0b3cd6abf225_B1; mw04d87a2d_939b_480b_ad42_abb512e42089_B1_TXTL_RNAdeg_F*mw8b8e7de3_298d_4e5b_9ad2_f3adb3660424_B1;
    mw04d87a2d_939b_480b_ad42_abb512e42089_B1_TXTL_RNAdeg_F = 0.002777778;
  mw0e13176a_be8d_4e51_998b_103195c25fc2_B1: mwe041b8b1_92b6_4c2b_8e78_5212f5644e01_B1 => mwff9bade0_4398_4b01_a00e_4bb92b82929f_B1; mw786a2e83_d802_4211_81cc_786f08db726f_B1*mwe041b8b1_92b6_4c2b_8e78_5212f5644e01_B1;

  // Events:
  event_219: at (time <= 5400): mw5996d02e_ace7_48f3_a137_02e414010144_A1 = 0;
  event_220: at (time > 5400): mw5996d02e_ace7_48f3_a137_02e414010144_A1 = 0.0002;
  event_221: at (time <= 5400): mw786a2e83_d802_4211_81cc_786f08db726f_B1 = 0;
  event_222: at (time > 5400): mw786a2e83_d802_4211_81cc_786f08db726f_B1 = 0.0002;

  // Unit definitions:
  unit volume = litre;
  unit substance = mole;
  unit area = metre^2;
end
