// SBML level 3 version 2

model combined_model_of__combined_model_of__reservoir_model_combined_model_of__combined_model_of__combined_model_of__bioscrape_generated_model_288980_bioscrape_generated_model_963930()
  // model units - substance: mole, time: second, volume: litre, area: square_metre, length: metre, extent: mole

  // Compartments:
  compartment cell_1_external = 1e-6 litre;
  compartment cell_1_internal = 0;

  // Species:
  species IPTG_reservoir_model in cell_1_external = 10000;
  species G_bioscrape_generated_model_288980_combined_model_of__bioscrape_generated_model_288980_bioscrape_generated_model_963930 in cell_1_internal = 1;
  species S_bioscrape_generated_model_288980_combined_model_of__bioscrape_generated_model_288980_bioscrape_generated_model_963930 in cell_1_internal = 10000/cell_1_internal; S_bioscrape_generated_model_288980_combined_model_of__bioscrape_generated_model_288980_bioscrape_generated_model_963930 is "IPTG";
  species mRNA_T_bioscrape_generated_model_288980_1_combined_combined_model_of__bioscrape_generated_model_288980_bioscrape_generated_model_963930 in cell_1_internal = 0;
  species X_bioscrape_generated_model_963930_combined_model_of__bioscrape_generated_model_288980_bioscrape_generated_model_963930 in cell_1_internal = 0;

  // Parameters:
  KI_bioscrape_generated_model_288980_combined_model_of__bioscrape_generated_model_288980_bioscrape_generated_model_963930 = 10;
  KX_bioscrape_generated_model_288980_combined_model_of__bioscrape_generated_model_288980_bioscrape_generated_model_963930 = 2;
  DummyVar_PositiveHillPropensity_n_0_bioscrape_generated_model_963930_combined_model_of__bioscrape_generated_model_288980_bioscrape_generated_model_963930 = 1;
  KR_bioscrape_generated_model_963930_combined_model_of__bioscrape_generated_model_288980_bioscrape_generated_model_963930 = 20;
  KTR_bioscrape_generated_model_963930_combined_model_of__bioscrape_generated_model_288980_bioscrape_generated_model_963930 = 5;
  delta_combined_combined_model_of__bioscrape_generated_model_288980_bioscrape_generated_model_963930 = 0.1;
  n_combined_combined_model_of__bioscrape_generated_model_288980_bioscrape_generated_model_963930 = 2;

  // Reactions:
  r0_bioscrape_generated_model_288980_combined_model_of__bioscrape_generated_model_288980_bioscrape_generated_model_963930: G_bioscrape_generated_model_288980_combined_model_of__bioscrape_generated_model_288980_bioscrape_generated_model_963930 => G_bioscrape_generated_model_288980_combined_model_of__bioscrape_generated_model_288980_bioscrape_generated_model_963930 + mRNA_T_bioscrape_generated_model_288980_1_combined_combined_model_of__bioscrape_generated_model_288980_bioscrape_generated_model_963930; G_bioscrape_generated_model_288980_combined_model_of__bioscrape_generated_model_288980_bioscrape_generated_model_963930*KX_bioscrape_generated_model_288980_combined_model_of__bioscrape_generated_model_288980_bioscrape_generated_model_963930*S_bioscrape_generated_model_288980_combined_model_of__bioscrape_generated_model_288980_bioscrape_generated_model_963930^n_combined_combined_model_of__bioscrape_generated_model_288980_bioscrape_generated_model_963930/(KI_bioscrape_generated_model_288980_combined_model_of__bioscrape_generated_model_288980_bioscrape_generated_model_963930 + S_bioscrape_generated_model_288980_combined_model_of__bioscrape_generated_model_288980_bioscrape_generated_model_963930^n_combined_combined_model_of__bioscrape_generated_model_288980_bioscrape_generated_model_963930);  // modifiers: S_bioscrape_generated_model_288980_combined_model_of__bioscrape_generated_model_288980_bioscrape_generated_model_963930
  r1_bioscrape_generated_model_288980_combined_model_of__bioscrape_generated_model_288980_bioscrape_generated_model_963930: mRNA_T_bioscrape_generated_model_288980_1_combined_combined_model_of__bioscrape_generated_model_288980_bioscrape_generated_model_963930 => ; delta_combined_combined_model_of__bioscrape_generated_model_288980_bioscrape_generated_model_963930*mRNA_T_bioscrape_generated_model_288980_1_combined_combined_model_of__bioscrape_generated_model_288980_bioscrape_generated_model_963930;
  r0_bioscrape_generated_model_963930_combined_model_of__bioscrape_generated_model_288980_bioscrape_generated_model_963930: mRNA_T_bioscrape_generated_model_288980_1_combined_combined_model_of__bioscrape_generated_model_288980_bioscrape_generated_model_963930 => mRNA_T_bioscrape_generated_model_288980_1_combined_combined_model_of__bioscrape_generated_model_288980_bioscrape_generated_model_963930 + X_bioscrape_generated_model_963930_combined_model_of__bioscrape_generated_model_288980_bioscrape_generated_model_963930; KTR_bioscrape_generated_model_963930_combined_model_of__bioscrape_generated_model_288980_bioscrape_generated_model_963930*mRNA_T_bioscrape_generated_model_288980_1_combined_combined_model_of__bioscrape_generated_model_288980_bioscrape_generated_model_963930^n_combined_combined_model_of__bioscrape_generated_model_288980_bioscrape_generated_model_963930/(KR_bioscrape_generated_model_963930_combined_model_of__bioscrape_generated_model_288980_bioscrape_generated_model_963930 + mRNA_T_bioscrape_generated_model_288980_1_combined_combined_model_of__bioscrape_generated_model_288980_bioscrape_generated_model_963930^DummyVar_PositiveHillPropensity_n_0_bioscrape_generated_model_963930_combined_model_of__bioscrape_generated_model_288980_bioscrape_generated_model_963930);
  r1_bioscrape_generated_model_963930_combined_model_of__bioscrape_generated_model_288980_bioscrape_generated_model_963930: X_bioscrape_generated_model_963930_combined_model_of__bioscrape_generated_model_288980_bioscrape_generated_model_963930 => ; X_bioscrape_generated_model_963930_combined_model_of__bioscrape_generated_model_288980_bioscrape_generated_model_963930*delta_combined_combined_model_of__bioscrape_generated_model_288980_bioscrape_generated_model_963930;

  // Unit definitions:
  unit square_metre = metre^2;
  unit per_second = 1 / second;
  unit substance = dimensionless;
end
