// SBML level 3 version 2

model IPTG_membrane()
  // model units - substance: substance, time: second, extent: mole

  // Compartments:
  compartment internal = 1e-6 litre;
  compartment external = 1e-6 litre;

  // Species:
  species IPTG in external = 0;
  species IPTG_1 in internal = 0;
  species transport_protein in internal = 1;
  species IPTG_transport_protein in internal = 0;

  // Parameters:
  kb = 0.01 per_second;
  kd = 0.2 per_second;

  // Reactions:
  r1: IPTG + transport_protein -> IPTG_transport_protein; kb*IPTG*transport_protein - kd*IPTG_transport_protein;
  r2: IPTG_transport_protein -> IPTG_1 + transport_protein; kd*IPTG_transport_protein - kb*IPTG_1*transport_protein;

  // Unit definitions:
  unit per_second = 1 / second;
  unit substance = dimensionless;
end
