// SBML level 3 version 1

model fastModel()
  // model units - substance: count, time: second, extent: mole

  // Compartments:
  compartment cell = 1 litre;

  // Species:
  species inp_IFFL_1 in cell = 50/cell;
  species DA_IFFL_1 in cell = 50/cell;
  species C1_IFFL_1 in cell = 0;

  // Parameters:
  k1f_1 = 1 per_second;
  k1r_1 = 1 per_second;
  k2f_1 = 1 per_second;
  k3f_1 = 1 per_second;
  k4f_1 = 1 per_second;
  k5f_1 = 1 per_second;
  k6f_1 = 1 per_second;
  k6r_1 = 1 per_second;
  k7f_1 = 1 per_second;
  k8f_1 = 1 per_second;
  k9f_1 = 1 per_second;
  k10f_1 = 1 per_second;
  k11f_1 = 1 per_second;
  k11r_1 = 1 per_second;
  k12f_1 = 1 per_second;
  k12r_1 = 1 per_second;
  k13f_1 = 1 per_second;
  k13r_1 = 1 per_second;
  k14f_1 = 1 per_second;
  k14r_1 = 1 per_second;
  k15f_1 = 1 per_second;
  k16f_1 = 1 per_second;
  k17f_1 = 1 per_second;
  k18f_1 = 1 per_second;

  // Reactions:
  r1_1: inp_IFFL_1 + DA_IFFL_1 -> C1_IFFL_1; k1f_1*inp_IFFL_1*DA_IFFL_1 - k1r_1*C1_IFFL_1;  // fast

  // Unit definitions:
  unit per_second = 1 / second;
  unit count = dimensionless;
end
