// SBML level 3 version 1

model EnzymaticReaction()
  // model units - substance: count, time: second, extent: mole

  // Compartments:
  compartment cytosol = 1e-14 litre;

  // Species:
  species ES in cytosol = 0;  // substance in mole_per_litre
  species E in cytosol = 5e-21/cytosol;  // substance in mole_per_litre
  species P in cytosol = 0;  // substance in mole_per_litre
  species S in cytosol = 1e-20/cytosol;  // substance in mole_per_litre

  // Parameters:
  koff = 0.2 per_second;
  kcat = 1000 per_second;
  kon = 100000 litre_per_mole_per_second;

  // Reactions:
  veq: E + S -> ES; cytosol*kon*E*S - cytosol*koff*ES;
  vcat: ES => E + P; cytosol*kcat*ES;

  // Unit definitions:
  unit per_second = 1 / second;
  unit litre_per_mole_per_second = litre / (mole * second);
  unit mole_per_litre = mole / litre;
end
