// SBML level 3 version 1

model connected_model()
  // model units - substance: count, time: seconds, extent: mole

  // Compartments:
  compartment cell = 1 litre;

  // Species:
  species inp_DP1 in cell = 50/cell;
  species X_DP1multiple in cell = 100/cell;
  species C1_DP1multiple in cell = 0;
  species Xp_DP1multiple in cell = 0;
  species E_DP1multiple in cell = 100/cell;
  species C2_DP1multiple in cell = 0;
  species C3_DP1multiple in cell = 0;
  species pA_IFFL_1multiple in cell = 0; pA_IFFL_1multiple is "out_DP1";
  species C4_DP1multiple in cell = 0;
  species inp_DP2 in cell = 50/cell;
  species pB_IFFL_1multiple in cell = 0; pB_IFFL_1multiple is "out_DP2";
  species inp_IFFL_1 in cell = 0; inp_IFFL_1 is "inp_IFFL1";
  species DA_IFFL_1multiple in cell = 100/cell;
  species C1_IFFL_1multiple in cell = 0;
  species mA_IFFL_1multiple in cell = 0;
  species pA_IFFL_1multiple in cell = 0;
  species C2_IFFL_1multiple in cell = 0;
  species DB_IFFL_1multiple in cell = 100/cell;
  species mB_IFFL_1multiple in cell = 0;
  species pB_IFFL_1multiple in cell = 0;
  species C3_IFFL_1multiple in cell = 0;
  species DC_IFFL_1multiple in cell = 100/cell;
  species C4_IFFL_1multiple in cell = 0;
  species C5_IFFL_1multiple in cell = 0;
  species C6_IFFL_1multiple in cell = 0;
  species mC_IFFL_1multiple in cell = 0;
  species out_IFFL_1multiple in cell = 0;
  species inp_IFFL_2 in cell = 0; inp_IFFL_2 is "inp_IFFL2";

  // Parameters:
  k1f_DP1 = 1 per_second;
  k1r_DP1 = 1 per_second;
  k2f_DP1 = 1 per_second;
  k3f_DP1 = 1 per_second;
  k3r_DP1 = 1 per_second;
  k4f_DP1 = 1 per_second;
  k5f_DP1 = 1 per_second;
  k5r_DP1 = 1 per_second;
  k6f_DP1 = 1 per_second;
  k7f_DP1 = 1 per_second;
  k7r_DP1 = 1 per_second;
  k8f_DP1 = 1 per_second;
  k1f_DP2 = 1 per_second;
  k1r_DP2 = 1 per_second;
  k2f_DP2 = 1 per_second;
  k3f_DP2 = 1 per_second;
  k3r_DP2 = 1 per_second;
  k4f_DP2 = 1 per_second;
  k5f_DP2 = 1 per_second;
  k5r_DP2 = 1 per_second;
  k6f_DP2 = 1 per_second;
  k7f_DP2 = 1 per_second;
  k7r_DP2 = 1 per_second;
  k8f_DP2 = 1 per_second;
  k1f_1 = 1 per_second;
  k1r_1 = 1 per_second;
  k2f_1 = 1 per_second;
  k3f_1 = 1 per_second;
  k4f_1 = 1 per_second;
  k5f_1 = 1 per_second;
  k6f_1 = 1 per_second;
  k6r_1 = 1 per_second;
  k7f_1 = 1 per_second;
  k8f_1 = 1 per_second;
  k9f_1 = 1 per_second;
  k10f_1 = 1 per_second;
  k11f_1 = 1 per_second;
  k11r_1 = 1 per_second;
  k12f_1 = 1 per_second;
  k12r_1 = 1 per_second;
  k13f_1 = 1 per_second;
  k13r_1 = 1 per_second;
  k14f_1 = 1 per_second;
  k14r_1 = 1 per_second;
  k15f_1 = 1 per_second;
  k16f_1 = 1 per_second;
  k17f_1 = 1 per_second;
  k18f_1 = 1 per_second;
  k1f_2 = 1 per_second;
  k1r_2 = 1 per_second;
  k2f_2 = 1 per_second;
  k3f_2 = 1 per_second;
  k4f_2 = 1 per_second;
  k5f_2 = 1 per_second;
  k6f_2 = 1 per_second;
  k6r_2 = 1 per_second;
  k7f_2 = 1 per_second;
  k8f_2 = 1 per_second;
  k9f_2 = 1 per_second;
  k10f_2 = 1 per_second;
  k11f_2 = 1 per_second;
  k11r_2 = 1 per_second;
  k12f_2 = 1 per_second;
  k12r_2 = 1 per_second;
  k13f_2 = 1 per_second;
  k13r_2 = 1 per_second;
  k14f_2 = 1 per_second;
  k14r_2 = 1 per_second;
  k15f_2 = 1 per_second;
  k16f_2 = 1 per_second;
  k17f_2 = 1 per_second;
  k18f_2 = 1 per_second;

  // Reactions:
  r1_DP1: inp_DP1 + X_DP1multiple -> C1_DP1multiple; k1f_DP1*inp_DP1*X_DP1multiple - k1r_DP1*C1_DP1multiple;
  r2_DP1: C1_DP1multiple => inp_DP1 + Xp_DP1multiple; k2f_DP1*C1_DP1multiple;
  r3_DP1: E_DP1multiple + Xp_DP1multiple -> C2_DP1multiple; k3f_DP1*E_DP1multiple*Xp_DP1multiple - k3r_DP1*C2_DP1multiple;
  r4_DP1: C2_DP1multiple => E_DP1multiple + X_DP1multiple; k4f_DP1*C2_DP1multiple;
  r5_DP1: inp_DP1 + Xp_DP1multiple -> C3_DP1multiple; k5f_DP1*inp_DP1*Xp_DP1multiple - k5r_DP1*C3_DP1multiple;
  r6_DP1: C3_DP1multiple => pA_IFFL_1multiple + inp_DP1; k6f_DP1*C3_DP1multiple;
  r7_DP1: E_DP1multiple + pA_IFFL_1multiple -> C4_DP1multiple; k7f_DP1*E_DP1multiple*pA_IFFL_1multiple - k7r_DP1*C4_DP1multiple;
  r8_DP1: C4_DP1multiple => Xp_DP1multiple + E_DP1multiple; k8f_DP1*C4_DP1multiple;
  r1_DP2: inp_DP2 + X_DP1multiple -> C1_DP1multiple; k1f_DP2*inp_DP2*X_DP1multiple - k1r_DP2*C1_DP1multiple;
  r2_DP2: C1_DP1multiple => inp_DP2 + Xp_DP1multiple; k2f_DP2*C1_DP1multiple;
  r3_DP2: E_DP1multiple + Xp_DP1multiple -> C2_DP1multiple; k3f_DP2*E_DP1multiple*Xp_DP1multiple - k3r_DP2*C2_DP1multiple;
  r4_DP2: C2_DP1multiple => E_DP1multiple + X_DP1multiple; k4f_DP2*C2_DP1multiple;
  r5_DP2: inp_DP2 + Xp_DP1multiple -> C3_DP1multiple; k5f_DP2*inp_DP2*Xp_DP1multiple - k5r_DP2*C3_DP1multiple;
  r6_DP2: C3_DP1multiple => pB_IFFL_1multiple + inp_DP2; k6f_DP2*C3_DP1multiple;
  r7_DP2: E_DP1multiple + pB_IFFL_1multiple -> C4_DP1multiple; k7f_DP2*E_DP1multiple*pB_IFFL_1multiple - k7r_DP2*C4_DP1multiple;
  r8_DP2: C4_DP1multiple => Xp_DP1multiple + E_DP1multiple; k8f_DP2*C4_DP1multiple;
  r1_1: inp_IFFL_1 + DA_IFFL_1multiple -> C1_IFFL_1multiple; k1f_1*inp_IFFL_1*DA_IFFL_1multiple - k1r_1*C1_IFFL_1multiple;
  r2_1: C1_IFFL_1multiple => C1_IFFL_1multiple + mA_IFFL_1multiple; k2f_1*C1_IFFL_1multiple;
  r3_1: mA_IFFL_1multiple => mA_IFFL_1multiple + pA_IFFL_1multiple; k3f_1*mA_IFFL_1multiple;
  r4_1: mA_IFFL_1multiple => ; k4f_1*mA_IFFL_1multiple;
  r5_1: pA_IFFL_1multiple => ; k5f_1*pA_IFFL_1multiple;
  r6_1: pA_IFFL_1multiple + DB_IFFL_1multiple -> C2_IFFL_1multiple; k6f_1*pA_IFFL_1multiple*DB_IFFL_1multiple - k6r_1*C2_IFFL_1multiple;
  r7_1: C2_IFFL_1multiple => C2_IFFL_1multiple + mB_IFFL_1multiple; k7f_1*C2_IFFL_1multiple;
  r8_1: mB_IFFL_1multiple => mB_IFFL_1multiple + pB_IFFL_1multiple; k8f_1*mB_IFFL_1multiple;
  r9_1: mB_IFFL_1multiple => ; k9f_1*mB_IFFL_1multiple;
  r10_1: pB_IFFL_1multiple => ; k10f_1*pB_IFFL_1multiple;
  r11_1: pB_IFFL_1multiple + DC_IFFL_1multiple -> C3_IFFL_1multiple; k11f_1*pB_IFFL_1multiple*DC_IFFL_1multiple - k11r_1*C3_IFFL_1multiple;
  r12_1: pA_IFFL_1multiple + DC_IFFL_1multiple -> C4_IFFL_1multiple; k12f_1*pA_IFFL_1multiple*DC_IFFL_1multiple - k12r_1*C4_IFFL_1multiple;
  r13_1: pA_IFFL_1multiple + C3_IFFL_1multiple -> C5_IFFL_1multiple; k13f_1*pA_IFFL_1multiple*C3_IFFL_1multiple - k13r_1*C5_IFFL_1multiple;
  r14_1: pB_IFFL_1multiple + C4_IFFL_1multiple -> C6_IFFL_1multiple; k14f_1*pB_IFFL_1multiple*C4_IFFL_1multiple - k14r_1*C6_IFFL_1multiple;
  r15_1: C4_IFFL_1multiple => C4_IFFL_1multiple + mC_IFFL_1multiple; k15f_1*C4_IFFL_1multiple;
  r16_1: mC_IFFL_1multiple => mC_IFFL_1multiple + out_IFFL_1multiple; k16f_1*mC_IFFL_1multiple;
  r17_1: mC_IFFL_1multiple => ; k17f_1*mC_IFFL_1multiple;
  r18_1: out_IFFL_1multiple => ; k18f_1*out_IFFL_1multiple;
  r1_2: inp_IFFL_2 + DA_IFFL_1multiple -> C1_IFFL_1multiple; k1f_2*inp_IFFL_2*DA_IFFL_1multiple - k1r_2*C1_IFFL_1multiple;
  r2_2: C1_IFFL_1multiple => C1_IFFL_1multiple + mA_IFFL_1multiple; k2f_2*C1_IFFL_1multiple;
  r3_2: mA_IFFL_1multiple => mA_IFFL_1multiple + pA_IFFL_1multiple; k3f_2*mA_IFFL_1multiple;
  r4_2: mA_IFFL_1multiple => ; k4f_2*mA_IFFL_1multiple;
  r5_2: pA_IFFL_1multiple => ; k5f_2*pA_IFFL_1multiple;
  r6_2: pA_IFFL_1multiple + DB_IFFL_1multiple -> C2_IFFL_1multiple; k6f_2*pA_IFFL_1multiple*DB_IFFL_1multiple - k6r_2*C2_IFFL_1multiple;
  r7_2: C2_IFFL_1multiple => C2_IFFL_1multiple + mB_IFFL_1multiple; k7f_2*C2_IFFL_1multiple;
  r8_2: mB_IFFL_1multiple => mB_IFFL_1multiple + pB_IFFL_1multiple; k8f_2*mB_IFFL_1multiple;
  r9_2: mB_IFFL_1multiple => ; k9f_2*mB_IFFL_1multiple;
  r10_2: pB_IFFL_1multiple => ; k10f_2*pB_IFFL_1multiple;
  r11_2: pB_IFFL_1multiple + DC_IFFL_1multiple -> C3_IFFL_1multiple; k11f_2*pB_IFFL_1multiple*DC_IFFL_1multiple - k11r_2*C3_IFFL_1multiple;
  r12_2: pA_IFFL_1multiple + DC_IFFL_1multiple -> C4_IFFL_1multiple; k12f_2*pA_IFFL_1multiple*DC_IFFL_1multiple - k12r_2*C4_IFFL_1multiple;
  r13_2: pA_IFFL_1multiple + C3_IFFL_1multiple -> C5_IFFL_1multiple; k13f_2*pA_IFFL_1multiple*C3_IFFL_1multiple - k13r_2*C5_IFFL_1multiple;
  r14_2: pB_IFFL_1multiple + C4_IFFL_1multiple -> C6_IFFL_1multiple; k14f_2*pB_IFFL_1multiple*C4_IFFL_1multiple - k14r_2*C6_IFFL_1multiple;
  r15_2: C4_IFFL_1multiple => C4_IFFL_1multiple + mC_IFFL_1multiple; k15f_2*C4_IFFL_1multiple;
  r16_2: mC_IFFL_1multiple => mC_IFFL_1multiple + out_IFFL_1multiple; k16f_2*mC_IFFL_1multiple;
  r17_2: mC_IFFL_1multiple => ; k17f_2*mC_IFFL_1multiple;
  r18_2: out_IFFL_1multiple => ; k18f_2*out_IFFL_1multiple;

  // Unit definitions:
  unit per_second = 1 / second;
end
