// SBML level 2 version 4

model mix_of_E30VNPRL_E30VNPRL_gene_expression()
  // mix_of_E30VNPRL_E30VNPRL_gene_expression

  // Compartments:
  compartment contents = 1;

  // Species:
  species RNAP in contents = 100.0001/contents;
  species Ribo in contents = 30.00002/contents;
  species RecBCD in contents = 5.000003/contents;
  species RNase in contents = 100.0001/contents;
  species AGTP in contents = 3180048/contents;
  species CUTP in contents = 1908029/contents;
  species AA in contents = 3.180048e7/contents;
  species protein_alHL_contents_9 in contents = 0;
  species protein_alHL_contents_10 in contents = 0; protein_alHL_contents_10 is "protein alHL*";
  species RNA_utr1_alHL in contents = 0; RNA_utr1_alHL is "RNA utr1--alHL";
  species Ribo_RNA_utr1_alHL in contents = 0; Ribo_RNA_utr1_alHL is "Ribo:RNA utr1--alHL";
  species DNA_pOR1OR2_utr1_alHL in contents = 1.000001/contents; DNA_pOR1OR2_utr1_alHL is "DNA pOR1OR2--utr1--alHL";
  species RNAP_DNA_pOR1OR2_utr1_alHL in contents = 0; RNAP_DNA_pOR1OR2_utr1_alHL is "RNAP:DNA pOR1OR2--utr1--alHL";
  species CUTP_AGTP_RNAP_DNA_pOR1OR2_utr1_alHL in contents = 0; CUTP_AGTP_RNAP_DNA_pOR1OR2_utr1_alHL is "CUTP:AGTP:RNAP:DNA pOR1OR2--utr1--alHL";
  species term_RNAP_DNA_pOR1OR2_utr1_alHL in contents = 0; term_RNAP_DNA_pOR1OR2_utr1_alHL is "term_RNAP:DNA pOR1OR2--utr1--alHL";
  species AA_2AGTP_Ribo_RNA_utr1_alHL in contents = 0; AA_2AGTP_Ribo_RNA_utr1_alHL is "AA:2AGTP:Ribo:RNA utr1--alHL";
  species term_Ribo_RNA_utr1_alHL in contents = 0; term_Ribo_RNA_utr1_alHL is "term_Ribo:RNA utr1--alHL";
  species AGTP_RNAP_DNA_pOR1OR2_utr1_alHL in contents = 0; AGTP_RNAP_DNA_pOR1OR2_utr1_alHL is "AGTP:RNAP:DNA pOR1OR2--utr1--alHL";
  species CUTP_RNAP_DNA_pOR1OR2_utr1_alHL in contents = 0; CUTP_RNAP_DNA_pOR1OR2_utr1_alHL is "CUTP:RNAP:DNA pOR1OR2--utr1--alHL";
  species AA_Ribo_RNA_utr1_alHL in contents = 0; AA_Ribo_RNA_utr1_alHL is "AA:Ribo:RNA utr1--alHL";
  species RNA_utr1_alHL_RNase in contents = 0; RNA_utr1_alHL_RNase is "RNA utr1--alHL:RNase";
  species Ribo_RNA_utr1_alHL_RNase in contents = 0; Ribo_RNA_utr1_alHL_RNase is "Ribo:RNA utr1--alHL:RNase";
  species AA_2AGTP_Ribo_RNA_utr1_alHL_RNase in contents = 0; AA_2AGTP_Ribo_RNA_utr1_alHL_RNase is "AA:2AGTP:Ribo:RNA utr1--alHL:RNase";
  species term_Ribo_RNA_utr1_alHL_RNase in contents = 0; term_Ribo_RNA_utr1_alHL_RNase is "term_Ribo:RNA utr1--alHL:RNase";
  species AA_Ribo_RNA_utr1_alHL_RNase in contents = 0; AA_Ribo_RNA_utr1_alHL_RNase is "AA:Ribo:RNA utr1--alHL:RNase";
  species AGTP_USED in contents = 0;

  // Parameters:
  AGTPdeg_F = 0;

  // Reactions:
  reaction_29: protein_alHL_contents_9 => protein_alHL_contents_10; TXTL_PROT_alHL_MATURATION*protein_alHL_contents_9;
    TXTL_PROT_alHL_MATURATION = 0.002310491;
  reaction_30: RNA_utr1_alHL + Ribo -> Ribo_RNA_utr1_alHL; TXTL_UTR_UTR1_F*RNA_utr1_alHL*Ribo - TXTL_UTR_UTR1_R*Ribo_RNA_utr1_alHL;
    TXTL_UTR_UTR1_F = 0.2; TXTL_UTR_UTR1_R = 4;
  reaction_31: DNA_pOR1OR2_utr1_alHL + RNAP -> RNAP_DNA_pOR1OR2_utr1_alHL; TXTL_POR1OR2_RNAPbound_F*DNA_pOR1OR2_utr1_alHL*RNAP - TXTL_POR1OR2_RNAPbound_R*RNAP_DNA_pOR1OR2_utr1_alHL;
    TXTL_POR1OR2_RNAPbound_F = 20; TXTL_POR1OR2_RNAPbound_R = 400;
  reaction_32: CUTP_AGTP_RNAP_DNA_pOR1OR2_utr1_alHL => RNAP_DNA_pOR1OR2_utr1_alHL; TXTL_NTP_consumption*CUTP_AGTP_RNAP_DNA_pOR1OR2_utr1_alHL;
    TXTL_NTP_consumption = 0.7485294;
  reaction_33: term_RNAP_DNA_pOR1OR2_utr1_alHL => RNAP + DNA_pOR1OR2_utr1_alHL; TXTL_RNAPBOUND_TERMINATION_RATE*term_RNAP_DNA_pOR1OR2_utr1_alHL;
    TXTL_RNAPBOUND_TERMINATION_RATE = 0.05;
  reaction_34: RNAP_DNA_pOR1OR2_utr1_alHL + AGTP -> AGTP_RNAP_DNA_pOR1OR2_utr1_alHL; reaction_34_TXTL_NTP_RNAP_F*RNAP_DNA_pOR1OR2_utr1_alHL*AGTP - reaction_34_TXTL_NTP_RNAP_R*AGTP_RNAP_DNA_pOR1OR2_utr1_alHL;
    reaction_34_TXTL_NTP_RNAP_F = 1000; reaction_34_TXTL_NTP_RNAP_R = 120000000;
  reaction_35: RNAP_DNA_pOR1OR2_utr1_alHL + CUTP -> CUTP_RNAP_DNA_pOR1OR2_utr1_alHL; reaction_35_TXTL_NTP_RNAP_F*RNAP_DNA_pOR1OR2_utr1_alHL*CUTP - reaction_35_TXTL_NTP_RNAP_R*CUTP_RNAP_DNA_pOR1OR2_utr1_alHL;
    reaction_35_TXTL_NTP_RNAP_F = 1000; reaction_35_TXTL_NTP_RNAP_R = 120000000;
  reaction_36: AGTP_RNAP_DNA_pOR1OR2_utr1_alHL + CUTP -> CUTP_AGTP_RNAP_DNA_pOR1OR2_utr1_alHL; reaction_36_TXTL_NTP_RNAP_F*AGTP_RNAP_DNA_pOR1OR2_utr1_alHL*CUTP - reaction_36_TXTL_NTP_RNAP_R*CUTP_AGTP_RNAP_DNA_pOR1OR2_utr1_alHL;
    reaction_36_TXTL_NTP_RNAP_F = 1; reaction_36_TXTL_NTP_RNAP_R = 120000;
  reaction_37: CUTP_RNAP_DNA_pOR1OR2_utr1_alHL + AGTP -> CUTP_AGTP_RNAP_DNA_pOR1OR2_utr1_alHL; reaction_37_TXTL_NTP_RNAP_F*CUTP_RNAP_DNA_pOR1OR2_utr1_alHL*AGTP - reaction_37_TXTL_NTP_RNAP_R*CUTP_AGTP_RNAP_DNA_pOR1OR2_utr1_alHL;
    reaction_37_TXTL_NTP_RNAP_F = 1; reaction_37_TXTL_NTP_RNAP_R = 120000;
  reaction_38: CUTP_AGTP_RNAP_DNA_pOR1OR2_utr1_alHL => term_RNAP_DNA_pOR1OR2_utr1_alHL + RNA_utr1_alHL; TXTL_transcription_rate1*CUTP_AGTP_RNAP_DNA_pOR1OR2_utr1_alHL;
    TXTL_transcription_rate1 = 0.001470588;
  reaction_39: Ribo_RNA_utr1_alHL + AA -> AA_Ribo_RNA_utr1_alHL; TL_AA_F*Ribo_RNA_utr1_alHL*AA - TL_AA_R*AA_Ribo_RNA_utr1_alHL;
    TL_AA_F = 300; TL_AA_R = 0.1;
  reaction_40: AA_Ribo_RNA_utr1_alHL + 2 AGTP -> AA_2AGTP_Ribo_RNA_utr1_alHL; TL_AGTP_F*AA_Ribo_RNA_utr1_alHL*AGTP^2 - TL_AGTP_R*AA_2AGTP_Ribo_RNA_utr1_alHL;
    TL_AGTP_F = 30; TL_AGTP_R = 10;
  reaction_41: AA_2AGTP_Ribo_RNA_utr1_alHL => term_Ribo_RNA_utr1_alHL; TXTL_TL_AA_consumption*AA_2AGTP_Ribo_RNA_utr1_alHL;
    TXTL_TL_AA_consumption = 0.024;
  reaction_42: AA_2AGTP_Ribo_RNA_utr1_alHL => term_Ribo_RNA_utr1_alHL + protein_alHL_contents_9; TXTL_TL_rate*AA_2AGTP_Ribo_RNA_utr1_alHL;
    TXTL_TL_rate = 0.012;
  reaction_43: term_Ribo_RNA_utr1_alHL => RNA_utr1_alHL + Ribo; TXTL_RIBOBOUND_TERMINATION_RATE*term_Ribo_RNA_utr1_alHL;
    TXTL_RIBOBOUND_TERMINATION_RATE = 50;
  reaction_44: RNA_utr1_alHL + RNase -> RNA_utr1_alHL_RNase; reaction_44_TXTL_RNAdeg_F*RNA_utr1_alHL*RNase - reaction_44_TXTL_RNAdeg_R*RNA_utr1_alHL_RNase;
    reaction_44_TXTL_RNAdeg_F = 10; reaction_44_TXTL_RNAdeg_R = 2000;
  reaction_45: RNA_utr1_alHL_RNase => RNase; reaction_45_TXTL_RNAdeg_F*RNA_utr1_alHL_RNase;
    reaction_45_TXTL_RNAdeg_F = 0.002777778;
  reaction_46: Ribo_RNA_utr1_alHL + RNase -> Ribo_RNA_utr1_alHL_RNase; reaction_46_TXTL_RNAdeg_F*Ribo_RNA_utr1_alHL*RNase - reaction_46_TXTL_RNAdeg_R*Ribo_RNA_utr1_alHL_RNase;
    reaction_46_TXTL_RNAdeg_F = 10; reaction_46_TXTL_RNAdeg_R = 2000;
  reaction_47: Ribo_RNA_utr1_alHL_RNase => RNase + Ribo; reaction_47_TXTL_RNAdeg_F*Ribo_RNA_utr1_alHL_RNase;
    reaction_47_TXTL_RNAdeg_F = 0.002777778;
  reaction_48: AA_2AGTP_Ribo_RNA_utr1_alHL + RNase -> AA_2AGTP_Ribo_RNA_utr1_alHL_RNase; reaction_48_TXTL_RNAdeg_F*AA_2AGTP_Ribo_RNA_utr1_alHL*RNase - reaction_48_TXTL_RNAdeg_R*AA_2AGTP_Ribo_RNA_utr1_alHL_RNase;
    reaction_48_TXTL_RNAdeg_F = 10; reaction_48_TXTL_RNAdeg_R = 2000;
  reaction_49: AA_2AGTP_Ribo_RNA_utr1_alHL_RNase => RNase + AA + 2 AGTP + Ribo; reaction_49_TXTL_RNAdeg_F*AA_2AGTP_Ribo_RNA_utr1_alHL_RNase;
    reaction_49_TXTL_RNAdeg_F = 0.002777778;
  reaction_50: term_Ribo_RNA_utr1_alHL + RNase -> term_Ribo_RNA_utr1_alHL_RNase; reaction_50_TXTL_RNAdeg_F*term_Ribo_RNA_utr1_alHL*RNase - reaction_50_TXTL_RNAdeg_R*term_Ribo_RNA_utr1_alHL_RNase;
    reaction_50_TXTL_RNAdeg_F = 10; reaction_50_TXTL_RNAdeg_R = 2000;
  reaction_51: term_Ribo_RNA_utr1_alHL_RNase => RNase + Ribo; reaction_51_TXTL_RNAdeg_F*term_Ribo_RNA_utr1_alHL_RNase;
    reaction_51_TXTL_RNAdeg_F = 0.002777778;
  reaction_52: AA_Ribo_RNA_utr1_alHL + RNase -> AA_Ribo_RNA_utr1_alHL_RNase; reaction_52_TXTL_RNAdeg_F*AA_Ribo_RNA_utr1_alHL*RNase - reaction_52_TXTL_RNAdeg_R*AA_Ribo_RNA_utr1_alHL_RNase;
    reaction_52_TXTL_RNAdeg_F = 10; reaction_52_TXTL_RNAdeg_R = 2000;
  reaction_53: AA_Ribo_RNA_utr1_alHL_RNase => RNase + AA + Ribo; reaction_53_TXTL_RNAdeg_F*AA_Ribo_RNA_utr1_alHL_RNase;
    reaction_53_TXTL_RNAdeg_F = 0.002777778;
  reaction_54: AGTP => AGTP_USED; AGTPdeg_F*AGTP;

  // Events:
  event_55: at (time <= 5400): AGTPdeg_F = 0;
  event_56: at (time > 5400): AGTPdeg_F = 0.0002;
end
