// SBML level 3 version 1

model DP_1()
  // model units - substance: count, time: second, extent: mole

  // Compartments:
  compartment cell = 1 litre;

  // Species:
  species $inP_1 in cell = 50/cell;
  species X in cell = 0;
  species inP_X_1 in cell = 0; inP_X_1 is "inP:X";
  species X_P_1 in cell = 50/cell; X_P_1 is "X:P";
  species E_1 in cell = 50/cell;
  species E_X_P_1 in cell = 0; E_X_P_1 is "E:X:P";
  species inP_X_P_1 in cell = 0; inP_X_P_1 is "inP:X:P";
  species X_P_P_1 in cell = 0; X_P_P_1 is "X:P:P";
  species E_X_P_P_1 in cell = 0; E_X_P_P_1 is "E:X:P:P";

  // Parameters:
  k1f_1 = 1 per_second;
  k1r_1 = 1 per_second;
  k2f_1 = 1 per_second;
  k3f_1 = 1 per_second;
  k3r_1 = 1 per_second;
  k4f_1 = 1 per_second;
  k5f_1 = 1 per_second;
  k5r_1 = 1 per_second;
  k6f_1 = 1 per_second;
  k7f_1 = 1 per_second;
  k7r_1 = 1 per_second;
  k8f_1 = 1 per_second;

  // Reactions:
  r3_1: E_1 + X_P_1 -> E_X_P_1; k3f_1*E_1*X_P_1 - k3r_1*E_X_P_1;
  r4_1: E_X_P_1 => E_1 + X; k4f_1*E_X_P_1;
  r5_1: $inP_1 + X_P_1 -> inP_X_P_1; k5f_1*inP_1*X_P_1 - k5r_1*inP_X_P_1;
  r6_1: inP_X_P_1 => X_P_P_1 + $inP_1; k6f_1*inP_X_P_1;
  r8_1: E_X_P_P_1 => X_P_1 + E_1; k8f_1*E_X_P_P_1;

  // Unit definitions:
  unit per_second = 1 / second;
  unit count = dimensionless;
end
