// SBML level 3 version 1

model combined_Subsystems__mwaa780036_6cf8_4571_8d74_b3043b255fb8_S1_mwdbb9ef8f_479f_4401_b3c8_e793526a2f6e_S2()
  // model units - substance: substance, time: second, volume: volume, area: area, length: metre, extent: substance

  // Compartments:
  compartment cell = 1 volume;

  // Species:
  species mw21f81e75_640d_43b2_8086_4d7d164d3611_S1 in cell = 5.000003/cell; mw21f81e75_640d_43b2_8086_4d7d164d3611_S1 is "RecBCD";
  species mwba23949d_791e_4030_af40_3d1364463b1b_S1 in cell = 100.0001/cell; mwba23949d_791e_4030_af40_3d1364463b1b_S1 is "RNase";
  species mw49c2a746_8d88_4849_9e42_e3f84ed75bf3_S1 in cell = 0; mw49c2a746_8d88_4849_9e42_e3f84ed75bf3_S1 is "protein tetR";
  species mwfe754408_93de_48ea_b348_b643b39736bb_S1 in cell = 0; mwfe754408_93de_48ea_b348_b643b39736bb_S1 is "aTc";
  species mw819d9282_fac6_4fcd_9eff_7ad6bf474c9d_S1 in cell = 0; mw819d9282_fac6_4fcd_9eff_7ad6bf474c9d_S1 is "protein tetRdimer";
  species mw91b58bea_4d24_4221_9075_4e5ea009753e_S1 in cell = 0; mw91b58bea_4d24_4221_9075_4e5ea009753e_S1 is "RNA utr1--tetR";
  species mw9a621603_6593_45ec_bed4_594305079e69_S1 in cell = 0; mw9a621603_6593_45ec_bed4_594305079e69_S1 is "Ribo:RNA utr1--tetR";
  species mwf709b26b_6c41_4155_b2ea_9646792ce80e_S1 in cell = 1.000001/cell; mwf709b26b_6c41_4155_b2ea_9646792ce80e_S1 is "DNA ptet--utr1--tetR";
  species mw88decd86_1b67_4a36_bb2b_e7eeda26a7e0_S1 in cell = 0; mw88decd86_1b67_4a36_bb2b_e7eeda26a7e0_S1 is "RNAP:DNA ptet--utr1--tetR";
  species mw7d85b7f1_8bec_470f_8741_a5d84f840b9e_S1 in cell = 0; mw7d85b7f1_8bec_470f_8741_a5d84f840b9e_S1 is "CUTP:AGTP:RNAP:DNA ptet--utr1--tetR";
  species mw58198643_9ae2_4709_bf06_22bc39558a00_S1 in cell = 0; mw58198643_9ae2_4709_bf06_22bc39558a00_S1 is "term_RNAP:DNA ptet--utr1--tetR";
  species mw530ac336_2ef3_45fb_aec7_a62a9e38391f_S1 in cell = 0; mw530ac336_2ef3_45fb_aec7_a62a9e38391f_S1 is "AA:2AGTP:Ribo:RNA utr1--tetR";
  species mw6dbb38ea_9535_4e0f_994a_bd22a99fca5b_S1 in cell = 0; mw6dbb38ea_9535_4e0f_994a_bd22a99fca5b_S1 is "term_Ribo:RNA utr1--tetR";
  species mwea3d3713_f0fa_4a8f_a9d7_9a5ee007ab40_S1 in cell = 5.000003/cell; mwea3d3713_f0fa_4a8f_a9d7_9a5ee007ab40_S1 is "protein deGFP activated";
  species mwf2409c5f_0a86_4c04_9876_f168e8b32062_S1 in cell = 0; mwf2409c5f_0a86_4c04_9876_f168e8b32062_S1 is "protein deGFP*";
  species mw42e76dc5_c5e4_4f95_a136_5c43cc795cf2_S1 in cell = 0; mw42e76dc5_c5e4_4f95_a136_5c43cc795cf2_S1 is "RNA utr1--deGFP";
  species mwe5b07a8d_e07f_431b_b9f2_0294173eb30a_S1 in cell = 0; mwe5b07a8d_e07f_431b_b9f2_0294173eb30a_S1 is "Ribo:RNA utr1--deGFP";
  species mw0d174461_baee_46e7_8095_f3e2a2ad1f78_S1 in cell = 1.000001/cell; mw0d174461_baee_46e7_8095_f3e2a2ad1f78_S1 is "DNA ptet--utr1--deGFP";
  species mwb7dbd2a4_a19a_4795_a2d9_3062ed3bf882_S1 in cell = 0; mwb7dbd2a4_a19a_4795_a2d9_3062ed3bf882_S1 is "RNAP:DNA ptet--utr1--deGFP";
  species mwe572554a_ce14_4fd4_a85b_5636f59d2366_S1 in cell = 0; mwe572554a_ce14_4fd4_a85b_5636f59d2366_S1 is "CUTP:AGTP:RNAP:DNA ptet--utr1--deGFP";
  species mw4d30a6f8_0163_4597_b826_a35deda9d8fa_S1 in cell = 0; mw4d30a6f8_0163_4597_b826_a35deda9d8fa_S1 is "term_RNAP:DNA ptet--utr1--deGFP";
  species mwe6fafbe3_3fb8_415b_a895_290cfb160af7_S1 in cell = 0; mwe6fafbe3_3fb8_415b_a895_290cfb160af7_S1 is "AA:2AGTP:Ribo:RNA utr1--deGFP";
  species mwcd9770ad_1e02_41e6_8799_08902c2e9ca1_S1 in cell = 0; mwcd9770ad_1e02_41e6_8799_08902c2e9ca1_S1 is "term_Ribo:RNA utr1--deGFP";
  species mwdaf0f49b_4c20_4a03_8395_e0d1fecc4a4f_S1 in cell = 0; mwdaf0f49b_4c20_4a03_8395_e0d1fecc4a4f_S1 is "2 aTc:protein tetRdimer";
  species mw41606883_1f38_46ea_888e_aab54888133e_S1 in cell = 0; mw41606883_1f38_46ea_888e_aab54888133e_S1 is "AGTP:RNAP:DNA ptet--utr1--tetR";
  species mw51845696_2712_4bae_be40_f57b24b79f00_S1 in cell = 0; mw51845696_2712_4bae_be40_f57b24b79f00_S1 is "CUTP:RNAP:DNA ptet--utr1--tetR";
  species mwccb5dc58_067d_450f_85ee_347eddb30b48_S1 in cell = 0; mwccb5dc58_067d_450f_85ee_347eddb30b48_S1 is "DNA ptet--utr1--tetR:protein tetRdimer";
  species mwdbc2f851_84c5_4bdb_aaea_3cb5011ee423_S1 in cell = 0; mwdbc2f851_84c5_4bdb_aaea_3cb5011ee423_S1 is "AA:Ribo:RNA utr1--tetR";
  species mw67de6ced_f31d_4369_afcc_25f5edd28d1b_S1 in cell = 0; mw67de6ced_f31d_4369_afcc_25f5edd28d1b_S1 is "RNA utr1--tetR:RNase";
  species mw355cb317_ab27_45c2_9cab_1fcadb697671_S1 in cell = 0; mw355cb317_ab27_45c2_9cab_1fcadb697671_S1 is "Ribo:RNA utr1--tetR:RNase";
  species mw9b159c86_d142_4a60_ab2b_d37cda688a87_S1 in cell = 0; mw9b159c86_d142_4a60_ab2b_d37cda688a87_S1 is "AA:2AGTP:Ribo:RNA utr1--tetR:RNase";
  species mwf1ee08ae_b068_49d7_ade5_f51f12c1ec05_S1 in cell = 0; mwf1ee08ae_b068_49d7_ade5_f51f12c1ec05_S1 is "term_Ribo:RNA utr1--tetR:RNase";
  species mw2ddd72e9_f2d7_4c2c_92bb_1b16a4bec3c7_S1 in cell = 0; mw2ddd72e9_f2d7_4c2c_92bb_1b16a4bec3c7_S1 is "AA:Ribo:RNA utr1--tetR:RNase";
  species mw8a4999e4_9ea3_4d4b_b838_bb5a8e0f3196_S1 in cell = 0; mw8a4999e4_9ea3_4d4b_b838_bb5a8e0f3196_S1 is "AGTP:RNAP:DNA ptet--utr1--deGFP";
  species mw775bc89b_cbf8_4bb3_abbf_ae9cb27106ba_S1 in cell = 0; mw775bc89b_cbf8_4bb3_abbf_ae9cb27106ba_S1 is "CUTP:RNAP:DNA ptet--utr1--deGFP";
  species mw9aa44c71_b4b1_4469_933e_3843c038288c_S1 in cell = 0; mw9aa44c71_b4b1_4469_933e_3843c038288c_S1 is "DNA ptet--utr1--deGFP:protein tetRdimer";
  species mwf5ac9566_d5c1_41cc_8044_dfbd249b7db4_S1 in cell = 0; mwf5ac9566_d5c1_41cc_8044_dfbd249b7db4_S1 is "AA:Ribo:RNA utr1--deGFP";
  species mw50ea95e1_8245_4105_a87b_d9317c07e4ae_S1 in cell = 0; mw50ea95e1_8245_4105_a87b_d9317c07e4ae_S1 is "RNA utr1--deGFP:RNase";
  species mwbde2d02f_2a62_44e2_8242_60f2e6a9f693_S1 in cell = 0; mwbde2d02f_2a62_44e2_8242_60f2e6a9f693_S1 is "Ribo:RNA utr1--deGFP:RNase";
  species mwe1e51d10_9cbc_475f_8f91_b16c0fe754c2_S1 in cell = 0; mwe1e51d10_9cbc_475f_8f91_b16c0fe754c2_S1 is "AA:2AGTP:Ribo:RNA utr1--deGFP:RNase";
  species mwbf28b4a3_1ff6_4944_8ada_2bb610b6956e_S1 in cell = 0; mwbf28b4a3_1ff6_4944_8ada_2bb610b6956e_S1 is "term_Ribo:RNA utr1--deGFP:RNase";
  species mw210a17fc_e589_4813_b9fb_206b8b57d1e1_S1 in cell = 0; mw210a17fc_e589_4813_b9fb_206b8b57d1e1_S1 is "AA:Ribo:RNA utr1--deGFP:RNase";
  species mw106c5d49_690a_49d3_bd12_02aa9eb140f8_S1 in cell = 0; mw106c5d49_690a_49d3_bd12_02aa9eb140f8_S1 is "AGTP_USED";
  species mwea3d3713_f0fa_4a8f_a9d7_9a5ee007ab40_S1 in cell = 5.000003/cell; mwea3d3713_f0fa_4a8f_a9d7_9a5ee007ab40_S1 is "activator";
  species mw31a20aa1_fa9a_47b6_9cb9_fac8188e6cee_S2 in cell = 100.0001/cell; mw31a20aa1_fa9a_47b6_9cb9_fac8188e6cee_S2 is "RNase";
  species mw5198d751_3325_4e82_b294_b7a3400f61c3_S2 in cell = 0; mw5198d751_3325_4e82_b294_b7a3400f61c3_S2 is "protein tetR";
  species mw02226291_b527_4a64_b137_ff8b4534ddfd_S2 in cell = 0; mw02226291_b527_4a64_b137_ff8b4534ddfd_S2 is "aTc";
  species mwbb351068_dafa_4d93_a901_93d2c06faf33_S2 in cell = 0; mwbb351068_dafa_4d93_a901_93d2c06faf33_S2 is "protein tetRdimer";
  species mwe77d1e37_93b5_4f66_8099_95cd490e3ddf_S2 in cell = 0; mwe77d1e37_93b5_4f66_8099_95cd490e3ddf_S2 is "RNA utr1--tetR";
  species mw795cf463_fd4f_41cc_89ce_3f1b69e1b881_S2 in cell = 0; mw795cf463_fd4f_41cc_89ce_3f1b69e1b881_S2 is "Ribo:RNA utr1--tetR";
  species mw5c9e180e_f220_44aa_9761_0a564e035947_S2 in cell = 1.000001/cell; mw5c9e180e_f220_44aa_9761_0a564e035947_S2 is "DNA ptet--utr1--tetR";
  species mwfde5a09e_20af_442c_a6b7_7d5ef7b44e44_S2 in cell = 0; mwfde5a09e_20af_442c_a6b7_7d5ef7b44e44_S2 is "RNAP:DNA ptet--utr1--tetR";
  species mw1b36ce54_1b00_4e47_b4f4_dfb9d4762260_S2 in cell = 0; mw1b36ce54_1b00_4e47_b4f4_dfb9d4762260_S2 is "CUTP:AGTP:RNAP:DNA ptet--utr1--tetR";
  species mw40490ff7_3664_414d_baf7_c35c17c243fd_S2 in cell = 0; mw40490ff7_3664_414d_baf7_c35c17c243fd_S2 is "term_RNAP:DNA ptet--utr1--tetR";
  species mw102b2c2d_5476_45e7_8084_d29b2e6e4308_S2 in cell = 0; mw102b2c2d_5476_45e7_8084_d29b2e6e4308_S2 is "AA:2AGTP:Ribo:RNA utr1--tetR";
  species mwc2bcbcb9_8ce4_4c57_b0ff_f67364a4dbf0_S2 in cell = 0; mwc2bcbcb9_8ce4_4c57_b0ff_f67364a4dbf0_S2 is "term_Ribo:RNA utr1--tetR";
  species mwb188a99a_78b9_4cb3_9c62_0ef2b5ff33b2_S2 in cell = 0; mwb188a99a_78b9_4cb3_9c62_0ef2b5ff33b2_S2 is "protein deGFP";
  species mw753ce16e_8fff_4214_87ed_9c4b0dc131f3_S2 in cell = 0; mw753ce16e_8fff_4214_87ed_9c4b0dc131f3_S2 is "protein deGFP*";
  species mw187ab98e_4dd8_4b90_ab91_b3e1a527f317_S2 in cell = 0; mw187ab98e_4dd8_4b90_ab91_b3e1a527f317_S2 is "RNA utr1--deGFP";
  species mw887bf55f_b49f_45f3_ae60_41e620e6df45_S2 in cell = 0; mw887bf55f_b49f_45f3_ae60_41e620e6df45_S2 is "Ribo:RNA utr1--deGFP";
  species mwe894cfb7_4141_407c_b6a7_acf8c54db1dd_S2 in cell = 1.000001/cell; mwe894cfb7_4141_407c_b6a7_acf8c54db1dd_S2 is "DNA ptet--utr1--deGFP";
  species mw826e029a_3f41_423e_bbe4_fcbb1bcf7832_S2 in cell = 0; mw826e029a_3f41_423e_bbe4_fcbb1bcf7832_S2 is "RNAP:DNA ptet--utr1--deGFP";
  species mw9da2427f_d19a_44bb_b27f_a2153d727414_S2 in cell = 0; mw9da2427f_d19a_44bb_b27f_a2153d727414_S2 is "CUTP:AGTP:RNAP:DNA ptet--utr1--deGFP";
  species mw347f7506_272d_4c00_a888_16664b846f5a_S2 in cell = 0; mw347f7506_272d_4c00_a888_16664b846f5a_S2 is "term_RNAP:DNA ptet--utr1--deGFP";
  species mw570b0471_90f8_49a5_9eee_1677409ba70f_S2 in cell = 0; mw570b0471_90f8_49a5_9eee_1677409ba70f_S2 is "AA:2AGTP:Ribo:RNA utr1--deGFP";
  species mw720756b8_d8c6_4f50_9c73_9ed373dd3b17_S2 in cell = 0; mw720756b8_d8c6_4f50_9c73_9ed373dd3b17_S2 is "term_Ribo:RNA utr1--deGFP";
  species mwc4cf8413_2cf2_42e3_87e0_8e30b13a4712_S2 in cell = 0; mwc4cf8413_2cf2_42e3_87e0_8e30b13a4712_S2 is "2 aTc:protein tetRdimer";
  species mwd81748d9_8883_4afd_a274_426e7cac0e85_S2 in cell = 0; mwd81748d9_8883_4afd_a274_426e7cac0e85_S2 is "AGTP:RNAP:DNA ptet--utr1--tetR";
  species mw2c39ce50_3452_4cb7_80f0_30dfa1464a95_S2 in cell = 0; mw2c39ce50_3452_4cb7_80f0_30dfa1464a95_S2 is "CUTP:RNAP:DNA ptet--utr1--tetR";
  species mwfb3b1659_aef9_444d_a1b2_c3c5332699d2_S2 in cell = 0; mwfb3b1659_aef9_444d_a1b2_c3c5332699d2_S2 is "DNA ptet--utr1--tetR:protein tetRdimer";
  species mw8ff0b227_bb24_4447_926c_abaa9d22b9d0_S2 in cell = 0; mw8ff0b227_bb24_4447_926c_abaa9d22b9d0_S2 is "AA:Ribo:RNA utr1--tetR";
  species mw1d8e5eda_2167_44a7_8ec7_a462d5da3a52_S2 in cell = 0; mw1d8e5eda_2167_44a7_8ec7_a462d5da3a52_S2 is "RNA utr1--tetR:RNase";
  species mw70a16be7_46d8_4bef_ae5c_31719f8850a6_S2 in cell = 0; mw70a16be7_46d8_4bef_ae5c_31719f8850a6_S2 is "Ribo:RNA utr1--tetR:RNase";
  species mw69102541_2699_480c_88ff_fdd0039848cb_S2 in cell = 0; mw69102541_2699_480c_88ff_fdd0039848cb_S2 is "AA:2AGTP:Ribo:RNA utr1--tetR:RNase";
  species mwf2e03f7f_416f_404f_bc58_16909c7dea00_S2 in cell = 0; mwf2e03f7f_416f_404f_bc58_16909c7dea00_S2 is "term_Ribo:RNA utr1--tetR:RNase";
  species mwbfaa6d8c_0cd6_4498_ba96_45b93e05ccca_S2 in cell = 0; mwbfaa6d8c_0cd6_4498_ba96_45b93e05ccca_S2 is "AA:Ribo:RNA utr1--tetR:RNase";
  species mwb4b15454_6c0d_4b4a_834e_f17d55ba56a9_S2 in cell = 0; mwb4b15454_6c0d_4b4a_834e_f17d55ba56a9_S2 is "AGTP:RNAP:DNA ptet--utr1--deGFP";
  species mw91d91e93_cbcf_4f84_a7d0_31a9f3f5e36e_S2 in cell = 0; mw91d91e93_cbcf_4f84_a7d0_31a9f3f5e36e_S2 is "CUTP:RNAP:DNA ptet--utr1--deGFP";
  species mwca29b558_b611_41ca_a033_a361bf11588e_S2 in cell = 0; mwca29b558_b611_41ca_a033_a361bf11588e_S2 is "DNA ptet--utr1--deGFP:protein tetRdimer";
  species mwddd6d6d8_7810_4749_b0ec_9b625e5bde16_S2 in cell = 0; mwddd6d6d8_7810_4749_b0ec_9b625e5bde16_S2 is "AA:Ribo:RNA utr1--deGFP";
  species mw6f809389_8e11_4d87_8587_1d6ac1fafe5e_S2 in cell = 0; mw6f809389_8e11_4d87_8587_1d6ac1fafe5e_S2 is "RNA utr1--deGFP:RNase";
  species mw62de36a8_f2e0_4148_9acc_13f9028af8e8_S2 in cell = 0; mw62de36a8_f2e0_4148_9acc_13f9028af8e8_S2 is "Ribo:RNA utr1--deGFP:RNase";
  species mw60949402_1d1b_40ec_bb33_edb15e6699db_S2 in cell = 0; mw60949402_1d1b_40ec_bb33_edb15e6699db_S2 is "AA:2AGTP:Ribo:RNA utr1--deGFP:RNase";
  species mw2bc1cfde_f944_4b62_ab54_64a38bebdffa_S2 in cell = 0; mw2bc1cfde_f944_4b62_ab54_64a38bebdffa_S2 is "term_Ribo:RNA utr1--deGFP:RNase";
  species mwb70352c7_9a29_4a2c_9280_2e92b39b7034_S2 in cell = 0; mwb70352c7_9a29_4a2c_9280_2e92b39b7034_S2 is "AA:Ribo:RNA utr1--deGFP:RNase";
  species mw74c2c967_18fd_4445_9b27_71c14483d316_S2 in cell = 0; mw74c2c967_18fd_4445_9b27_71c14483d316_S2 is "AGTP_USED";
  species RNAP_shared in cell = 100/cell;
  species Ribo_shared in cell = 60.00004/cell;
  species AGTP_shared in cell = 6360096/cell;
  species CUTP_shared in cell = 3816058/cell;
  species AA_shared in cell = 6.360096e7/cell;

  // Parameters:
  mw8cf83496_9f55_4eca_9dc2_b30c8e67d7bd_S1 = 0; mw8cf83496_9f55_4eca_9dc2_b30c8e67d7bd_S1 is "AGTPdeg_F";
  mw5c2bb4d9_3548_456f_a5fe_b970d5bbbf8a_S2 = 0; mw5c2bb4d9_3548_456f_a5fe_b970d5bbbf8a_S2 is "AGTPdeg_F";

  // Reactions:
  mw261560c9_9435_4f37_9618_76226e0b55e6_S1: mw819d9282_fac6_4fcd_9eff_7ad6bf474c9d_S1 + 2 mwfe754408_93de_48ea_b348_b643b39736bb_S1 -> mwdaf0f49b_4c20_4a03_8395_e0d1fecc4a4f_S1; mw261560c9_9435_4f37_9618_76226e0b55e6_S1_TXTL_INDUCER_TETR_ATC_F*mw819d9282_fac6_4fcd_9eff_7ad6bf474c9d_S1*mwfe754408_93de_48ea_b348_b643b39736bb_S1^2 - mw261560c9_9435_4f37_9618_76226e0b55e6_S1_TXTL_INDUCER_TETR_ATC_R*mwdaf0f49b_4c20_4a03_8395_e0d1fecc4a4f_S1;
    mw261560c9_9435_4f37_9618_76226e0b55e6_S1_TXTL_INDUCER_TETR_ATC_F = 1e-5; mw261560c9_9435_4f37_9618_76226e0b55e6_S1_TXTL_INDUCER_TETR_ATC_R = 0.1;
  mw4379ceb8_935a_47a0_866b_797117c19b01_S1: 2 mw49c2a746_8d88_4849_9e42_e3f84ed75bf3_S1 -> mw819d9282_fac6_4fcd_9eff_7ad6bf474c9d_S1; mw4379ceb8_935a_47a0_866b_797117c19b01_S1_kf*mw49c2a746_8d88_4849_9e42_e3f84ed75bf3_S1^2 - mw4379ceb8_935a_47a0_866b_797117c19b01_S1_kr*mw819d9282_fac6_4fcd_9eff_7ad6bf474c9d_S1;
    mw4379ceb8_935a_47a0_866b_797117c19b01_S1_kf = 1; mw4379ceb8_935a_47a0_866b_797117c19b01_S1_kr = 1;
  mw01f62f46_208c_4421_9d29_c35407ee9aba_S1: mw91b58bea_4d24_4221_9075_4e5ea009753e_S1 + Ribo_shared -> mw9a621603_6593_45ec_bed4_594305079e69_S1; mw01f62f46_208c_4421_9d29_c35407ee9aba_S1_TXTL_UTR_UTR1_F*mw91b58bea_4d24_4221_9075_4e5ea009753e_S1*Ribo_shared - mw01f62f46_208c_4421_9d29_c35407ee9aba_S1_TXTL_UTR_UTR1_R*mw9a621603_6593_45ec_bed4_594305079e69_S1;
    mw01f62f46_208c_4421_9d29_c35407ee9aba_S1_TXTL_UTR_UTR1_F = 0.2; mw01f62f46_208c_4421_9d29_c35407ee9aba_S1_TXTL_UTR_UTR1_R = 4;
  mwf778efef_ff33_4460_a6a8_43c86b82e63f_S1: mwf709b26b_6c41_4155_b2ea_9646792ce80e_S1 + RNAP_shared -> mw88decd86_1b67_4a36_bb2b_e7eeda26a7e0_S1; mwf778efef_ff33_4460_a6a8_43c86b82e63f_S1_TXTL_PTET_RNAPbound_F*mwf709b26b_6c41_4155_b2ea_9646792ce80e_S1*RNAP_shared - mwf778efef_ff33_4460_a6a8_43c86b82e63f_S1_TXTL_PTET_RNAPbound_R*mw88decd86_1b67_4a36_bb2b_e7eeda26a7e0_S1;
    mwf778efef_ff33_4460_a6a8_43c86b82e63f_S1_TXTL_PTET_RNAPbound_F = 20; mwf778efef_ff33_4460_a6a8_43c86b82e63f_S1_TXTL_PTET_RNAPbound_R = 400;
  mwc85712ed_78b3_4e88_b982_9a98e8f0b9e3_S1: mw7d85b7f1_8bec_470f_8741_a5d84f840b9e_S1 => mw88decd86_1b67_4a36_bb2b_e7eeda26a7e0_S1; mwc85712ed_78b3_4e88_b982_9a98e8f0b9e3_S1_TXTL_NTP_consumption*mw7d85b7f1_8bec_470f_8741_a5d84f840b9e_S1;
    mwc85712ed_78b3_4e88_b982_9a98e8f0b9e3_S1_TXTL_NTP_consumption = 0.7487705;
  mwfacc3108_198d_47d5_a4c4_209d38019ce8_S1: mw58198643_9ae2_4709_bf06_22bc39558a00_S1 => RNAP_shared + mwf709b26b_6c41_4155_b2ea_9646792ce80e_S1; mwfacc3108_198d_47d5_a4c4_209d38019ce8_S1_TXTL_RNAPBOUND_TERMINATION_RATE*mw58198643_9ae2_4709_bf06_22bc39558a00_S1;
    mwfacc3108_198d_47d5_a4c4_209d38019ce8_S1_TXTL_RNAPBOUND_TERMINATION_RATE = 0.05;
  mw22f6c31f_b7a2_45d2_bbe2_b7fa4d0ed135_S1: mw88decd86_1b67_4a36_bb2b_e7eeda26a7e0_S1 + AGTP_shared -> mw41606883_1f38_46ea_888e_aab54888133e_S1; mw22f6c31f_b7a2_45d2_bbe2_b7fa4d0ed135_S1_TXTL_NTP_RNAP_F*mw88decd86_1b67_4a36_bb2b_e7eeda26a7e0_S1*AGTP_shared - mw22f6c31f_b7a2_45d2_bbe2_b7fa4d0ed135_S1_TXTL_NTP_RNAP_R*mw41606883_1f38_46ea_888e_aab54888133e_S1;
    mw22f6c31f_b7a2_45d2_bbe2_b7fa4d0ed135_S1_TXTL_NTP_RNAP_F = 1000; mw22f6c31f_b7a2_45d2_bbe2_b7fa4d0ed135_S1_TXTL_NTP_RNAP_R = 120000000;
  mwd4422ffd_15bc_476e_a245_2b9defd21926_S1: mw88decd86_1b67_4a36_bb2b_e7eeda26a7e0_S1 + CUTP_shared -> mw51845696_2712_4bae_be40_f57b24b79f00_S1; mwd4422ffd_15bc_476e_a245_2b9defd21926_S1_TXTL_NTP_RNAP_F*mw88decd86_1b67_4a36_bb2b_e7eeda26a7e0_S1*CUTP_shared - mwd4422ffd_15bc_476e_a245_2b9defd21926_S1_TXTL_NTP_RNAP_R*mw51845696_2712_4bae_be40_f57b24b79f00_S1;
    mwd4422ffd_15bc_476e_a245_2b9defd21926_S1_TXTL_NTP_RNAP_F = 1000; mwd4422ffd_15bc_476e_a245_2b9defd21926_S1_TXTL_NTP_RNAP_R = 120000000;
  mw7fd8f5e9_8781_4616_910b_2db46169f3ce_S1: mw41606883_1f38_46ea_888e_aab54888133e_S1 + CUTP_shared -> mw7d85b7f1_8bec_470f_8741_a5d84f840b9e_S1; mw7fd8f5e9_8781_4616_910b_2db46169f3ce_S1_TXTL_NTP_RNAP_F*mw41606883_1f38_46ea_888e_aab54888133e_S1*CUTP_shared - mw7fd8f5e9_8781_4616_910b_2db46169f3ce_S1_TXTL_NTP_RNAP_R*mw7d85b7f1_8bec_470f_8741_a5d84f840b9e_S1;
    mw7fd8f5e9_8781_4616_910b_2db46169f3ce_S1_TXTL_NTP_RNAP_F = 1; mw7fd8f5e9_8781_4616_910b_2db46169f3ce_S1_TXTL_NTP_RNAP_R = 120000;
  mw52ec9b9c_c5ec_47a9_8850_f0d2fd8259d2_S1: mw51845696_2712_4bae_be40_f57b24b79f00_S1 + AGTP_shared -> mw7d85b7f1_8bec_470f_8741_a5d84f840b9e_S1; mw52ec9b9c_c5ec_47a9_8850_f0d2fd8259d2_S1_TXTL_NTP_RNAP_F*mw51845696_2712_4bae_be40_f57b24b79f00_S1*AGTP_shared - mw52ec9b9c_c5ec_47a9_8850_f0d2fd8259d2_S1_TXTL_NTP_RNAP_R*mw7d85b7f1_8bec_470f_8741_a5d84f840b9e_S1;
    mw52ec9b9c_c5ec_47a9_8850_f0d2fd8259d2_S1_TXTL_NTP_RNAP_F = 1; mw52ec9b9c_c5ec_47a9_8850_f0d2fd8259d2_S1_TXTL_NTP_RNAP_R = 120000;
  mw9570edab_f28e_43e9_9fa1_a587f1aea1fb_S1: mw7d85b7f1_8bec_470f_8741_a5d84f840b9e_S1 => mw58198643_9ae2_4709_bf06_22bc39558a00_S1 + mw91b58bea_4d24_4221_9075_4e5ea009753e_S1; mw9570edab_f28e_43e9_9fa1_a587f1aea1fb_S1_TXTL_transcription_rate1*mw7d85b7f1_8bec_470f_8741_a5d84f840b9e_S1;
    mw9570edab_f28e_43e9_9fa1_a587f1aea1fb_S1_TXTL_transcription_rate1 = 0.001229508;
  mwf13844c5_47b9_4824_a257_bac195c63389_S1: mwf709b26b_6c41_4155_b2ea_9646792ce80e_S1 + mw819d9282_fac6_4fcd_9eff_7ad6bf474c9d_S1 -> mwccb5dc58_067d_450f_85ee_347eddb30b48_S1; mwf13844c5_47b9_4824_a257_bac195c63389_S1_ptet_sequestration_F*mwf709b26b_6c41_4155_b2ea_9646792ce80e_S1*mw819d9282_fac6_4fcd_9eff_7ad6bf474c9d_S1 - mwf13844c5_47b9_4824_a257_bac195c63389_S1_ptet_sequestration_R*mwccb5dc58_067d_450f_85ee_347eddb30b48_S1;
    mwf13844c5_47b9_4824_a257_bac195c63389_S1_ptet_sequestration_F = 0.25; mwf13844c5_47b9_4824_a257_bac195c63389_S1_ptet_sequestration_R = 0.000111;
  mwe5276aaa_52a0_4182_8fae_34e3176acd5a_S1: mw9a621603_6593_45ec_bed4_594305079e69_S1 + AA_shared -> mwdbc2f851_84c5_4bdb_aaea_3cb5011ee423_S1; mwe5276aaa_52a0_4182_8fae_34e3176acd5a_S1_TL_AA_F*mw9a621603_6593_45ec_bed4_594305079e69_S1*AA_shared - mwe5276aaa_52a0_4182_8fae_34e3176acd5a_S1_TL_AA_R*mwdbc2f851_84c5_4bdb_aaea_3cb5011ee423_S1;
    mwe5276aaa_52a0_4182_8fae_34e3176acd5a_S1_TL_AA_F = 300; mwe5276aaa_52a0_4182_8fae_34e3176acd5a_S1_TL_AA_R = 0.1;
  mw663a4449_77dc_4e1c_85d5_d8540cf82602_S1: mwdbc2f851_84c5_4bdb_aaea_3cb5011ee423_S1 + 2 AGTP_shared -> mw530ac336_2ef3_45fb_aec7_a62a9e38391f_S1; mw663a4449_77dc_4e1c_85d5_d8540cf82602_S1_TL_AGTP_F*mwdbc2f851_84c5_4bdb_aaea_3cb5011ee423_S1*AGTP_shared^2 - mw663a4449_77dc_4e1c_85d5_d8540cf82602_S1_TL_AGTP_R*mw530ac336_2ef3_45fb_aec7_a62a9e38391f_S1;
    mw663a4449_77dc_4e1c_85d5_d8540cf82602_S1_TL_AGTP_F = 30; mw663a4449_77dc_4e1c_85d5_d8540cf82602_S1_TL_AGTP_R = 10;
  mw6841d216_de98_4a36_becc_10ebf204fdac_S1: mw530ac336_2ef3_45fb_aec7_a62a9e38391f_S1 => mw6dbb38ea_9535_4e0f_994a_bd22a99fca5b_S1; mw6841d216_de98_4a36_becc_10ebf204fdac_S1_TXTL_TL_AA_consumption*mw530ac336_2ef3_45fb_aec7_a62a9e38391f_S1;
    mw6841d216_de98_4a36_becc_10ebf204fdac_S1_TXTL_TL_AA_consumption = 0.03;
  mw1542a388_1a94_4782_a22d_3686d1916665_S1: mw530ac336_2ef3_45fb_aec7_a62a9e38391f_S1 => mw6dbb38ea_9535_4e0f_994a_bd22a99fca5b_S1 + mw49c2a746_8d88_4849_9e42_e3f84ed75bf3_S1; mw1542a388_1a94_4782_a22d_3686d1916665_S1_TXTL_TL_rate*mw530ac336_2ef3_45fb_aec7_a62a9e38391f_S1;
    mw1542a388_1a94_4782_a22d_3686d1916665_S1_TXTL_TL_rate = 0.01;
  mw8d90576f_d934_46f0_9bb1_5286e4e7663c_S1: mw6dbb38ea_9535_4e0f_994a_bd22a99fca5b_S1 => mw91b58bea_4d24_4221_9075_4e5ea009753e_S1 + Ribo_shared; mw8d90576f_d934_46f0_9bb1_5286e4e7663c_S1_TXTL_RIBOBOUND_TERMINATION_RATE*mw6dbb38ea_9535_4e0f_994a_bd22a99fca5b_S1;
    mw8d90576f_d934_46f0_9bb1_5286e4e7663c_S1_TXTL_RIBOBOUND_TERMINATION_RATE = 50;
  mwd855a09e_d3d0_4ec6_97ed_33bcc30301d0_S1: mw91b58bea_4d24_4221_9075_4e5ea009753e_S1 + mwba23949d_791e_4030_af40_3d1364463b1b_S1 -> mw67de6ced_f31d_4369_afcc_25f5edd28d1b_S1; mwd855a09e_d3d0_4ec6_97ed_33bcc30301d0_S1_TXTL_RNAdeg_F*mw91b58bea_4d24_4221_9075_4e5ea009753e_S1*mwba23949d_791e_4030_af40_3d1364463b1b_S1 - mwd855a09e_d3d0_4ec6_97ed_33bcc30301d0_S1_TXTL_RNAdeg_R*mw67de6ced_f31d_4369_afcc_25f5edd28d1b_S1;
    mwd855a09e_d3d0_4ec6_97ed_33bcc30301d0_S1_TXTL_RNAdeg_F = 10; mwd855a09e_d3d0_4ec6_97ed_33bcc30301d0_S1_TXTL_RNAdeg_R = 2000;
  mw1b944b0a_5e80_4820_91af_54696c0fef10_S1: mw67de6ced_f31d_4369_afcc_25f5edd28d1b_S1 => mwba23949d_791e_4030_af40_3d1364463b1b_S1; mw1b944b0a_5e80_4820_91af_54696c0fef10_S1_TXTL_RNAdeg_F*mw67de6ced_f31d_4369_afcc_25f5edd28d1b_S1;
    mw1b944b0a_5e80_4820_91af_54696c0fef10_S1_TXTL_RNAdeg_F = 0.002777778;
  mwc97b54ff_94d5_4d4b_b86d_c1098d17d91c_S1: mw9a621603_6593_45ec_bed4_594305079e69_S1 + mwba23949d_791e_4030_af40_3d1364463b1b_S1 -> mw355cb317_ab27_45c2_9cab_1fcadb697671_S1; mwc97b54ff_94d5_4d4b_b86d_c1098d17d91c_S1_TXTL_RNAdeg_F*mw9a621603_6593_45ec_bed4_594305079e69_S1*mwba23949d_791e_4030_af40_3d1364463b1b_S1 - mwc97b54ff_94d5_4d4b_b86d_c1098d17d91c_S1_TXTL_RNAdeg_R*mw355cb317_ab27_45c2_9cab_1fcadb697671_S1;
    mwc97b54ff_94d5_4d4b_b86d_c1098d17d91c_S1_TXTL_RNAdeg_F = 10; mwc97b54ff_94d5_4d4b_b86d_c1098d17d91c_S1_TXTL_RNAdeg_R = 2000;
  mw8f8ae793_3eb1_4543_86be_fd3f46891edf_S1: mw355cb317_ab27_45c2_9cab_1fcadb697671_S1 => mwba23949d_791e_4030_af40_3d1364463b1b_S1 + Ribo_shared; mw8f8ae793_3eb1_4543_86be_fd3f46891edf_S1_TXTL_RNAdeg_F*mw355cb317_ab27_45c2_9cab_1fcadb697671_S1;
    mw8f8ae793_3eb1_4543_86be_fd3f46891edf_S1_TXTL_RNAdeg_F = 0.002777778;
  mwa3c80ce8_3f35_4896_851f_f001d31b13b1_S1: mw530ac336_2ef3_45fb_aec7_a62a9e38391f_S1 + mwba23949d_791e_4030_af40_3d1364463b1b_S1 -> mw9b159c86_d142_4a60_ab2b_d37cda688a87_S1; mwa3c80ce8_3f35_4896_851f_f001d31b13b1_S1_TXTL_RNAdeg_F*mw530ac336_2ef3_45fb_aec7_a62a9e38391f_S1*mwba23949d_791e_4030_af40_3d1364463b1b_S1 - mwa3c80ce8_3f35_4896_851f_f001d31b13b1_S1_TXTL_RNAdeg_R*mw9b159c86_d142_4a60_ab2b_d37cda688a87_S1;
    mwa3c80ce8_3f35_4896_851f_f001d31b13b1_S1_TXTL_RNAdeg_F = 10; mwa3c80ce8_3f35_4896_851f_f001d31b13b1_S1_TXTL_RNAdeg_R = 2000;
  mwcc627b8e_86a7_4999_9341_4f0cedf8c23a_S1: mw9b159c86_d142_4a60_ab2b_d37cda688a87_S1 => mwba23949d_791e_4030_af40_3d1364463b1b_S1 + AA_shared + 2 AGTP_shared + Ribo_shared; mwcc627b8e_86a7_4999_9341_4f0cedf8c23a_S1_TXTL_RNAdeg_F*mw9b159c86_d142_4a60_ab2b_d37cda688a87_S1;
    mwcc627b8e_86a7_4999_9341_4f0cedf8c23a_S1_TXTL_RNAdeg_F = 0.002777778;
  mw1af36775_1f35_45b6_975f_b76651538f69_S1: mw6dbb38ea_9535_4e0f_994a_bd22a99fca5b_S1 + mwba23949d_791e_4030_af40_3d1364463b1b_S1 -> mwf1ee08ae_b068_49d7_ade5_f51f12c1ec05_S1; mw1af36775_1f35_45b6_975f_b76651538f69_S1_TXTL_RNAdeg_F*mw6dbb38ea_9535_4e0f_994a_bd22a99fca5b_S1*mwba23949d_791e_4030_af40_3d1364463b1b_S1 - mw1af36775_1f35_45b6_975f_b76651538f69_S1_TXTL_RNAdeg_R*mwf1ee08ae_b068_49d7_ade5_f51f12c1ec05_S1;
    mw1af36775_1f35_45b6_975f_b76651538f69_S1_TXTL_RNAdeg_F = 10; mw1af36775_1f35_45b6_975f_b76651538f69_S1_TXTL_RNAdeg_R = 2000;
  mw8923a15b_5ca5_4b31_b3fa_71c7a85b40ba_S1: mwf1ee08ae_b068_49d7_ade5_f51f12c1ec05_S1 => mwba23949d_791e_4030_af40_3d1364463b1b_S1 + Ribo_shared; mw8923a15b_5ca5_4b31_b3fa_71c7a85b40ba_S1_TXTL_RNAdeg_F*mwf1ee08ae_b068_49d7_ade5_f51f12c1ec05_S1;
    mw8923a15b_5ca5_4b31_b3fa_71c7a85b40ba_S1_TXTL_RNAdeg_F = 0.002777778;
  mwccc63baa_1053_479b_9ff1_39d327e8333a_S1: mwdbc2f851_84c5_4bdb_aaea_3cb5011ee423_S1 + mwba23949d_791e_4030_af40_3d1364463b1b_S1 -> mw2ddd72e9_f2d7_4c2c_92bb_1b16a4bec3c7_S1; mwccc63baa_1053_479b_9ff1_39d327e8333a_S1_TXTL_RNAdeg_F*mwdbc2f851_84c5_4bdb_aaea_3cb5011ee423_S1*mwba23949d_791e_4030_af40_3d1364463b1b_S1 - mwccc63baa_1053_479b_9ff1_39d327e8333a_S1_TXTL_RNAdeg_R*mw2ddd72e9_f2d7_4c2c_92bb_1b16a4bec3c7_S1;
    mwccc63baa_1053_479b_9ff1_39d327e8333a_S1_TXTL_RNAdeg_F = 10; mwccc63baa_1053_479b_9ff1_39d327e8333a_S1_TXTL_RNAdeg_R = 2000;
  mwbab355ff_b4a0_46b1_8cd7_7fe19f6c6237_S1: mw2ddd72e9_f2d7_4c2c_92bb_1b16a4bec3c7_S1 => mwba23949d_791e_4030_af40_3d1364463b1b_S1 + AA_shared + Ribo_shared; mwbab355ff_b4a0_46b1_8cd7_7fe19f6c6237_S1_TXTL_RNAdeg_F*mw2ddd72e9_f2d7_4c2c_92bb_1b16a4bec3c7_S1;
    mwbab355ff_b4a0_46b1_8cd7_7fe19f6c6237_S1_TXTL_RNAdeg_F = 0.002777778;
  mw33c8c753_f1f0_4603_a47d_e608c3f4238c_S1: mwea3d3713_f0fa_4a8f_a9d7_9a5ee007ab40_S1 => mwf2409c5f_0a86_4c04_9876_f168e8b32062_S1; mw33c8c753_f1f0_4603_a47d_e608c3f4238c_S1_TXTL_PROT_deGFP_MATURATION*mwea3d3713_f0fa_4a8f_a9d7_9a5ee007ab40_S1;
    mw33c8c753_f1f0_4603_a47d_e608c3f4238c_S1_TXTL_PROT_deGFP_MATURATION = 0.002310491;
  mw0a8085cb_a37c_4ec8_b616_a3e137a85859_S1: mw42e76dc5_c5e4_4f95_a136_5c43cc795cf2_S1 + Ribo_shared -> mwe5b07a8d_e07f_431b_b9f2_0294173eb30a_S1; mw0a8085cb_a37c_4ec8_b616_a3e137a85859_S1_TXTL_UTR_UTR1_F*mw42e76dc5_c5e4_4f95_a136_5c43cc795cf2_S1*Ribo_shared - mw0a8085cb_a37c_4ec8_b616_a3e137a85859_S1_TXTL_UTR_UTR1_R*mwe5b07a8d_e07f_431b_b9f2_0294173eb30a_S1;
    mw0a8085cb_a37c_4ec8_b616_a3e137a85859_S1_TXTL_UTR_UTR1_F = 0.2; mw0a8085cb_a37c_4ec8_b616_a3e137a85859_S1_TXTL_UTR_UTR1_R = 4;
  mwadcc1921_bcf9_496f_b494_ae735cb96f05_S1: mw0d174461_baee_46e7_8095_f3e2a2ad1f78_S1 + RNAP_shared -> mwb7dbd2a4_a19a_4795_a2d9_3062ed3bf882_S1; mwadcc1921_bcf9_496f_b494_ae735cb96f05_S1_TXTL_PTET_RNAPbound_F*mw0d174461_baee_46e7_8095_f3e2a2ad1f78_S1*RNAP_shared - mwadcc1921_bcf9_496f_b494_ae735cb96f05_S1_TXTL_PTET_RNAPbound_R*mwb7dbd2a4_a19a_4795_a2d9_3062ed3bf882_S1;
    mwadcc1921_bcf9_496f_b494_ae735cb96f05_S1_TXTL_PTET_RNAPbound_F = 20; mwadcc1921_bcf9_496f_b494_ae735cb96f05_S1_TXTL_PTET_RNAPbound_R = 400;
  mwa7aef5c0_8f0c_48cc_b368_e528103e3618_S1: mwe572554a_ce14_4fd4_a85b_5636f59d2366_S1 => mwb7dbd2a4_a19a_4795_a2d9_3062ed3bf882_S1; mwa7aef5c0_8f0c_48cc_b368_e528103e3618_S1_TXTL_NTP_consumption*mwe572554a_ce14_4fd4_a85b_5636f59d2366_S1;
    mwa7aef5c0_8f0c_48cc_b368_e528103e3618_S1_TXTL_NTP_consumption = 0.7485294;
  mwf14b01c4_74b3_4280_b757_a500cd789302_S1: mw4d30a6f8_0163_4597_b826_a35deda9d8fa_S1 => RNAP_shared + mw0d174461_baee_46e7_8095_f3e2a2ad1f78_S1; mwf14b01c4_74b3_4280_b757_a500cd789302_S1_TXTL_RNAPBOUND_TERMINATION_RATE*mw4d30a6f8_0163_4597_b826_a35deda9d8fa_S1;
    mwf14b01c4_74b3_4280_b757_a500cd789302_S1_TXTL_RNAPBOUND_TERMINATION_RATE = 0.05;
  mw3fcf3d1e_2278_4250_9850_9551806333ad_S1: mwb7dbd2a4_a19a_4795_a2d9_3062ed3bf882_S1 + AGTP_shared -> mw8a4999e4_9ea3_4d4b_b838_bb5a8e0f3196_S1; mw3fcf3d1e_2278_4250_9850_9551806333ad_S1_TXTL_NTP_RNAP_F*mwb7dbd2a4_a19a_4795_a2d9_3062ed3bf882_S1*AGTP_shared - mw3fcf3d1e_2278_4250_9850_9551806333ad_S1_TXTL_NTP_RNAP_R*mw8a4999e4_9ea3_4d4b_b838_bb5a8e0f3196_S1;
    mw3fcf3d1e_2278_4250_9850_9551806333ad_S1_TXTL_NTP_RNAP_F = 1000; mw3fcf3d1e_2278_4250_9850_9551806333ad_S1_TXTL_NTP_RNAP_R = 120000000;
  mwc694e1fa_d43b_450d_91ac_d265858ae3ec_S1: mwb7dbd2a4_a19a_4795_a2d9_3062ed3bf882_S1 + CUTP_shared -> mw775bc89b_cbf8_4bb3_abbf_ae9cb27106ba_S1; mwc694e1fa_d43b_450d_91ac_d265858ae3ec_S1_TXTL_NTP_RNAP_F*mwb7dbd2a4_a19a_4795_a2d9_3062ed3bf882_S1*CUTP_shared - mwc694e1fa_d43b_450d_91ac_d265858ae3ec_S1_TXTL_NTP_RNAP_R*mw775bc89b_cbf8_4bb3_abbf_ae9cb27106ba_S1;
    mwc694e1fa_d43b_450d_91ac_d265858ae3ec_S1_TXTL_NTP_RNAP_F = 1000; mwc694e1fa_d43b_450d_91ac_d265858ae3ec_S1_TXTL_NTP_RNAP_R = 120000000;
  mwd9bdfed6_5f4b_4b46_91bb_38f915c2cc6a_S1: mw8a4999e4_9ea3_4d4b_b838_bb5a8e0f3196_S1 + CUTP_shared -> mwe572554a_ce14_4fd4_a85b_5636f59d2366_S1; mwd9bdfed6_5f4b_4b46_91bb_38f915c2cc6a_S1_TXTL_NTP_RNAP_F*mw8a4999e4_9ea3_4d4b_b838_bb5a8e0f3196_S1*CUTP_shared - mwd9bdfed6_5f4b_4b46_91bb_38f915c2cc6a_S1_TXTL_NTP_RNAP_R*mwe572554a_ce14_4fd4_a85b_5636f59d2366_S1;
    mwd9bdfed6_5f4b_4b46_91bb_38f915c2cc6a_S1_TXTL_NTP_RNAP_F = 1; mwd9bdfed6_5f4b_4b46_91bb_38f915c2cc6a_S1_TXTL_NTP_RNAP_R = 120000;
  mw38e78944_5fc4_486e_91fc_103472e2e3b2_S1: mw775bc89b_cbf8_4bb3_abbf_ae9cb27106ba_S1 + AGTP_shared -> mwe572554a_ce14_4fd4_a85b_5636f59d2366_S1; mw38e78944_5fc4_486e_91fc_103472e2e3b2_S1_TXTL_NTP_RNAP_F*mw775bc89b_cbf8_4bb3_abbf_ae9cb27106ba_S1*AGTP_shared - mw38e78944_5fc4_486e_91fc_103472e2e3b2_S1_TXTL_NTP_RNAP_R*mwe572554a_ce14_4fd4_a85b_5636f59d2366_S1;
    mw38e78944_5fc4_486e_91fc_103472e2e3b2_S1_TXTL_NTP_RNAP_F = 1; mw38e78944_5fc4_486e_91fc_103472e2e3b2_S1_TXTL_NTP_RNAP_R = 120000;
  mw87161df6_8d6c_4a3d_9ef9_fb84883d0cb8_S1: mwe572554a_ce14_4fd4_a85b_5636f59d2366_S1 => mw4d30a6f8_0163_4597_b826_a35deda9d8fa_S1 + mw42e76dc5_c5e4_4f95_a136_5c43cc795cf2_S1; mw87161df6_8d6c_4a3d_9ef9_fb84883d0cb8_S1_TXTL_transcription_rate1*mwe572554a_ce14_4fd4_a85b_5636f59d2366_S1;
    mw87161df6_8d6c_4a3d_9ef9_fb84883d0cb8_S1_TXTL_transcription_rate1 = 0.001470588;
  mw254fe677_70a8_47b3_8db3_a4d012988ecb_S1: mw0d174461_baee_46e7_8095_f3e2a2ad1f78_S1 + mw819d9282_fac6_4fcd_9eff_7ad6bf474c9d_S1 -> mw9aa44c71_b4b1_4469_933e_3843c038288c_S1; mw254fe677_70a8_47b3_8db3_a4d012988ecb_S1_ptet_sequestration_F*mw0d174461_baee_46e7_8095_f3e2a2ad1f78_S1*mw819d9282_fac6_4fcd_9eff_7ad6bf474c9d_S1 - mw254fe677_70a8_47b3_8db3_a4d012988ecb_S1_ptet_sequestration_R*mw9aa44c71_b4b1_4469_933e_3843c038288c_S1;
    mw254fe677_70a8_47b3_8db3_a4d012988ecb_S1_ptet_sequestration_F = 0.25; mw254fe677_70a8_47b3_8db3_a4d012988ecb_S1_ptet_sequestration_R = 0.000111;
  mwae863f5a_3c0c_4f88_b343_9978b1435f3d_S1: mwe5b07a8d_e07f_431b_b9f2_0294173eb30a_S1 + AA_shared -> mwf5ac9566_d5c1_41cc_8044_dfbd249b7db4_S1; mwae863f5a_3c0c_4f88_b343_9978b1435f3d_S1_TL_AA_F*mwe5b07a8d_e07f_431b_b9f2_0294173eb30a_S1*AA_shared - mwae863f5a_3c0c_4f88_b343_9978b1435f3d_S1_TL_AA_R*mwf5ac9566_d5c1_41cc_8044_dfbd249b7db4_S1;
    mwae863f5a_3c0c_4f88_b343_9978b1435f3d_S1_TL_AA_F = 300; mwae863f5a_3c0c_4f88_b343_9978b1435f3d_S1_TL_AA_R = 0.1;
  mw046f3557_355c_4f6e_8047_010690b1c022_S1: mwf5ac9566_d5c1_41cc_8044_dfbd249b7db4_S1 + 2 AGTP_shared -> mwe6fafbe3_3fb8_415b_a895_290cfb160af7_S1; mw046f3557_355c_4f6e_8047_010690b1c022_S1_TL_AGTP_F*mwf5ac9566_d5c1_41cc_8044_dfbd249b7db4_S1*AGTP_shared^2 - mw046f3557_355c_4f6e_8047_010690b1c022_S1_TL_AGTP_R*mwe6fafbe3_3fb8_415b_a895_290cfb160af7_S1;
    mw046f3557_355c_4f6e_8047_010690b1c022_S1_TL_AGTP_F = 30; mw046f3557_355c_4f6e_8047_010690b1c022_S1_TL_AGTP_R = 10;
  mw8d6564f3_cb8b_48b6_ae84_116a746321a9_S1: mwe6fafbe3_3fb8_415b_a895_290cfb160af7_S1 => mwcd9770ad_1e02_41e6_8799_08902c2e9ca1_S1; mw8d6564f3_cb8b_48b6_ae84_116a746321a9_S1_TXTL_TL_AA_consumption*mwe6fafbe3_3fb8_415b_a895_290cfb160af7_S1;
    mw8d6564f3_cb8b_48b6_ae84_116a746321a9_S1_TXTL_TL_AA_consumption = 0.024;
  mw352c0ac9_7853_45c7_9606_84119b701958_S1: mwe6fafbe3_3fb8_415b_a895_290cfb160af7_S1 => mwcd9770ad_1e02_41e6_8799_08902c2e9ca1_S1 + mwea3d3713_f0fa_4a8f_a9d7_9a5ee007ab40_S1; mw352c0ac9_7853_45c7_9606_84119b701958_S1_TXTL_TL_rate*mwe6fafbe3_3fb8_415b_a895_290cfb160af7_S1;
    mw352c0ac9_7853_45c7_9606_84119b701958_S1_TXTL_TL_rate = 0.012;
  mw0a346a00_5d8b_48cd_8497_cf9dcc9f78b5_S1: mwcd9770ad_1e02_41e6_8799_08902c2e9ca1_S1 => mw42e76dc5_c5e4_4f95_a136_5c43cc795cf2_S1 + Ribo_shared; mw0a346a00_5d8b_48cd_8497_cf9dcc9f78b5_S1_TXTL_RIBOBOUND_TERMINATION_RATE*mwcd9770ad_1e02_41e6_8799_08902c2e9ca1_S1;
    mw0a346a00_5d8b_48cd_8497_cf9dcc9f78b5_S1_TXTL_RIBOBOUND_TERMINATION_RATE = 50;
  mw1d8b5d9a_6616_43d5_92db_d9bd77098727_S1: mw42e76dc5_c5e4_4f95_a136_5c43cc795cf2_S1 + mwba23949d_791e_4030_af40_3d1364463b1b_S1 -> mw50ea95e1_8245_4105_a87b_d9317c07e4ae_S1; mw1d8b5d9a_6616_43d5_92db_d9bd77098727_S1_TXTL_RNAdeg_F*mw42e76dc5_c5e4_4f95_a136_5c43cc795cf2_S1*mwba23949d_791e_4030_af40_3d1364463b1b_S1 - mw1d8b5d9a_6616_43d5_92db_d9bd77098727_S1_TXTL_RNAdeg_R*mw50ea95e1_8245_4105_a87b_d9317c07e4ae_S1;
    mw1d8b5d9a_6616_43d5_92db_d9bd77098727_S1_TXTL_RNAdeg_F = 10; mw1d8b5d9a_6616_43d5_92db_d9bd77098727_S1_TXTL_RNAdeg_R = 2000;
  mwa46df03c_2bd9_4c61_bd50_3c3bfb7b048e_S1: mw50ea95e1_8245_4105_a87b_d9317c07e4ae_S1 => mwba23949d_791e_4030_af40_3d1364463b1b_S1; mwa46df03c_2bd9_4c61_bd50_3c3bfb7b048e_S1_TXTL_RNAdeg_F*mw50ea95e1_8245_4105_a87b_d9317c07e4ae_S1;
    mwa46df03c_2bd9_4c61_bd50_3c3bfb7b048e_S1_TXTL_RNAdeg_F = 0.002777778;
  mw64f66203_56ca_4c7b_a473_3b59bf36a8f0_S1: mwe5b07a8d_e07f_431b_b9f2_0294173eb30a_S1 + mwba23949d_791e_4030_af40_3d1364463b1b_S1 -> mwbde2d02f_2a62_44e2_8242_60f2e6a9f693_S1; mw64f66203_56ca_4c7b_a473_3b59bf36a8f0_S1_TXTL_RNAdeg_F*mwe5b07a8d_e07f_431b_b9f2_0294173eb30a_S1*mwba23949d_791e_4030_af40_3d1364463b1b_S1 - mw64f66203_56ca_4c7b_a473_3b59bf36a8f0_S1_TXTL_RNAdeg_R*mwbde2d02f_2a62_44e2_8242_60f2e6a9f693_S1;
    mw64f66203_56ca_4c7b_a473_3b59bf36a8f0_S1_TXTL_RNAdeg_F = 10; mw64f66203_56ca_4c7b_a473_3b59bf36a8f0_S1_TXTL_RNAdeg_R = 2000;
  mwd908b797_43cc_4fe3_afc6_5c2ad0fd6fb7_S1: mwbde2d02f_2a62_44e2_8242_60f2e6a9f693_S1 => mwba23949d_791e_4030_af40_3d1364463b1b_S1 + Ribo_shared; mwd908b797_43cc_4fe3_afc6_5c2ad0fd6fb7_S1_TXTL_RNAdeg_F*mwbde2d02f_2a62_44e2_8242_60f2e6a9f693_S1;
    mwd908b797_43cc_4fe3_afc6_5c2ad0fd6fb7_S1_TXTL_RNAdeg_F = 0.002777778;
  mw45e32f77_600c_4bfa_be6b_61a691ac4825_S1: mwe6fafbe3_3fb8_415b_a895_290cfb160af7_S1 + mwba23949d_791e_4030_af40_3d1364463b1b_S1 -> mwe1e51d10_9cbc_475f_8f91_b16c0fe754c2_S1; mw45e32f77_600c_4bfa_be6b_61a691ac4825_S1_TXTL_RNAdeg_F*mwe6fafbe3_3fb8_415b_a895_290cfb160af7_S1*mwba23949d_791e_4030_af40_3d1364463b1b_S1 - mw45e32f77_600c_4bfa_be6b_61a691ac4825_S1_TXTL_RNAdeg_R*mwe1e51d10_9cbc_475f_8f91_b16c0fe754c2_S1;
    mw45e32f77_600c_4bfa_be6b_61a691ac4825_S1_TXTL_RNAdeg_F = 10; mw45e32f77_600c_4bfa_be6b_61a691ac4825_S1_TXTL_RNAdeg_R = 2000;
  mw96c500a3_466d_4a0c_b1c8_37a4f88a97bf_S1: mwe1e51d10_9cbc_475f_8f91_b16c0fe754c2_S1 => mwba23949d_791e_4030_af40_3d1364463b1b_S1 + AA_shared + 2 AGTP_shared + Ribo_shared; mw96c500a3_466d_4a0c_b1c8_37a4f88a97bf_S1_TXTL_RNAdeg_F*mwe1e51d10_9cbc_475f_8f91_b16c0fe754c2_S1;
    mw96c500a3_466d_4a0c_b1c8_37a4f88a97bf_S1_TXTL_RNAdeg_F = 0.002777778;
  mw7b19ed98_b513_4cc4_9cde_68f25750300d_S1: mwcd9770ad_1e02_41e6_8799_08902c2e9ca1_S1 + mwba23949d_791e_4030_af40_3d1364463b1b_S1 -> mwbf28b4a3_1ff6_4944_8ada_2bb610b6956e_S1; mw7b19ed98_b513_4cc4_9cde_68f25750300d_S1_TXTL_RNAdeg_F*mwcd9770ad_1e02_41e6_8799_08902c2e9ca1_S1*mwba23949d_791e_4030_af40_3d1364463b1b_S1 - mw7b19ed98_b513_4cc4_9cde_68f25750300d_S1_TXTL_RNAdeg_R*mwbf28b4a3_1ff6_4944_8ada_2bb610b6956e_S1;
    mw7b19ed98_b513_4cc4_9cde_68f25750300d_S1_TXTL_RNAdeg_F = 10; mw7b19ed98_b513_4cc4_9cde_68f25750300d_S1_TXTL_RNAdeg_R = 2000;
  mw933a0de6_03a4_40ee_b046_e9921fa80fdd_S1: mwbf28b4a3_1ff6_4944_8ada_2bb610b6956e_S1 => mwba23949d_791e_4030_af40_3d1364463b1b_S1 + Ribo_shared; mw933a0de6_03a4_40ee_b046_e9921fa80fdd_S1_TXTL_RNAdeg_F*mwbf28b4a3_1ff6_4944_8ada_2bb610b6956e_S1;
    mw933a0de6_03a4_40ee_b046_e9921fa80fdd_S1_TXTL_RNAdeg_F = 0.002777778;
  mwa82efff1_b77f_433a_9ac4_2e985626923f_S1: mwf5ac9566_d5c1_41cc_8044_dfbd249b7db4_S1 + mwba23949d_791e_4030_af40_3d1364463b1b_S1 -> mw210a17fc_e589_4813_b9fb_206b8b57d1e1_S1; mwa82efff1_b77f_433a_9ac4_2e985626923f_S1_TXTL_RNAdeg_F*mwf5ac9566_d5c1_41cc_8044_dfbd249b7db4_S1*mwba23949d_791e_4030_af40_3d1364463b1b_S1 - mwa82efff1_b77f_433a_9ac4_2e985626923f_S1_TXTL_RNAdeg_R*mw210a17fc_e589_4813_b9fb_206b8b57d1e1_S1;
    mwa82efff1_b77f_433a_9ac4_2e985626923f_S1_TXTL_RNAdeg_F = 10; mwa82efff1_b77f_433a_9ac4_2e985626923f_S1_TXTL_RNAdeg_R = 2000;
  mw2ef81203_bcca_4f06_9a33_39c6d8daa350_S1: mw210a17fc_e589_4813_b9fb_206b8b57d1e1_S1 => mwba23949d_791e_4030_af40_3d1364463b1b_S1 + AA_shared + Ribo_shared; mw2ef81203_bcca_4f06_9a33_39c6d8daa350_S1_TXTL_RNAdeg_F*mw210a17fc_e589_4813_b9fb_206b8b57d1e1_S1;
    mw2ef81203_bcca_4f06_9a33_39c6d8daa350_S1_TXTL_RNAdeg_F = 0.002777778;
  mw1b9080f1_fce6_4fd8_94aa_833805b25467_S1: AGTP_shared => mw106c5d49_690a_49d3_bd12_02aa9eb140f8_S1; mw8cf83496_9f55_4eca_9dc2_b30c8e67d7bd_S1*AGTP_shared;
  mw79d8dcb2_e075_4db1_9747_f7b2806512a5_S2: mwbb351068_dafa_4d93_a901_93d2c06faf33_S2 + 2 mw02226291_b527_4a64_b137_ff8b4534ddfd_S2 -> mwc4cf8413_2cf2_42e3_87e0_8e30b13a4712_S2; mw79d8dcb2_e075_4db1_9747_f7b2806512a5_S2_TXTL_INDUCER_TETR_ATC_F*mwbb351068_dafa_4d93_a901_93d2c06faf33_S2*mw02226291_b527_4a64_b137_ff8b4534ddfd_S2^2 - mw79d8dcb2_e075_4db1_9747_f7b2806512a5_S2_TXTL_INDUCER_TETR_ATC_R*mwc4cf8413_2cf2_42e3_87e0_8e30b13a4712_S2;
    mw79d8dcb2_e075_4db1_9747_f7b2806512a5_S2_TXTL_INDUCER_TETR_ATC_F = 1e-5; mw79d8dcb2_e075_4db1_9747_f7b2806512a5_S2_TXTL_INDUCER_TETR_ATC_R = 0.1;
  mw04fec241_b2ab_4809_8255_316687f8f15a_S2: 2 mw5198d751_3325_4e82_b294_b7a3400f61c3_S2 -> mwbb351068_dafa_4d93_a901_93d2c06faf33_S2; mw04fec241_b2ab_4809_8255_316687f8f15a_S2_kf*mw5198d751_3325_4e82_b294_b7a3400f61c3_S2^2 - mw04fec241_b2ab_4809_8255_316687f8f15a_S2_kr*mwbb351068_dafa_4d93_a901_93d2c06faf33_S2;
    mw04fec241_b2ab_4809_8255_316687f8f15a_S2_kf = 1; mw04fec241_b2ab_4809_8255_316687f8f15a_S2_kr = 1;
  mwcc0895bd_b5ba_4a14_a659_6d6e36df38f1_S2: mwe77d1e37_93b5_4f66_8099_95cd490e3ddf_S2 + Ribo_shared -> mw795cf463_fd4f_41cc_89ce_3f1b69e1b881_S2; mwcc0895bd_b5ba_4a14_a659_6d6e36df38f1_S2_TXTL_UTR_UTR1_F*mwe77d1e37_93b5_4f66_8099_95cd490e3ddf_S2*Ribo_shared - mwcc0895bd_b5ba_4a14_a659_6d6e36df38f1_S2_TXTL_UTR_UTR1_R*mw795cf463_fd4f_41cc_89ce_3f1b69e1b881_S2;
    mwcc0895bd_b5ba_4a14_a659_6d6e36df38f1_S2_TXTL_UTR_UTR1_F = 0.2; mwcc0895bd_b5ba_4a14_a659_6d6e36df38f1_S2_TXTL_UTR_UTR1_R = 4;
  mwb3f0e3af_da8f_4f01_9c10_b76675ba1546_S2: mw5c9e180e_f220_44aa_9761_0a564e035947_S2 + RNAP_shared -> mwfde5a09e_20af_442c_a6b7_7d5ef7b44e44_S2; mwb3f0e3af_da8f_4f01_9c10_b76675ba1546_S2_TXTL_PTET_RNAPbound_F*mw5c9e180e_f220_44aa_9761_0a564e035947_S2*RNAP_shared - mwb3f0e3af_da8f_4f01_9c10_b76675ba1546_S2_TXTL_PTET_RNAPbound_R*mwfde5a09e_20af_442c_a6b7_7d5ef7b44e44_S2;
    mwb3f0e3af_da8f_4f01_9c10_b76675ba1546_S2_TXTL_PTET_RNAPbound_F = 20; mwb3f0e3af_da8f_4f01_9c10_b76675ba1546_S2_TXTL_PTET_RNAPbound_R = 400;
  mwf11fa2ad_c8ad_44d1_a04d_5b0a417cd881_S2: mw1b36ce54_1b00_4e47_b4f4_dfb9d4762260_S2 => mwfde5a09e_20af_442c_a6b7_7d5ef7b44e44_S2; mwf11fa2ad_c8ad_44d1_a04d_5b0a417cd881_S2_TXTL_NTP_consumption*mw1b36ce54_1b00_4e47_b4f4_dfb9d4762260_S2;
    mwf11fa2ad_c8ad_44d1_a04d_5b0a417cd881_S2_TXTL_NTP_consumption = 0.7487705;
  mw966b06a8_429a_4168_905d_e9b90c80e226_S2: mw40490ff7_3664_414d_baf7_c35c17c243fd_S2 => RNAP_shared + mw5c9e180e_f220_44aa_9761_0a564e035947_S2; mw966b06a8_429a_4168_905d_e9b90c80e226_S2_TXTL_RNAPBOUND_TERMINATION_RATE*mw40490ff7_3664_414d_baf7_c35c17c243fd_S2;
    mw966b06a8_429a_4168_905d_e9b90c80e226_S2_TXTL_RNAPBOUND_TERMINATION_RATE = 0.05;
  mwa8036764_9730_4e54_abea_d70e0410a362_S2: mwfde5a09e_20af_442c_a6b7_7d5ef7b44e44_S2 + AGTP_shared -> mwd81748d9_8883_4afd_a274_426e7cac0e85_S2; mwa8036764_9730_4e54_abea_d70e0410a362_S2_TXTL_NTP_RNAP_F*mwfde5a09e_20af_442c_a6b7_7d5ef7b44e44_S2*AGTP_shared - mwa8036764_9730_4e54_abea_d70e0410a362_S2_TXTL_NTP_RNAP_R*mwd81748d9_8883_4afd_a274_426e7cac0e85_S2;
    mwa8036764_9730_4e54_abea_d70e0410a362_S2_TXTL_NTP_RNAP_F = 1000; mwa8036764_9730_4e54_abea_d70e0410a362_S2_TXTL_NTP_RNAP_R = 120000000;
  mw1e5411e8_8a6b_422f_a49a_ea52eb66c78a_S2: mwfde5a09e_20af_442c_a6b7_7d5ef7b44e44_S2 + CUTP_shared -> mw2c39ce50_3452_4cb7_80f0_30dfa1464a95_S2; mw1e5411e8_8a6b_422f_a49a_ea52eb66c78a_S2_TXTL_NTP_RNAP_F*mwfde5a09e_20af_442c_a6b7_7d5ef7b44e44_S2*CUTP_shared - mw1e5411e8_8a6b_422f_a49a_ea52eb66c78a_S2_TXTL_NTP_RNAP_R*mw2c39ce50_3452_4cb7_80f0_30dfa1464a95_S2;
    mw1e5411e8_8a6b_422f_a49a_ea52eb66c78a_S2_TXTL_NTP_RNAP_F = 1000; mw1e5411e8_8a6b_422f_a49a_ea52eb66c78a_S2_TXTL_NTP_RNAP_R = 120000000;
  mw6f420cdd_d7b1_4c49_87ea_dacf3d627f3f_S2: mwd81748d9_8883_4afd_a274_426e7cac0e85_S2 + CUTP_shared -> mw1b36ce54_1b00_4e47_b4f4_dfb9d4762260_S2; mw6f420cdd_d7b1_4c49_87ea_dacf3d627f3f_S2_TXTL_NTP_RNAP_F*mwd81748d9_8883_4afd_a274_426e7cac0e85_S2*CUTP_shared - mw6f420cdd_d7b1_4c49_87ea_dacf3d627f3f_S2_TXTL_NTP_RNAP_R*mw1b36ce54_1b00_4e47_b4f4_dfb9d4762260_S2;
    mw6f420cdd_d7b1_4c49_87ea_dacf3d627f3f_S2_TXTL_NTP_RNAP_F = 1; mw6f420cdd_d7b1_4c49_87ea_dacf3d627f3f_S2_TXTL_NTP_RNAP_R = 120000;
  mw2c378739_e0a8_4f2f_bd5d_6e1cdf1c4040_S2: mw2c39ce50_3452_4cb7_80f0_30dfa1464a95_S2 + AGTP_shared -> mw1b36ce54_1b00_4e47_b4f4_dfb9d4762260_S2; mw2c378739_e0a8_4f2f_bd5d_6e1cdf1c4040_S2_TXTL_NTP_RNAP_F*mw2c39ce50_3452_4cb7_80f0_30dfa1464a95_S2*AGTP_shared - mw2c378739_e0a8_4f2f_bd5d_6e1cdf1c4040_S2_TXTL_NTP_RNAP_R*mw1b36ce54_1b00_4e47_b4f4_dfb9d4762260_S2;
    mw2c378739_e0a8_4f2f_bd5d_6e1cdf1c4040_S2_TXTL_NTP_RNAP_F = 1; mw2c378739_e0a8_4f2f_bd5d_6e1cdf1c4040_S2_TXTL_NTP_RNAP_R = 120000;
  mw7ab55f4f_2343_4497_a092_9eba464a6a9d_S2: mw1b36ce54_1b00_4e47_b4f4_dfb9d4762260_S2 => mw40490ff7_3664_414d_baf7_c35c17c243fd_S2 + mwe77d1e37_93b5_4f66_8099_95cd490e3ddf_S2; mw7ab55f4f_2343_4497_a092_9eba464a6a9d_S2_TXTL_transcription_rate1*mw1b36ce54_1b00_4e47_b4f4_dfb9d4762260_S2;
    mw7ab55f4f_2343_4497_a092_9eba464a6a9d_S2_TXTL_transcription_rate1 = 0.001229508;
  mwdfcf0afe_1b13_42cb_bdb6_c018d212ac10_S2: mw5c9e180e_f220_44aa_9761_0a564e035947_S2 + mwbb351068_dafa_4d93_a901_93d2c06faf33_S2 -> mwfb3b1659_aef9_444d_a1b2_c3c5332699d2_S2; mwdfcf0afe_1b13_42cb_bdb6_c018d212ac10_S2_ptet_sequestration_F*mw5c9e180e_f220_44aa_9761_0a564e035947_S2*mwbb351068_dafa_4d93_a901_93d2c06faf33_S2 - mwdfcf0afe_1b13_42cb_bdb6_c018d212ac10_S2_ptet_sequestration_R*mwfb3b1659_aef9_444d_a1b2_c3c5332699d2_S2;
    mwdfcf0afe_1b13_42cb_bdb6_c018d212ac10_S2_ptet_sequestration_F = 0.25; mwdfcf0afe_1b13_42cb_bdb6_c018d212ac10_S2_ptet_sequestration_R = 0.000111;
  mwd8e9ea2a_103c_4c1c_b0c3_d4010b328d2c_S2: mw795cf463_fd4f_41cc_89ce_3f1b69e1b881_S2 + AA_shared -> mw8ff0b227_bb24_4447_926c_abaa9d22b9d0_S2; mwd8e9ea2a_103c_4c1c_b0c3_d4010b328d2c_S2_TL_AA_F*mw795cf463_fd4f_41cc_89ce_3f1b69e1b881_S2*AA_shared - mwd8e9ea2a_103c_4c1c_b0c3_d4010b328d2c_S2_TL_AA_R*mw8ff0b227_bb24_4447_926c_abaa9d22b9d0_S2;
    mwd8e9ea2a_103c_4c1c_b0c3_d4010b328d2c_S2_TL_AA_F = 300; mwd8e9ea2a_103c_4c1c_b0c3_d4010b328d2c_S2_TL_AA_R = 0.1;
  mwab4dce27_f199_420f_9b02_db0f75bcb3c7_S2: mw8ff0b227_bb24_4447_926c_abaa9d22b9d0_S2 + 2 AGTP_shared -> mw102b2c2d_5476_45e7_8084_d29b2e6e4308_S2; mwab4dce27_f199_420f_9b02_db0f75bcb3c7_S2_TL_AGTP_F*mw8ff0b227_bb24_4447_926c_abaa9d22b9d0_S2*AGTP_shared^2 - mwab4dce27_f199_420f_9b02_db0f75bcb3c7_S2_TL_AGTP_R*mw102b2c2d_5476_45e7_8084_d29b2e6e4308_S2;
    mwab4dce27_f199_420f_9b02_db0f75bcb3c7_S2_TL_AGTP_F = 30; mwab4dce27_f199_420f_9b02_db0f75bcb3c7_S2_TL_AGTP_R = 10;
  mw3817aebd_e483_46e8_9fa2_f036d592149f_S2: mw102b2c2d_5476_45e7_8084_d29b2e6e4308_S2 => mwc2bcbcb9_8ce4_4c57_b0ff_f67364a4dbf0_S2; mw3817aebd_e483_46e8_9fa2_f036d592149f_S2_TXTL_TL_AA_consumption*mw102b2c2d_5476_45e7_8084_d29b2e6e4308_S2;
    mw3817aebd_e483_46e8_9fa2_f036d592149f_S2_TXTL_TL_AA_consumption = 0.03;
  mw86f540af_62e6_43b6_9b7c_7387e5f39a6e_S2: mw102b2c2d_5476_45e7_8084_d29b2e6e4308_S2 => mwc2bcbcb9_8ce4_4c57_b0ff_f67364a4dbf0_S2 + mw5198d751_3325_4e82_b294_b7a3400f61c3_S2; mw86f540af_62e6_43b6_9b7c_7387e5f39a6e_S2_TXTL_TL_rate*mw102b2c2d_5476_45e7_8084_d29b2e6e4308_S2;
    mw86f540af_62e6_43b6_9b7c_7387e5f39a6e_S2_TXTL_TL_rate = 0.01;
  mw4be48152_e8ed_44ae_95ee_85cb9955d4ed_S2: mwc2bcbcb9_8ce4_4c57_b0ff_f67364a4dbf0_S2 => mwe77d1e37_93b5_4f66_8099_95cd490e3ddf_S2 + Ribo_shared; mw4be48152_e8ed_44ae_95ee_85cb9955d4ed_S2_TXTL_RIBOBOUND_TERMINATION_RATE*mwc2bcbcb9_8ce4_4c57_b0ff_f67364a4dbf0_S2;
    mw4be48152_e8ed_44ae_95ee_85cb9955d4ed_S2_TXTL_RIBOBOUND_TERMINATION_RATE = 50;
  mwe2a194b9_a07a_45d2_b723_53d4cdd8e8eb_S2: mwe77d1e37_93b5_4f66_8099_95cd490e3ddf_S2 + mw31a20aa1_fa9a_47b6_9cb9_fac8188e6cee_S2 -> mw1d8e5eda_2167_44a7_8ec7_a462d5da3a52_S2; mwe2a194b9_a07a_45d2_b723_53d4cdd8e8eb_S2_TXTL_RNAdeg_F*mwe77d1e37_93b5_4f66_8099_95cd490e3ddf_S2*mw31a20aa1_fa9a_47b6_9cb9_fac8188e6cee_S2 - mwe2a194b9_a07a_45d2_b723_53d4cdd8e8eb_S2_TXTL_RNAdeg_R*mw1d8e5eda_2167_44a7_8ec7_a462d5da3a52_S2;
    mwe2a194b9_a07a_45d2_b723_53d4cdd8e8eb_S2_TXTL_RNAdeg_F = 10; mwe2a194b9_a07a_45d2_b723_53d4cdd8e8eb_S2_TXTL_RNAdeg_R = 2000;
  mwa4cad143_61cd_4e55_a1e2_46a7143d0177_S2: mw1d8e5eda_2167_44a7_8ec7_a462d5da3a52_S2 => mw31a20aa1_fa9a_47b6_9cb9_fac8188e6cee_S2; mwa4cad143_61cd_4e55_a1e2_46a7143d0177_S2_TXTL_RNAdeg_F*mw1d8e5eda_2167_44a7_8ec7_a462d5da3a52_S2;
    mwa4cad143_61cd_4e55_a1e2_46a7143d0177_S2_TXTL_RNAdeg_F = 0.002777778;
  mwb619efce_c55f_4388_8926_9c9a055b3987_S2: mw795cf463_fd4f_41cc_89ce_3f1b69e1b881_S2 + mw31a20aa1_fa9a_47b6_9cb9_fac8188e6cee_S2 -> mw70a16be7_46d8_4bef_ae5c_31719f8850a6_S2; mwb619efce_c55f_4388_8926_9c9a055b3987_S2_TXTL_RNAdeg_F*mw795cf463_fd4f_41cc_89ce_3f1b69e1b881_S2*mw31a20aa1_fa9a_47b6_9cb9_fac8188e6cee_S2 - mwb619efce_c55f_4388_8926_9c9a055b3987_S2_TXTL_RNAdeg_R*mw70a16be7_46d8_4bef_ae5c_31719f8850a6_S2;
    mwb619efce_c55f_4388_8926_9c9a055b3987_S2_TXTL_RNAdeg_F = 10; mwb619efce_c55f_4388_8926_9c9a055b3987_S2_TXTL_RNAdeg_R = 2000;
  mw25c9d764_07a0_4e65_92d6_7e7291a4b8e8_S2: mw70a16be7_46d8_4bef_ae5c_31719f8850a6_S2 => mw31a20aa1_fa9a_47b6_9cb9_fac8188e6cee_S2 + Ribo_shared; mw25c9d764_07a0_4e65_92d6_7e7291a4b8e8_S2_TXTL_RNAdeg_F*mw70a16be7_46d8_4bef_ae5c_31719f8850a6_S2;
    mw25c9d764_07a0_4e65_92d6_7e7291a4b8e8_S2_TXTL_RNAdeg_F = 0.002777778;
  mwdb80a497_53ad_4b3d_82eb_de6ecb7483c0_S2: mw102b2c2d_5476_45e7_8084_d29b2e6e4308_S2 + mw31a20aa1_fa9a_47b6_9cb9_fac8188e6cee_S2 -> mw69102541_2699_480c_88ff_fdd0039848cb_S2; mwdb80a497_53ad_4b3d_82eb_de6ecb7483c0_S2_TXTL_RNAdeg_F*mw102b2c2d_5476_45e7_8084_d29b2e6e4308_S2*mw31a20aa1_fa9a_47b6_9cb9_fac8188e6cee_S2 - mwdb80a497_53ad_4b3d_82eb_de6ecb7483c0_S2_TXTL_RNAdeg_R*mw69102541_2699_480c_88ff_fdd0039848cb_S2;
    mwdb80a497_53ad_4b3d_82eb_de6ecb7483c0_S2_TXTL_RNAdeg_F = 10; mwdb80a497_53ad_4b3d_82eb_de6ecb7483c0_S2_TXTL_RNAdeg_R = 2000;
  mw039541f5_9a22_4e8c_82f9_029e768f1ef9_S2: mw69102541_2699_480c_88ff_fdd0039848cb_S2 => mw31a20aa1_fa9a_47b6_9cb9_fac8188e6cee_S2 + AA_shared + 2 AGTP_shared + Ribo_shared; mw039541f5_9a22_4e8c_82f9_029e768f1ef9_S2_TXTL_RNAdeg_F*mw69102541_2699_480c_88ff_fdd0039848cb_S2;
    mw039541f5_9a22_4e8c_82f9_029e768f1ef9_S2_TXTL_RNAdeg_F = 0.002777778;
  mw70fe9eca_4050_4d5a_ae39_cf834d0d224e_S2: mwc2bcbcb9_8ce4_4c57_b0ff_f67364a4dbf0_S2 + mw31a20aa1_fa9a_47b6_9cb9_fac8188e6cee_S2 -> mwf2e03f7f_416f_404f_bc58_16909c7dea00_S2; mw70fe9eca_4050_4d5a_ae39_cf834d0d224e_S2_TXTL_RNAdeg_F*mwc2bcbcb9_8ce4_4c57_b0ff_f67364a4dbf0_S2*mw31a20aa1_fa9a_47b6_9cb9_fac8188e6cee_S2 - mw70fe9eca_4050_4d5a_ae39_cf834d0d224e_S2_TXTL_RNAdeg_R*mwf2e03f7f_416f_404f_bc58_16909c7dea00_S2;
    mw70fe9eca_4050_4d5a_ae39_cf834d0d224e_S2_TXTL_RNAdeg_F = 10; mw70fe9eca_4050_4d5a_ae39_cf834d0d224e_S2_TXTL_RNAdeg_R = 2000;
  mw717cb6af_4bf2_41ae_b5a1_b4aab5741a3f_S2: mwf2e03f7f_416f_404f_bc58_16909c7dea00_S2 => mw31a20aa1_fa9a_47b6_9cb9_fac8188e6cee_S2 + Ribo_shared; mw717cb6af_4bf2_41ae_b5a1_b4aab5741a3f_S2_TXTL_RNAdeg_F*mwf2e03f7f_416f_404f_bc58_16909c7dea00_S2;
    mw717cb6af_4bf2_41ae_b5a1_b4aab5741a3f_S2_TXTL_RNAdeg_F = 0.002777778;
  mw50db268e_6acc_4639_a5b6_1c30e51415ed_S2: mw8ff0b227_bb24_4447_926c_abaa9d22b9d0_S2 + mw31a20aa1_fa9a_47b6_9cb9_fac8188e6cee_S2 -> mwbfaa6d8c_0cd6_4498_ba96_45b93e05ccca_S2; mw50db268e_6acc_4639_a5b6_1c30e51415ed_S2_TXTL_RNAdeg_F*mw8ff0b227_bb24_4447_926c_abaa9d22b9d0_S2*mw31a20aa1_fa9a_47b6_9cb9_fac8188e6cee_S2 - mw50db268e_6acc_4639_a5b6_1c30e51415ed_S2_TXTL_RNAdeg_R*mwbfaa6d8c_0cd6_4498_ba96_45b93e05ccca_S2;
    mw50db268e_6acc_4639_a5b6_1c30e51415ed_S2_TXTL_RNAdeg_F = 10; mw50db268e_6acc_4639_a5b6_1c30e51415ed_S2_TXTL_RNAdeg_R = 2000;
  mw6d133498_a914_47b0_85db_4eef6ee43479_S2: mwbfaa6d8c_0cd6_4498_ba96_45b93e05ccca_S2 => mw31a20aa1_fa9a_47b6_9cb9_fac8188e6cee_S2 + AA_shared + Ribo_shared; mw6d133498_a914_47b0_85db_4eef6ee43479_S2_TXTL_RNAdeg_F*mwbfaa6d8c_0cd6_4498_ba96_45b93e05ccca_S2;
    mw6d133498_a914_47b0_85db_4eef6ee43479_S2_TXTL_RNAdeg_F = 0.002777778;
  mweb609a9d_005b_442a_ba00_efbec3c4c10f_S2: mwb188a99a_78b9_4cb3_9c62_0ef2b5ff33b2_S2 => mw753ce16e_8fff_4214_87ed_9c4b0dc131f3_S2; mweb609a9d_005b_442a_ba00_efbec3c4c10f_S2_TXTL_PROT_deGFP_MATURATION*mwb188a99a_78b9_4cb3_9c62_0ef2b5ff33b2_S2;
    mweb609a9d_005b_442a_ba00_efbec3c4c10f_S2_TXTL_PROT_deGFP_MATURATION = 0.002310491;
  mw933e3d35_3803_4057_8a35_62361f0d6851_S2: mw187ab98e_4dd8_4b90_ab91_b3e1a527f317_S2 + Ribo_shared -> mw887bf55f_b49f_45f3_ae60_41e620e6df45_S2; mw933e3d35_3803_4057_8a35_62361f0d6851_S2_TXTL_UTR_UTR1_F*mw187ab98e_4dd8_4b90_ab91_b3e1a527f317_S2*Ribo_shared - mw933e3d35_3803_4057_8a35_62361f0d6851_S2_TXTL_UTR_UTR1_R*mw887bf55f_b49f_45f3_ae60_41e620e6df45_S2;
    mw933e3d35_3803_4057_8a35_62361f0d6851_S2_TXTL_UTR_UTR1_F = 0.2; mw933e3d35_3803_4057_8a35_62361f0d6851_S2_TXTL_UTR_UTR1_R = 4;
  mw9fc68b79_c7e6_4295_96e3_efe1e96f9cb5_S2: mwe894cfb7_4141_407c_b6a7_acf8c54db1dd_S2 + RNAP_shared -> mw826e029a_3f41_423e_bbe4_fcbb1bcf7832_S2; mw9fc68b79_c7e6_4295_96e3_efe1e96f9cb5_S2_TXTL_PTET_RNAPbound_F*mwe894cfb7_4141_407c_b6a7_acf8c54db1dd_S2*RNAP_shared - mw9fc68b79_c7e6_4295_96e3_efe1e96f9cb5_S2_TXTL_PTET_RNAPbound_R*mw826e029a_3f41_423e_bbe4_fcbb1bcf7832_S2;
    mw9fc68b79_c7e6_4295_96e3_efe1e96f9cb5_S2_TXTL_PTET_RNAPbound_F = 20; mw9fc68b79_c7e6_4295_96e3_efe1e96f9cb5_S2_TXTL_PTET_RNAPbound_R = 400;
  mw8f42659f_3b44_4ab0_a563_032509c8e7e3_S2: mw9da2427f_d19a_44bb_b27f_a2153d727414_S2 => mw826e029a_3f41_423e_bbe4_fcbb1bcf7832_S2; mw8f42659f_3b44_4ab0_a563_032509c8e7e3_S2_TXTL_NTP_consumption*mw9da2427f_d19a_44bb_b27f_a2153d727414_S2;
    mw8f42659f_3b44_4ab0_a563_032509c8e7e3_S2_TXTL_NTP_consumption = 0.7485294;
  mw3f5e39e1_647e_4025_9592_3574f4cdf8b9_S2: mw347f7506_272d_4c00_a888_16664b846f5a_S2 => RNAP_shared + mwe894cfb7_4141_407c_b6a7_acf8c54db1dd_S2; mw3f5e39e1_647e_4025_9592_3574f4cdf8b9_S2_TXTL_RNAPBOUND_TERMINATION_RATE*mw347f7506_272d_4c00_a888_16664b846f5a_S2;
    mw3f5e39e1_647e_4025_9592_3574f4cdf8b9_S2_TXTL_RNAPBOUND_TERMINATION_RATE = 0.05;
  mwa1a88959_a485_44d5_abd1_e445dc10fa89_S2: mw826e029a_3f41_423e_bbe4_fcbb1bcf7832_S2 + AGTP_shared -> mwb4b15454_6c0d_4b4a_834e_f17d55ba56a9_S2; mwa1a88959_a485_44d5_abd1_e445dc10fa89_S2_TXTL_NTP_RNAP_F*mw826e029a_3f41_423e_bbe4_fcbb1bcf7832_S2*AGTP_shared - mwa1a88959_a485_44d5_abd1_e445dc10fa89_S2_TXTL_NTP_RNAP_R*mwb4b15454_6c0d_4b4a_834e_f17d55ba56a9_S2;
    mwa1a88959_a485_44d5_abd1_e445dc10fa89_S2_TXTL_NTP_RNAP_F = 1000; mwa1a88959_a485_44d5_abd1_e445dc10fa89_S2_TXTL_NTP_RNAP_R = 120000000;
  mw69e3ac18_1d6c_45cf_b4c3_d3e21b6f5cc0_S2: mw826e029a_3f41_423e_bbe4_fcbb1bcf7832_S2 + CUTP_shared -> mw91d91e93_cbcf_4f84_a7d0_31a9f3f5e36e_S2; mw69e3ac18_1d6c_45cf_b4c3_d3e21b6f5cc0_S2_TXTL_NTP_RNAP_F*mw826e029a_3f41_423e_bbe4_fcbb1bcf7832_S2*CUTP_shared - mw69e3ac18_1d6c_45cf_b4c3_d3e21b6f5cc0_S2_TXTL_NTP_RNAP_R*mw91d91e93_cbcf_4f84_a7d0_31a9f3f5e36e_S2;
    mw69e3ac18_1d6c_45cf_b4c3_d3e21b6f5cc0_S2_TXTL_NTP_RNAP_F = 1000; mw69e3ac18_1d6c_45cf_b4c3_d3e21b6f5cc0_S2_TXTL_NTP_RNAP_R = 120000000;
  mwa1b87b9b_0725_4909_b1b2_0e61d6bed826_S2: mwb4b15454_6c0d_4b4a_834e_f17d55ba56a9_S2 + CUTP_shared -> mw9da2427f_d19a_44bb_b27f_a2153d727414_S2; mwa1b87b9b_0725_4909_b1b2_0e61d6bed826_S2_TXTL_NTP_RNAP_F*mwb4b15454_6c0d_4b4a_834e_f17d55ba56a9_S2*CUTP_shared - mwa1b87b9b_0725_4909_b1b2_0e61d6bed826_S2_TXTL_NTP_RNAP_R*mw9da2427f_d19a_44bb_b27f_a2153d727414_S2;
    mwa1b87b9b_0725_4909_b1b2_0e61d6bed826_S2_TXTL_NTP_RNAP_F = 1; mwa1b87b9b_0725_4909_b1b2_0e61d6bed826_S2_TXTL_NTP_RNAP_R = 120000;
  mw2569ac6d_fdcd_432e_902c_4cf408daa6ef_S2: mw91d91e93_cbcf_4f84_a7d0_31a9f3f5e36e_S2 + AGTP_shared -> mw9da2427f_d19a_44bb_b27f_a2153d727414_S2; mw2569ac6d_fdcd_432e_902c_4cf408daa6ef_S2_TXTL_NTP_RNAP_F*mw91d91e93_cbcf_4f84_a7d0_31a9f3f5e36e_S2*AGTP_shared - mw2569ac6d_fdcd_432e_902c_4cf408daa6ef_S2_TXTL_NTP_RNAP_R*mw9da2427f_d19a_44bb_b27f_a2153d727414_S2;
    mw2569ac6d_fdcd_432e_902c_4cf408daa6ef_S2_TXTL_NTP_RNAP_F = 1; mw2569ac6d_fdcd_432e_902c_4cf408daa6ef_S2_TXTL_NTP_RNAP_R = 120000;
  mw26514d1f_d571_40f0_b058_048eae750994_S2: mw9da2427f_d19a_44bb_b27f_a2153d727414_S2 => mw347f7506_272d_4c00_a888_16664b846f5a_S2 + mw187ab98e_4dd8_4b90_ab91_b3e1a527f317_S2; mw26514d1f_d571_40f0_b058_048eae750994_S2_TXTL_transcription_rate1*mw9da2427f_d19a_44bb_b27f_a2153d727414_S2;
    mw26514d1f_d571_40f0_b058_048eae750994_S2_TXTL_transcription_rate1 = 0.001470588;
  mw4cf7dc9f_0dfb_476d_8331_59d0efb8874a_S2: mwe894cfb7_4141_407c_b6a7_acf8c54db1dd_S2 + mwbb351068_dafa_4d93_a901_93d2c06faf33_S2 -> mwca29b558_b611_41ca_a033_a361bf11588e_S2; mw4cf7dc9f_0dfb_476d_8331_59d0efb8874a_S2_ptet_sequestration_F*mwe894cfb7_4141_407c_b6a7_acf8c54db1dd_S2*mwbb351068_dafa_4d93_a901_93d2c06faf33_S2 - mw4cf7dc9f_0dfb_476d_8331_59d0efb8874a_S2_ptet_sequestration_R*mwca29b558_b611_41ca_a033_a361bf11588e_S2;
    mw4cf7dc9f_0dfb_476d_8331_59d0efb8874a_S2_ptet_sequestration_F = 0.25; mw4cf7dc9f_0dfb_476d_8331_59d0efb8874a_S2_ptet_sequestration_R = 0.000111;
  mw3d5a07dc_e40f_40af_ba87_0a40619b4220_S2: mw887bf55f_b49f_45f3_ae60_41e620e6df45_S2 + AA_shared -> mwddd6d6d8_7810_4749_b0ec_9b625e5bde16_S2; mw3d5a07dc_e40f_40af_ba87_0a40619b4220_S2_TL_AA_F*mw887bf55f_b49f_45f3_ae60_41e620e6df45_S2*AA_shared - mw3d5a07dc_e40f_40af_ba87_0a40619b4220_S2_TL_AA_R*mwddd6d6d8_7810_4749_b0ec_9b625e5bde16_S2;
    mw3d5a07dc_e40f_40af_ba87_0a40619b4220_S2_TL_AA_F = 300; mw3d5a07dc_e40f_40af_ba87_0a40619b4220_S2_TL_AA_R = 0.1;
  mwf254e794_a573_4233_9066_8ab855ecc3f0_S2: mwddd6d6d8_7810_4749_b0ec_9b625e5bde16_S2 + 2 AGTP_shared -> mw570b0471_90f8_49a5_9eee_1677409ba70f_S2; mwf254e794_a573_4233_9066_8ab855ecc3f0_S2_TL_AGTP_F*mwddd6d6d8_7810_4749_b0ec_9b625e5bde16_S2*AGTP_shared^2 - mwf254e794_a573_4233_9066_8ab855ecc3f0_S2_TL_AGTP_R*mw570b0471_90f8_49a5_9eee_1677409ba70f_S2;
    mwf254e794_a573_4233_9066_8ab855ecc3f0_S2_TL_AGTP_F = 30; mwf254e794_a573_4233_9066_8ab855ecc3f0_S2_TL_AGTP_R = 10;
  mw4cde338c_0ac4_4b25_be18_203c086ac162_S2: mw570b0471_90f8_49a5_9eee_1677409ba70f_S2 => mw720756b8_d8c6_4f50_9c73_9ed373dd3b17_S2; mw4cde338c_0ac4_4b25_be18_203c086ac162_S2_TXTL_TL_AA_consumption*mw570b0471_90f8_49a5_9eee_1677409ba70f_S2;
    mw4cde338c_0ac4_4b25_be18_203c086ac162_S2_TXTL_TL_AA_consumption = 0.024;
  mwc62c3ab8_28a7_420c_98f8_df28486db563_S2: mw570b0471_90f8_49a5_9eee_1677409ba70f_S2 => mw720756b8_d8c6_4f50_9c73_9ed373dd3b17_S2 + mwb188a99a_78b9_4cb3_9c62_0ef2b5ff33b2_S2; mwc62c3ab8_28a7_420c_98f8_df28486db563_S2_TXTL_TL_rate*mw570b0471_90f8_49a5_9eee_1677409ba70f_S2;
    mwc62c3ab8_28a7_420c_98f8_df28486db563_S2_TXTL_TL_rate = 0.012;
  mwf82df561_7fae_4b63_bd03_c89e89b762ba_S2: mw720756b8_d8c6_4f50_9c73_9ed373dd3b17_S2 => mw187ab98e_4dd8_4b90_ab91_b3e1a527f317_S2 + Ribo_shared; mwf82df561_7fae_4b63_bd03_c89e89b762ba_S2_TXTL_RIBOBOUND_TERMINATION_RATE*mw720756b8_d8c6_4f50_9c73_9ed373dd3b17_S2;
    mwf82df561_7fae_4b63_bd03_c89e89b762ba_S2_TXTL_RIBOBOUND_TERMINATION_RATE = 50;
  mwd3eea109_9057_43ec_9c1a_868943fd0b51_S2: mw187ab98e_4dd8_4b90_ab91_b3e1a527f317_S2 + mw31a20aa1_fa9a_47b6_9cb9_fac8188e6cee_S2 -> mw6f809389_8e11_4d87_8587_1d6ac1fafe5e_S2; mwd3eea109_9057_43ec_9c1a_868943fd0b51_S2_TXTL_RNAdeg_F*mw187ab98e_4dd8_4b90_ab91_b3e1a527f317_S2*mw31a20aa1_fa9a_47b6_9cb9_fac8188e6cee_S2 - mwd3eea109_9057_43ec_9c1a_868943fd0b51_S2_TXTL_RNAdeg_R*mw6f809389_8e11_4d87_8587_1d6ac1fafe5e_S2;
    mwd3eea109_9057_43ec_9c1a_868943fd0b51_S2_TXTL_RNAdeg_F = 10; mwd3eea109_9057_43ec_9c1a_868943fd0b51_S2_TXTL_RNAdeg_R = 2000;
  mw54b9acd4_df18_4408_9fb3_8cfd8f7080d3_S2: mw6f809389_8e11_4d87_8587_1d6ac1fafe5e_S2 => mw31a20aa1_fa9a_47b6_9cb9_fac8188e6cee_S2; mw54b9acd4_df18_4408_9fb3_8cfd8f7080d3_S2_TXTL_RNAdeg_F*mw6f809389_8e11_4d87_8587_1d6ac1fafe5e_S2;
    mw54b9acd4_df18_4408_9fb3_8cfd8f7080d3_S2_TXTL_RNAdeg_F = 0.002777778;
  mwe0536f60_dad8_4b3b_a6da_af2add0cb49e_S2: mw887bf55f_b49f_45f3_ae60_41e620e6df45_S2 + mw31a20aa1_fa9a_47b6_9cb9_fac8188e6cee_S2 -> mw62de36a8_f2e0_4148_9acc_13f9028af8e8_S2; mwe0536f60_dad8_4b3b_a6da_af2add0cb49e_S2_TXTL_RNAdeg_F*mw887bf55f_b49f_45f3_ae60_41e620e6df45_S2*mw31a20aa1_fa9a_47b6_9cb9_fac8188e6cee_S2 - mwe0536f60_dad8_4b3b_a6da_af2add0cb49e_S2_TXTL_RNAdeg_R*mw62de36a8_f2e0_4148_9acc_13f9028af8e8_S2;
    mwe0536f60_dad8_4b3b_a6da_af2add0cb49e_S2_TXTL_RNAdeg_F = 10; mwe0536f60_dad8_4b3b_a6da_af2add0cb49e_S2_TXTL_RNAdeg_R = 2000;
  mw686da9b4_436f_4853_8400_e759124c01d2_S2: mw62de36a8_f2e0_4148_9acc_13f9028af8e8_S2 => mw31a20aa1_fa9a_47b6_9cb9_fac8188e6cee_S2 + Ribo_shared; mw686da9b4_436f_4853_8400_e759124c01d2_S2_TXTL_RNAdeg_F*mw62de36a8_f2e0_4148_9acc_13f9028af8e8_S2;
    mw686da9b4_436f_4853_8400_e759124c01d2_S2_TXTL_RNAdeg_F = 0.002777778;
  mw5c598418_45bf_4c86_b37a_a1e884f1babb_S2: mw570b0471_90f8_49a5_9eee_1677409ba70f_S2 + mw31a20aa1_fa9a_47b6_9cb9_fac8188e6cee_S2 -> mw60949402_1d1b_40ec_bb33_edb15e6699db_S2; mw5c598418_45bf_4c86_b37a_a1e884f1babb_S2_TXTL_RNAdeg_F*mw570b0471_90f8_49a5_9eee_1677409ba70f_S2*mw31a20aa1_fa9a_47b6_9cb9_fac8188e6cee_S2 - mw5c598418_45bf_4c86_b37a_a1e884f1babb_S2_TXTL_RNAdeg_R*mw60949402_1d1b_40ec_bb33_edb15e6699db_S2;
    mw5c598418_45bf_4c86_b37a_a1e884f1babb_S2_TXTL_RNAdeg_F = 10; mw5c598418_45bf_4c86_b37a_a1e884f1babb_S2_TXTL_RNAdeg_R = 2000;
  mw3e69ecc4_2b4b_4e06_83c8_9460b4fa5e7a_S2: mw60949402_1d1b_40ec_bb33_edb15e6699db_S2 => mw31a20aa1_fa9a_47b6_9cb9_fac8188e6cee_S2 + AA_shared + 2 AGTP_shared + Ribo_shared; mw3e69ecc4_2b4b_4e06_83c8_9460b4fa5e7a_S2_TXTL_RNAdeg_F*mw60949402_1d1b_40ec_bb33_edb15e6699db_S2;
    mw3e69ecc4_2b4b_4e06_83c8_9460b4fa5e7a_S2_TXTL_RNAdeg_F = 0.002777778;
  mw41dc1176_f556_482f_8006_486a3b61ef38_S2: mw720756b8_d8c6_4f50_9c73_9ed373dd3b17_S2 + mw31a20aa1_fa9a_47b6_9cb9_fac8188e6cee_S2 -> mw2bc1cfde_f944_4b62_ab54_64a38bebdffa_S2; mw41dc1176_f556_482f_8006_486a3b61ef38_S2_TXTL_RNAdeg_F*mw720756b8_d8c6_4f50_9c73_9ed373dd3b17_S2*mw31a20aa1_fa9a_47b6_9cb9_fac8188e6cee_S2 - mw41dc1176_f556_482f_8006_486a3b61ef38_S2_TXTL_RNAdeg_R*mw2bc1cfde_f944_4b62_ab54_64a38bebdffa_S2;
    mw41dc1176_f556_482f_8006_486a3b61ef38_S2_TXTL_RNAdeg_F = 10; mw41dc1176_f556_482f_8006_486a3b61ef38_S2_TXTL_RNAdeg_R = 2000;
  mw488453cf_aa4e_41aa_bfe5_87f8d0a118ab_S2: mw2bc1cfde_f944_4b62_ab54_64a38bebdffa_S2 => mw31a20aa1_fa9a_47b6_9cb9_fac8188e6cee_S2 + Ribo_shared; mw488453cf_aa4e_41aa_bfe5_87f8d0a118ab_S2_TXTL_RNAdeg_F*mw2bc1cfde_f944_4b62_ab54_64a38bebdffa_S2;
    mw488453cf_aa4e_41aa_bfe5_87f8d0a118ab_S2_TXTL_RNAdeg_F = 0.002777778;
  mwe42ea471_36a2_4c40_a444_864a83b6aba8_S2: mwddd6d6d8_7810_4749_b0ec_9b625e5bde16_S2 + mw31a20aa1_fa9a_47b6_9cb9_fac8188e6cee_S2 -> mwb70352c7_9a29_4a2c_9280_2e92b39b7034_S2; mwe42ea471_36a2_4c40_a444_864a83b6aba8_S2_TXTL_RNAdeg_F*mwddd6d6d8_7810_4749_b0ec_9b625e5bde16_S2*mw31a20aa1_fa9a_47b6_9cb9_fac8188e6cee_S2 - mwe42ea471_36a2_4c40_a444_864a83b6aba8_S2_TXTL_RNAdeg_R*mwb70352c7_9a29_4a2c_9280_2e92b39b7034_S2;
    mwe42ea471_36a2_4c40_a444_864a83b6aba8_S2_TXTL_RNAdeg_F = 10; mwe42ea471_36a2_4c40_a444_864a83b6aba8_S2_TXTL_RNAdeg_R = 2000;
  mwfb70b1e9_7b65_409a_8fc9_14bb651756a9_S2: mwb70352c7_9a29_4a2c_9280_2e92b39b7034_S2 => mw31a20aa1_fa9a_47b6_9cb9_fac8188e6cee_S2 + AA_shared + Ribo_shared; mwfb70b1e9_7b65_409a_8fc9_14bb651756a9_S2_TXTL_RNAdeg_F*mwb70352c7_9a29_4a2c_9280_2e92b39b7034_S2;
    mwfb70b1e9_7b65_409a_8fc9_14bb651756a9_S2_TXTL_RNAdeg_F = 0.002777778;
  mw425e1f92_9d3e_4f30_a916_810607a32b67_S2: AGTP_shared => mw74c2c967_18fd_4445_9b27_71c14483d316_S2; mw5c2bb4d9_3548_456f_a5fe_b970d5bbbf8a_S2*AGTP_shared;

  // Events:
  event_203: at (time <= 5400): mw8cf83496_9f55_4eca_9dc2_b30c8e67d7bd_S1 = 0;
  event_204: at (time > 5400): mw8cf83496_9f55_4eca_9dc2_b30c8e67d7bd_S1 = 0.0002;
  event_205: at (time <= 5400): mw5c2bb4d9_3548_456f_a5fe_b970d5bbbf8a_S2 = 0;
  event_206: at (time > 5400): mw5c2bb4d9_3548_456f_a5fe_b970d5bbbf8a_S2 = 0.0002;

  // Unit definitions:
  unit volume = litre;
  unit substance = mole;
  unit area = metre^2;
end
