// SBML level 3 version 2

model combined_model_of__bioscrape_generated_model_154456_bioscrape_generated_model_920755_bioscrape_generated_model_407690()
  // model units - substance: mole, time: second, volume: litre, area: square_metre, length: metre, extent: mole

  // Compartments:
  compartment default_bioscrape_generated_model_154456_combined = 3e-6;
  compartment default_bioscrape_generated_model_154456_combined_1 = 1e-6;

  // Species:
  species G_bioscrape_generated_model_154456 in default_bioscrape_generated_model_154456_combined_1 = 1;
  species mRNA_T_bioscrape_generated_model_154456_1_combined in default_bioscrape_generated_model_154456_combined = 0;
  species X_bioscrape_generated_model_920755 in default_bioscrape_generated_model_154456_combined = 0;
  species I_bioscrape_generated_model_407690 in default_bioscrape_generated_model_154456_combined_1 = 100;
  species S_bioscrape_generated_model_154456_1_combined in default_bioscrape_generated_model_154456_combined_1 = 0;

  // Parameters:
  KI_combined = 10;
  KX_bioscrape_generated_model_154456 = 2;
  DummyVar_PositiveHillPropensity_n_0_bioscrape_generated_model_920755 = 1;
  KR_bioscrape_generated_model_920755 = 20;
  KTR_bioscrape_generated_model_920755 = 5;
  delta_combined = 0.1;
  K0_bioscrape_generated_model_407690 = 20;
  KI_bioscrape_generated_model_407690 = 25;
  n_combined = 2;

  // Reactions:
  r0_bioscrape_generated_model_154456: G_bioscrape_generated_model_154456 => G_bioscrape_generated_model_154456 + mRNA_T_bioscrape_generated_model_154456_1_combined; G_bioscrape_generated_model_154456*KX_bioscrape_generated_model_154456*S_bioscrape_generated_model_154456_1_combined^n_combined/(KI_combined + S_bioscrape_generated_model_154456_1_combined^n_combined);  // modifiers: S_bioscrape_generated_model_154456_1_combined
  r1_bioscrape_generated_model_154456: mRNA_T_bioscrape_generated_model_154456_1_combined => ; delta_combined*mRNA_T_bioscrape_generated_model_154456_1_combined;
  r0_bioscrape_generated_model_920755: mRNA_T_bioscrape_generated_model_154456_1_combined => mRNA_T_bioscrape_generated_model_154456_1_combined + X_bioscrape_generated_model_920755; KTR_bioscrape_generated_model_920755*mRNA_T_bioscrape_generated_model_154456_1_combined^n_combined/(KR_bioscrape_generated_model_920755 + mRNA_T_bioscrape_generated_model_154456_1_combined^DummyVar_PositiveHillPropensity_n_0_bioscrape_generated_model_920755);
  r1_bioscrape_generated_model_920755: X_bioscrape_generated_model_920755 => ; X_bioscrape_generated_model_920755*delta_combined;
  r0_bioscrape_generated_model_407690: => S_bioscrape_generated_model_154456_1_combined; I_bioscrape_generated_model_407690^n_combined*K0_bioscrape_generated_model_407690/(I_bioscrape_generated_model_407690^n_combined + KI_bioscrape_generated_model_407690);  // modifiers: I_bioscrape_generated_model_407690

  // Unit definitions:
  unit square_metre = metre^2;
end
