// SBML level 2 version 4

model mix_of_E30VNPRL_E30VNPRL_gene_expression()
  // mix_of_E30VNPRL_E30VNPRL_gene_expression

  // Compartments:
  compartment contents = 1;

  // Species:
  species RNAP in contents = 100.0001/contents;
  species Ribo in contents = 30.00002/contents;
  species RecBCD in contents = 5.000003/contents;
  species RNase in contents = 100.0001/contents;
  species AGTP in contents = 3180048/contents;
  species CUTP in contents = 1908029/contents;
  species AA in contents = 3.180048e7/contents;
  species protein_deGFP_contents_9 in contents = 0;
  species protein_deGFP_contents_10 in contents = 0; protein_deGFP_contents_10 is "protein deGFP*";
  species RNA_utr1_deGFP in contents = 0; RNA_utr1_deGFP is "RNA utr1--deGFP";
  species Ribo_RNA_utr1_deGFP in contents = 0; Ribo_RNA_utr1_deGFP is "Ribo:RNA utr1--deGFP";
  species DNA_p28_ptet_utr1_deGFP in contents = 2.000001/contents; DNA_p28_ptet_utr1_deGFP is "DNA p28_ptet--utr1--deGFP";
  species RNAP28 in contents = 0;
  species RNAP28_DNA_p28_ptet_utr1_deGFP in contents = 0; RNAP28_DNA_p28_ptet_utr1_deGFP is "RNAP28:DNA p28_ptet--utr1--deGFP";
  species protein_sigma28 in contents = 0;
  species protein_tetRdimer in contents = 0;
  species CUTP_AGTP_RNAP28_DNA_p28_ptet_utr1_deGFP in contents = 0; CUTP_AGTP_RNAP28_DNA_p28_ptet_utr1_deGFP is "CUTP:AGTP:RNAP28:DNA p28_ptet--utr1--deGFP";
  species term_RNAP28_DNA_p28_ptet_utr1_deGFP in contents = 0; term_RNAP28_DNA_p28_ptet_utr1_deGFP is "term_RNAP28:DNA p28_ptet--utr1--deGFP";
  species RNAP28_DNA_p28_ptet_utr1_deGFP_protein_tetRdimer in contents = 0; RNAP28_DNA_p28_ptet_utr1_deGFP_protein_tetRdimer is "RNAP28:DNA p28_ptet--utr1--deGFP:protein tetRdimer";
  species CUTP_AGTP_RNAP28_DNA_p28_ptet_utr1_deGFP_protein_tetRdimer in contents = 0; CUTP_AGTP_RNAP28_DNA_p28_ptet_utr1_deGFP_protein_tetRdimer is "CUTP:AGTP:RNAP28:DNA p28_ptet--utr1--deGFP:protein tetRdimer";
  species term_RNAP28_DNA_p28_ptet_utr1_deGFP_protein_tetRdimer in contents = 0; term_RNAP28_DNA_p28_ptet_utr1_deGFP_protein_tetRdimer is "term_RNAP28:DNA p28_ptet--utr1--deGFP:protein tetRdimer";
  species AA_2AGTP_Ribo_RNA_utr1_deGFP in contents = 0; AA_2AGTP_Ribo_RNA_utr1_deGFP is "AA:2AGTP:Ribo:RNA utr1--deGFP";
  species term_Ribo_RNA_utr1_deGFP in contents = 0; term_Ribo_RNA_utr1_deGFP is "term_Ribo:RNA utr1--deGFP";
  species DNA_p28_ptet_utr1_deGFP_protein_tetRdimer in contents = 0; DNA_p28_ptet_utr1_deGFP_protein_tetRdimer is "DNA p28_ptet--utr1--deGFP:protein tetRdimer";
  species AGTP_RNAP28_DNA_p28_ptet_utr1_deGFP in contents = 0; AGTP_RNAP28_DNA_p28_ptet_utr1_deGFP is "AGTP:RNAP28:DNA p28_ptet--utr1--deGFP";
  species CUTP_RNAP28_DNA_p28_ptet_utr1_deGFP in contents = 0; CUTP_RNAP28_DNA_p28_ptet_utr1_deGFP is "CUTP:RNAP28:DNA p28_ptet--utr1--deGFP";
  species AGTP_RNAP28_DNA_p28_ptet_utr1_deGFP_protein_tetRdimer in contents = 0; AGTP_RNAP28_DNA_p28_ptet_utr1_deGFP_protein_tetRdimer is "AGTP:RNAP28:DNA p28_ptet--utr1--deGFP:protein tetRdimer";
  species CUTP_RNAP28_DNA_p28_ptet_utr1_deGFP_protein_tetRdimer in contents = 0; CUTP_RNAP28_DNA_p28_ptet_utr1_deGFP_protein_tetRdimer is "CUTP:RNAP28:DNA p28_ptet--utr1--deGFP:protein tetRdimer";
  species AA_Ribo_RNA_utr1_deGFP in contents = 0; AA_Ribo_RNA_utr1_deGFP is "AA:Ribo:RNA utr1--deGFP";
  species RNA_utr1_deGFP_RNase in contents = 0; RNA_utr1_deGFP_RNase is "RNA utr1--deGFP:RNase";
  species Ribo_RNA_utr1_deGFP_RNase in contents = 0; Ribo_RNA_utr1_deGFP_RNase is "Ribo:RNA utr1--deGFP:RNase";
  species AA_2AGTP_Ribo_RNA_utr1_deGFP_RNase in contents = 0; AA_2AGTP_Ribo_RNA_utr1_deGFP_RNase is "AA:2AGTP:Ribo:RNA utr1--deGFP:RNase";
  species term_Ribo_RNA_utr1_deGFP_RNase in contents = 0; term_Ribo_RNA_utr1_deGFP_RNase is "term_Ribo:RNA utr1--deGFP:RNase";
  species AA_Ribo_RNA_utr1_deGFP_RNase in contents = 0; AA_Ribo_RNA_utr1_deGFP_RNase is "AA:Ribo:RNA utr1--deGFP:RNase";
  species AGTP_USED in contents = 0;

  // Parameters:
  AGTPdeg_F = 0;

  // Reactions:
  reaction_38: RNAP + protein_sigma28 -> RNAP28; Sigma28_RNAP_F*RNAP*protein_sigma28 - Sigma28_RNAP_R*RNAP28;
    Sigma28_RNAP_F = 100; Sigma28_RNAP_R = 0.1;
  reaction_39: protein_deGFP_contents_9 => protein_deGFP_contents_10; TXTL_PROT_deGFP_MATURATION*protein_deGFP_contents_9;
    TXTL_PROT_deGFP_MATURATION = 0.002310491;
  reaction_40: RNA_utr1_deGFP + Ribo -> Ribo_RNA_utr1_deGFP; TXTL_UTR_UTR1_F*RNA_utr1_deGFP*Ribo - TXTL_UTR_UTR1_R*Ribo_RNA_utr1_deGFP;
    TXTL_UTR_UTR1_F = 0.2; TXTL_UTR_UTR1_R = 4;
  reaction_41: DNA_p28_ptet_utr1_deGFP + RNAP28 -> RNAP28_DNA_p28_ptet_utr1_deGFP; TXTL_PTET_RNAPbound_F*DNA_p28_ptet_utr1_deGFP*RNAP28 - TXTL_PTET_RNAPbound_R*RNAP28_DNA_p28_ptet_utr1_deGFP;
    TXTL_PTET_RNAPbound_F = 0.006; TXTL_PTET_RNAPbound_R = 5;
  reaction_42: DNA_p28_ptet_utr1_deGFP + protein_tetRdimer -> DNA_p28_ptet_utr1_deGFP_protein_tetRdimer; reaction_42_kf*DNA_p28_ptet_utr1_deGFP*protein_tetRdimer - reaction_42_kr*DNA_p28_ptet_utr1_deGFP_protein_tetRdimer;
    reaction_42_kf = 0.00286; reaction_42_kr = 1.1e-5;
  reaction_43: RNAP28_DNA_p28_ptet_utr1_deGFP + protein_tetRdimer -> RNAP28_DNA_p28_ptet_utr1_deGFP_protein_tetRdimer; reaction_43_kf*RNAP28_DNA_p28_ptet_utr1_deGFP*protein_tetRdimer - reaction_43_kr*RNAP28_DNA_p28_ptet_utr1_deGFP_protein_tetRdimer;
    reaction_43_kf = 0.00286; reaction_43_kr = 1.1e-5;
  reaction_44: DNA_p28_ptet_utr1_deGFP_protein_tetRdimer + RNAP28 -> RNAP28_DNA_p28_ptet_utr1_deGFP_protein_tetRdimer; reaction_44_kf*DNA_p28_ptet_utr1_deGFP_protein_tetRdimer*RNAP28 - reaction_44_kr*RNAP28_DNA_p28_ptet_utr1_deGFP_protein_tetRdimer;
    reaction_44_kf = 0.006; reaction_44_kr = 5000;
  reaction_45: CUTP_AGTP_RNAP28_DNA_p28_ptet_utr1_deGFP => RNAP28_DNA_p28_ptet_utr1_deGFP; reaction_45_TXTL_NTP_consumption*CUTP_AGTP_RNAP28_DNA_p28_ptet_utr1_deGFP;
    reaction_45_TXTL_NTP_consumption = 0.7485294;
  reaction_46: term_RNAP28_DNA_p28_ptet_utr1_deGFP => RNAP28 + DNA_p28_ptet_utr1_deGFP; reaction_46_TXTL_RNAPBOUND_TERMINATION_RATE*term_RNAP28_DNA_p28_ptet_utr1_deGFP;
    reaction_46_TXTL_RNAPBOUND_TERMINATION_RATE = 0.05;
  reaction_47: RNAP28_DNA_p28_ptet_utr1_deGFP + AGTP -> AGTP_RNAP28_DNA_p28_ptet_utr1_deGFP; reaction_47_TXTL_NTP_RNAP_F*RNAP28_DNA_p28_ptet_utr1_deGFP*AGTP - reaction_47_TXTL_NTP_RNAP_R*AGTP_RNAP28_DNA_p28_ptet_utr1_deGFP;
    reaction_47_TXTL_NTP_RNAP_F = 1000; reaction_47_TXTL_NTP_RNAP_R = 120000000;
  reaction_48: RNAP28_DNA_p28_ptet_utr1_deGFP + CUTP -> CUTP_RNAP28_DNA_p28_ptet_utr1_deGFP; reaction_48_TXTL_NTP_RNAP_F*RNAP28_DNA_p28_ptet_utr1_deGFP*CUTP - reaction_48_TXTL_NTP_RNAP_R*CUTP_RNAP28_DNA_p28_ptet_utr1_deGFP;
    reaction_48_TXTL_NTP_RNAP_F = 1000; reaction_48_TXTL_NTP_RNAP_R = 120000000;
  reaction_49: AGTP_RNAP28_DNA_p28_ptet_utr1_deGFP + CUTP -> CUTP_AGTP_RNAP28_DNA_p28_ptet_utr1_deGFP; reaction_49_TXTL_NTP_RNAP_F*AGTP_RNAP28_DNA_p28_ptet_utr1_deGFP*CUTP - reaction_49_TXTL_NTP_RNAP_R*CUTP_AGTP_RNAP28_DNA_p28_ptet_utr1_deGFP;
    reaction_49_TXTL_NTP_RNAP_F = 1; reaction_49_TXTL_NTP_RNAP_R = 120000;
  reaction_50: CUTP_RNAP28_DNA_p28_ptet_utr1_deGFP + AGTP -> CUTP_AGTP_RNAP28_DNA_p28_ptet_utr1_deGFP; reaction_50_TXTL_NTP_RNAP_F*CUTP_RNAP28_DNA_p28_ptet_utr1_deGFP*AGTP - reaction_50_TXTL_NTP_RNAP_R*CUTP_AGTP_RNAP28_DNA_p28_ptet_utr1_deGFP;
    reaction_50_TXTL_NTP_RNAP_F = 1; reaction_50_TXTL_NTP_RNAP_R = 120000;
  reaction_51: CUTP_AGTP_RNAP28_DNA_p28_ptet_utr1_deGFP => term_RNAP28_DNA_p28_ptet_utr1_deGFP + RNA_utr1_deGFP; reaction_51_TXTL_transcription_rate1*CUTP_AGTP_RNAP28_DNA_p28_ptet_utr1_deGFP;
    reaction_51_TXTL_transcription_rate1 = 0.001470588;
  reaction_52: CUTP_AGTP_RNAP28_DNA_p28_ptet_utr1_deGFP_protein_tetRdimer => RNAP28_DNA_p28_ptet_utr1_deGFP_protein_tetRdimer; reaction_52_TXTL_NTP_consumption*CUTP_AGTP_RNAP28_DNA_p28_ptet_utr1_deGFP_protein_tetRdimer;
    reaction_52_TXTL_NTP_consumption = 0.7485294;
  reaction_53: term_RNAP28_DNA_p28_ptet_utr1_deGFP_protein_tetRdimer => RNAP28 + DNA_p28_ptet_utr1_deGFP + protein_tetRdimer; reaction_53_TXTL_RNAPBOUND_TERMINATION_RATE*term_RNAP28_DNA_p28_ptet_utr1_deGFP_protein_tetRdimer;
    reaction_53_TXTL_RNAPBOUND_TERMINATION_RATE = 0.05;
  reaction_54: RNAP28_DNA_p28_ptet_utr1_deGFP_protein_tetRdimer + AGTP -> AGTP_RNAP28_DNA_p28_ptet_utr1_deGFP_protein_tetRdimer; reaction_54_TXTL_NTP_RNAP_F*RNAP28_DNA_p28_ptet_utr1_deGFP_protein_tetRdimer*AGTP - reaction_54_TXTL_NTP_RNAP_R*AGTP_RNAP28_DNA_p28_ptet_utr1_deGFP_protein_tetRdimer;
    reaction_54_TXTL_NTP_RNAP_F = 1000; reaction_54_TXTL_NTP_RNAP_R = 120000000;
  reaction_55: RNAP28_DNA_p28_ptet_utr1_deGFP_protein_tetRdimer + CUTP -> CUTP_RNAP28_DNA_p28_ptet_utr1_deGFP_protein_tetRdimer; reaction_55_TXTL_NTP_RNAP_F*RNAP28_DNA_p28_ptet_utr1_deGFP_protein_tetRdimer*CUTP - reaction_55_TXTL_NTP_RNAP_R*CUTP_RNAP28_DNA_p28_ptet_utr1_deGFP_protein_tetRdimer;
    reaction_55_TXTL_NTP_RNAP_F = 1000; reaction_55_TXTL_NTP_RNAP_R = 120000000;
  reaction_56: AGTP_RNAP28_DNA_p28_ptet_utr1_deGFP_protein_tetRdimer + CUTP -> CUTP_AGTP_RNAP28_DNA_p28_ptet_utr1_deGFP_protein_tetRdimer; reaction_56_TXTL_NTP_RNAP_F*AGTP_RNAP28_DNA_p28_ptet_utr1_deGFP_protein_tetRdimer*CUTP - reaction_56_TXTL_NTP_RNAP_R*CUTP_AGTP_RNAP28_DNA_p28_ptet_utr1_deGFP_protein_tetRdimer;
    reaction_56_TXTL_NTP_RNAP_F = 1; reaction_56_TXTL_NTP_RNAP_R = 120000;
  reaction_57: CUTP_RNAP28_DNA_p28_ptet_utr1_deGFP_protein_tetRdimer + AGTP -> CUTP_AGTP_RNAP28_DNA_p28_ptet_utr1_deGFP_protein_tetRdimer; reaction_57_TXTL_NTP_RNAP_F*CUTP_RNAP28_DNA_p28_ptet_utr1_deGFP_protein_tetRdimer*AGTP - reaction_57_TXTL_NTP_RNAP_R*CUTP_AGTP_RNAP28_DNA_p28_ptet_utr1_deGFP_protein_tetRdimer;
    reaction_57_TXTL_NTP_RNAP_F = 1; reaction_57_TXTL_NTP_RNAP_R = 120000;
  reaction_58: CUTP_AGTP_RNAP28_DNA_p28_ptet_utr1_deGFP_protein_tetRdimer => term_RNAP28_DNA_p28_ptet_utr1_deGFP_protein_tetRdimer + RNA_utr1_deGFP; reaction_58_TXTL_transcription_rate1*CUTP_AGTP_RNAP28_DNA_p28_ptet_utr1_deGFP_protein_tetRdimer;
    reaction_58_TXTL_transcription_rate1 = 0.001470588;
  reaction_59: Ribo_RNA_utr1_deGFP + AA -> AA_Ribo_RNA_utr1_deGFP; TL_AA_F*Ribo_RNA_utr1_deGFP*AA - TL_AA_R*AA_Ribo_RNA_utr1_deGFP;
    TL_AA_F = 300; TL_AA_R = 0.1;
  reaction_60: AA_Ribo_RNA_utr1_deGFP + 2 AGTP -> AA_2AGTP_Ribo_RNA_utr1_deGFP; TL_AGTP_F*AA_Ribo_RNA_utr1_deGFP*AGTP^2 - TL_AGTP_R*AA_2AGTP_Ribo_RNA_utr1_deGFP;
    TL_AGTP_F = 30; TL_AGTP_R = 10;
  reaction_61: AA_2AGTP_Ribo_RNA_utr1_deGFP => term_Ribo_RNA_utr1_deGFP; TXTL_TL_AA_consumption*AA_2AGTP_Ribo_RNA_utr1_deGFP;
    TXTL_TL_AA_consumption = 0.024;
  reaction_62: AA_2AGTP_Ribo_RNA_utr1_deGFP => term_Ribo_RNA_utr1_deGFP + protein_deGFP_contents_9; TXTL_TL_rate*AA_2AGTP_Ribo_RNA_utr1_deGFP;
    TXTL_TL_rate = 0.012;
  reaction_63: term_Ribo_RNA_utr1_deGFP => RNA_utr1_deGFP + Ribo; TXTL_RIBOBOUND_TERMINATION_RATE*term_Ribo_RNA_utr1_deGFP;
    TXTL_RIBOBOUND_TERMINATION_RATE = 50;
  reaction_64: RNA_utr1_deGFP + RNase -> RNA_utr1_deGFP_RNase; reaction_64_TXTL_RNAdeg_F*RNA_utr1_deGFP*RNase - reaction_64_TXTL_RNAdeg_R*RNA_utr1_deGFP_RNase;
    reaction_64_TXTL_RNAdeg_F = 10; reaction_64_TXTL_RNAdeg_R = 2000;
  reaction_65: RNA_utr1_deGFP_RNase => RNase; reaction_65_TXTL_RNAdeg_F*RNA_utr1_deGFP_RNase;
    reaction_65_TXTL_RNAdeg_F = 0.002777778;
  reaction_66: Ribo_RNA_utr1_deGFP + RNase -> Ribo_RNA_utr1_deGFP_RNase; reaction_66_TXTL_RNAdeg_F*Ribo_RNA_utr1_deGFP*RNase - reaction_66_TXTL_RNAdeg_R*Ribo_RNA_utr1_deGFP_RNase;
    reaction_66_TXTL_RNAdeg_F = 10; reaction_66_TXTL_RNAdeg_R = 2000;
  reaction_67: Ribo_RNA_utr1_deGFP_RNase => RNase + Ribo; reaction_67_TXTL_RNAdeg_F*Ribo_RNA_utr1_deGFP_RNase;
    reaction_67_TXTL_RNAdeg_F = 0.002777778;
  reaction_68: AA_2AGTP_Ribo_RNA_utr1_deGFP + RNase -> AA_2AGTP_Ribo_RNA_utr1_deGFP_RNase; reaction_68_TXTL_RNAdeg_F*AA_2AGTP_Ribo_RNA_utr1_deGFP*RNase - reaction_68_TXTL_RNAdeg_R*AA_2AGTP_Ribo_RNA_utr1_deGFP_RNase;
    reaction_68_TXTL_RNAdeg_F = 10; reaction_68_TXTL_RNAdeg_R = 2000;
  reaction_69: AA_2AGTP_Ribo_RNA_utr1_deGFP_RNase => RNase + AA + 2 AGTP + Ribo; reaction_69_TXTL_RNAdeg_F*AA_2AGTP_Ribo_RNA_utr1_deGFP_RNase;
    reaction_69_TXTL_RNAdeg_F = 0.002777778;
  reaction_70: term_Ribo_RNA_utr1_deGFP + RNase -> term_Ribo_RNA_utr1_deGFP_RNase; reaction_70_TXTL_RNAdeg_F*term_Ribo_RNA_utr1_deGFP*RNase - reaction_70_TXTL_RNAdeg_R*term_Ribo_RNA_utr1_deGFP_RNase;
    reaction_70_TXTL_RNAdeg_F = 10; reaction_70_TXTL_RNAdeg_R = 2000;
  reaction_71: term_Ribo_RNA_utr1_deGFP_RNase => RNase + Ribo; reaction_71_TXTL_RNAdeg_F*term_Ribo_RNA_utr1_deGFP_RNase;
    reaction_71_TXTL_RNAdeg_F = 0.002777778;
  reaction_72: AA_Ribo_RNA_utr1_deGFP + RNase -> AA_Ribo_RNA_utr1_deGFP_RNase; reaction_72_TXTL_RNAdeg_F*AA_Ribo_RNA_utr1_deGFP*RNase - reaction_72_TXTL_RNAdeg_R*AA_Ribo_RNA_utr1_deGFP_RNase;
    reaction_72_TXTL_RNAdeg_F = 10; reaction_72_TXTL_RNAdeg_R = 2000;
  reaction_73: AA_Ribo_RNA_utr1_deGFP_RNase => RNase + AA + Ribo; reaction_73_TXTL_RNAdeg_F*AA_Ribo_RNA_utr1_deGFP_RNase;
    reaction_73_TXTL_RNAdeg_F = 0.002777778;
  reaction_74: AGTP => AGTP_USED; AGTPdeg_F*AGTP;

  // Events:
  event_75: at (time <= 5400): AGTPdeg_F = 0;
  event_76: at (time > 5400): AGTPdeg_F = 0.0002;
end
