// SBML level 3 version 1

model connected_model()
  // model units - substance: count, time: seconds, extent: mole

  // Compartments:
  compartment cell = 1 litre;

  // Species:
  species inp_DP1 in cell = 50/cell;
  species X_DP1 in cell = 50/cell;
  species C1_DP1 in cell = 0;
  species Xp_DP1 in cell = 0;
  species E_DP1 in cell = 50/cell;
  species C2_DP1 in cell = 0;
  species C3_DP1 in cell = 0;
  species out_DP1 in cell = 0;
  species C4_DP1 in cell = 0;
  species inp_DP2 in cell = 50/cell;
  species X_DP2 in cell = 50/cell;
  species C1_DP2 in cell = 0;
  species Xp_DP2 in cell = 0;
  species E_DP2 in cell = 50/cell;
  species C2_DP2 in cell = 0;
  species C3_DP2 in cell = 0;
  species out_DP2 in cell = 0;
  species C4_DP2 in cell = 0;
  species inp_IFFL_1 in cell = 50/cell;
  species DA_IFFL_1 in cell = 50/cell;
  species C1_IFFL_1 in cell = 0;
  species mA_IFFL_1 in cell = 0;
  species pA_IFFL_1 in cell = 0;
  species C2_IFFL_1 in cell = 0;
  species DB_IFFL_1 in cell = 50/cell;
  species mB_IFFL_1 in cell = 0;
  species pB_IFFL_1 in cell = 0;
  species C3_IFFL_1 in cell = 0;
  species DC_IFFL_1 in cell = 50/cell;
  species C4_IFFL_1 in cell = 0;
  species C5_IFFL_1 in cell = 0;
  species C6_IFFL_1 in cell = 0;
  species mC_IFFL_1 in cell = 0;
  species out_IFFL_1 in cell = 0;
  species inp_IFFL_2 in cell = 50/cell;
  species DA_IFFL_2 in cell = 50/cell;
  species C1_IFFL_2 in cell = 0;
  species mA_IFFL_2 in cell = 0;
  species pA_IFFL_2 in cell = 0;
  species C2_IFFL_2 in cell = 0;
  species DB_IFFL_2 in cell = 50/cell;
  species mB_IFFL_2 in cell = 0;
  species pB_IFFL_2 in cell = 0;
  species C3_IFFL_2 in cell = 0;
  species DC_IFFL_2 in cell = 50/cell;
  species C4_IFFL_2 in cell = 0;
  species C5_IFFL_2 in cell = 0;
  species C6_IFFL_2 in cell = 0;
  species mC_IFFL_2 in cell = 0;
  species out_IFFL_2 in cell = 0;

  // Parameters:
  k1f_DP1 = 1 per_second;
  k1r_DP1 = 1 per_second;
  k2f_DP1 = 1 per_second;
  k3f_DP1 = 1 per_second;
  k3r_DP1 = 1 per_second;
  k4f_DP1 = 1 per_second;
  k5f_DP1 = 1 per_second;
  k5r_DP1 = 1 per_second;
  k6f_DP1 = 1 per_second;
  k7f_DP1 = 1 per_second;
  k7r_DP1 = 1 per_second;
  k8f_DP1 = 1 per_second;
  k1f_DP2 = 1 per_second;
  k1r_DP2 = 1 per_second;
  k2f_DP2 = 1 per_second;
  k3f_DP2 = 1 per_second;
  k3r_DP2 = 1 per_second;
  k4f_DP2 = 1 per_second;
  k5f_DP2 = 1 per_second;
  k5r_DP2 = 1 per_second;
  k6f_DP2 = 1 per_second;
  k7f_DP2 = 1 per_second;
  k7r_DP2 = 1 per_second;
  k8f_DP2 = 1 per_second;
  k1f_1 = 1 per_second;
  k1r_1 = 1 per_second;
  k2f_1 = 1 per_second;
  k3f_1 = 1 per_second;
  k4f_1 = 1 per_second;
  k5f_1 = 1 per_second;
  k6f_1 = 1 per_second;
  k6r_1 = 1 per_second;
  k7f_1 = 1 per_second;
  k8f_1 = 1 per_second;
  k9f_1 = 1 per_second;
  k10f_1 = 1 per_second;
  k11f_1 = 1 per_second;
  k11r_1 = 1 per_second;
  k12f_1 = 1 per_second;
  k12r_1 = 1 per_second;
  k13f_1 = 1 per_second;
  k13r_1 = 1 per_second;
  k14f_1 = 1 per_second;
  k14r_1 = 1 per_second;
  k15f_1 = 1 per_second;
  k16f_1 = 1 per_second;
  k17f_1 = 1 per_second;
  k18f_1 = 1 per_second;
  k1f_2 = 1 per_second;
  k1r_2 = 1 per_second;
  k2f_2 = 1 per_second;
  k3f_2 = 1 per_second;
  k4f_2 = 1 per_second;
  k5f_2 = 1 per_second;
  k6f_2 = 1 per_second;
  k6r_2 = 1 per_second;
  k7f_2 = 1 per_second;
  k8f_2 = 1 per_second;
  k9f_2 = 1 per_second;
  k10f_2 = 1 per_second;
  k11f_2 = 1 per_second;
  k11r_2 = 1 per_second;
  k12f_2 = 1 per_second;
  k12r_2 = 1 per_second;
  k13f_2 = 1 per_second;
  k13r_2 = 1 per_second;
  k14f_2 = 1 per_second;
  k14r_2 = 1 per_second;
  k15f_2 = 1 per_second;
  k16f_2 = 1 per_second;
  k17f_2 = 1 per_second;
  k18f_2 = 1 per_second;

  // Reactions:
  r1_DP1: inp_DP1 + X_DP1 -> C1_DP1; k1f_DP1*inp_DP1*X_DP1 - k1r_DP1*C1_DP1;
  r2_DP1: C1_DP1 => inp_DP1 + Xp_DP1; k2f_DP1*C1_DP1;
  r3_DP1: E_DP1 + Xp_DP1 -> C2_DP1; k3f_DP1*E_DP1*Xp_DP1 - k3r_DP1*C2_DP1;
  r4_DP1: C2_DP1 => E_DP1 + X_DP1; k4f_DP1*C2_DP1;
  r5_DP1: inp_DP1 + Xp_DP1 -> C3_DP1; k5f_DP1*inp_DP1*Xp_DP1 - k5r_DP1*C3_DP1;
  r6_DP1: C3_DP1 => out_DP1 + inp_DP1; k6f_DP1*C3_DP1;
  r7_DP1: E_DP1 + out_DP1 -> C4_DP1; k7f_DP1*E_DP1*out_DP1 - k7r_DP1*C4_DP1;
  r8_DP1: C4_DP1 => Xp_DP1 + E_DP1; k8f_DP1*C4_DP1;
  r1_DP2: inp_DP2 + X_DP2 -> C1_DP2; k1f_DP2*inp_DP2*X_DP2 - k1r_DP2*C1_DP2;
  r2_DP2: C1_DP2 => inp_DP2 + Xp_DP2; k2f_DP2*C1_DP2;
  r3_DP2: E_DP2 + Xp_DP2 -> C2_DP2; k3f_DP2*E_DP2*Xp_DP2 - k3r_DP2*C2_DP2;
  r4_DP2: C2_DP2 => E_DP2 + X_DP2; k4f_DP2*C2_DP2;
  r5_DP2: inp_DP2 + Xp_DP2 -> C3_DP2; k5f_DP2*inp_DP2*Xp_DP2 - k5r_DP2*C3_DP2;
  r6_DP2: C3_DP2 => out_DP2 + inp_DP2; k6f_DP2*C3_DP2;
  r7_DP2: E_DP2 + out_DP2 -> C4_DP2; k7f_DP2*E_DP2*out_DP2 - k7r_DP2*C4_DP2;
  r8_DP2: C4_DP2 => Xp_DP2 + E_DP2; k8f_DP2*C4_DP2;
  r1_1: inp_IFFL_1 + DA_IFFL_1 -> C1_IFFL_1; k1f_1*inp_IFFL_1*DA_IFFL_1 - k1r_1*C1_IFFL_1;
  r2_1: C1_IFFL_1 => C1_IFFL_1 + mA_IFFL_1; k2f_1*C1_IFFL_1;
  r3_1: mA_IFFL_1 => mA_IFFL_1 + pA_IFFL_1; k3f_1*mA_IFFL_1;
  r4_1: mA_IFFL_1 => ; k4f_1*mA_IFFL_1;
  r5_1: pA_IFFL_1 => ; k5f_1*pA_IFFL_1;
  r6_1: pA_IFFL_1 + DB_IFFL_1 -> C2_IFFL_1; k6f_1*pA_IFFL_1*DB_IFFL_1 - k6r_1*C2_IFFL_1;
  r7_1: C2_IFFL_1 => C2_IFFL_1 + mB_IFFL_1; k7f_1*C2_IFFL_1;
  r8_1: mB_IFFL_1 => mB_IFFL_1 + pB_IFFL_1; k8f_1*mB_IFFL_1;
  r9_1: mB_IFFL_1 => ; k9f_1*mB_IFFL_1;
  r10_1: pB_IFFL_1 => ; k10f_1*pB_IFFL_1;
  r11_1: pB_IFFL_1 + DC_IFFL_1 -> C3_IFFL_1; k11f_1*pB_IFFL_1*DC_IFFL_1 - k11r_1*C3_IFFL_1;
  r12_1: pA_IFFL_1 + DC_IFFL_1 -> C4_IFFL_1; k12f_1*pA_IFFL_1*DC_IFFL_1 - k12r_1*C4_IFFL_1;
  r13_1: pA_IFFL_1 + C3_IFFL_1 -> C5_IFFL_1; k13f_1*pA_IFFL_1*C3_IFFL_1 - k13r_1*C5_IFFL_1;
  r14_1: pB_IFFL_1 + C4_IFFL_1 -> C6_IFFL_1; k14f_1*pB_IFFL_1*C4_IFFL_1 - k14r_1*C6_IFFL_1;
  r15_1: C4_IFFL_1 => C4_IFFL_1 + mC_IFFL_1; k15f_1*C4_IFFL_1;
  r16_1: mC_IFFL_1 => mC_IFFL_1 + out_IFFL_1; k16f_1*mC_IFFL_1;
  r17_1: mC_IFFL_1 => ; k17f_1*mC_IFFL_1;
  r18_1: out_IFFL_1 => ; k18f_1*out_IFFL_1;
  r1_2: inp_IFFL_2 + DA_IFFL_2 -> C1_IFFL_2; k1f_2*inp_IFFL_2*DA_IFFL_2 - k1r_2*C1_IFFL_2;
  r2_2: C1_IFFL_2 => C1_IFFL_2 + mA_IFFL_2; k2f_2*C1_IFFL_2;
  r3_2: mA_IFFL_2 => mA_IFFL_2 + pA_IFFL_2; k3f_2*mA_IFFL_2;
  r4_2: mA_IFFL_2 => ; k4f_2*mA_IFFL_2;
  r5_2: pA_IFFL_2 => ; k5f_2*pA_IFFL_2;
  r6_2: pA_IFFL_2 + DB_IFFL_2 -> C2_IFFL_2; k6f_2*pA_IFFL_2*DB_IFFL_2 - k6r_2*C2_IFFL_2;
  r7_2: C2_IFFL_2 => C2_IFFL_2 + mB_IFFL_2; k7f_2*C2_IFFL_2;
  r8_2: mB_IFFL_2 => mB_IFFL_2 + pB_IFFL_2; k8f_2*mB_IFFL_2;
  r9_2: mB_IFFL_2 => ; k9f_2*mB_IFFL_2;
  r10_2: pB_IFFL_2 => ; k10f_2*pB_IFFL_2;
  r11_2: pB_IFFL_2 + DC_IFFL_2 -> C3_IFFL_2; k11f_2*pB_IFFL_2*DC_IFFL_2 - k11r_2*C3_IFFL_2;
  r12_2: pA_IFFL_2 + DC_IFFL_2 -> C4_IFFL_2; k12f_2*pA_IFFL_2*DC_IFFL_2 - k12r_2*C4_IFFL_2;
  r13_2: pA_IFFL_2 + C3_IFFL_2 -> C5_IFFL_2; k13f_2*pA_IFFL_2*C3_IFFL_2 - k13r_2*C5_IFFL_2;
  r14_2: pB_IFFL_2 + C4_IFFL_2 -> C6_IFFL_2; k14f_2*pB_IFFL_2*C4_IFFL_2 - k14r_2*C6_IFFL_2;
  r15_2: C4_IFFL_2 => C4_IFFL_2 + mC_IFFL_2; k15f_2*C4_IFFL_2;
  r16_2: mC_IFFL_2 => mC_IFFL_2 + out_IFFL_2; k16f_2*mC_IFFL_2;
  r17_2: mC_IFFL_2 => ; k17f_2*mC_IFFL_2;
  r18_2: out_IFFL_2 => ; k18f_2*out_IFFL_2;

  // Unit definitions:
  unit per_second = 1 / second;
end
