// SBML level 3 version 1

model combined_subsystems__mwcb8c8bc7_2610_4b53_8bd8_1f0766ab430e_SS1_mwed3bf097_6c24_4aff_814a_4781890e4ead_SS2_IPTG_reservoir_SS3_IPTG_membrane()
  // model units - substance: substance, time: second, extent: mole

  // Compartments:
  compartment cell_internal_combined = 4 volume;
  compartment cell_external_combined = 1 litre;

  // Species:
  species mw20c9d2b7_2d30_489e_82d1_e71648158436_SS1 in cell_internal_combined = 0; mw20c9d2b7_2d30_489e_82d1_e71648158436_SS1 is "protein alHL";
  species mw3df01083_618d_4509_9811_8b63adf5cb42_SS1 in cell_internal_combined = 0; mw3df01083_618d_4509_9811_8b63adf5cb42_SS1 is "RNA utr1--alHL";
  species mwdad3b651_3698_4347_a3af_13c2fd1cd4eb_SS1 in cell_internal_combined = 0; mwdad3b651_3698_4347_a3af_13c2fd1cd4eb_SS1 is "Ribo:RNA utr1--alHL";
  species mw27bf35db_2b1d_439b_a0c4_81972bf226ef_SS1 in cell_internal_combined = 0.2500002/cell_internal_combined; mw27bf35db_2b1d_439b_a0c4_81972bf226ef_SS1 is "DNA pOR1OR2--utr1--alHL";
  species mwb9ed4bd5_8cd9_4f48_9f51_256760be89c7_SS1 in cell_internal_combined = 0; mwb9ed4bd5_8cd9_4f48_9f51_256760be89c7_SS1 is "RNAP:DNA pOR1OR2--utr1--alHL";
  species mw9c2e00f3_d345_4af1_918d_b211abb46cda_SS1 in cell_internal_combined = 0; mw9c2e00f3_d345_4af1_918d_b211abb46cda_SS1 is "CUTP:AGTP:RNAP:DNA pOR1OR2--utr1--alHL";
  species mw42ea34c3_4490_4d8a_8ee5_dd1c4ac5319c_SS1 in cell_internal_combined = 0; mw42ea34c3_4490_4d8a_8ee5_dd1c4ac5319c_SS1 is "term_RNAP:DNA pOR1OR2--utr1--alHL";
  species mwd4771b8c_b1d7_4c13_997f_683e301a502a_SS1 in cell_internal_combined = 0; mwd4771b8c_b1d7_4c13_997f_683e301a502a_SS1 is "AA:2AGTP:Ribo:RNA utr1--alHL";
  species mwecef8e3a_4d8c_4f45_87ff_436093b9076f_SS1 in cell_internal_combined = 0; mwecef8e3a_4d8c_4f45_87ff_436093b9076f_SS1 is "term_Ribo:RNA utr1--alHL";
  species mw0d097c9c_0e16_42d5_a990_888eb21274ba_SS1 in cell_internal_combined = 0; mw0d097c9c_0e16_42d5_a990_888eb21274ba_SS1 is "AGTP:RNAP:DNA pOR1OR2--utr1--alHL";
  species mwb668d480_993b_469d_8925_7393c33b0558_SS1 in cell_internal_combined = 0; mwb668d480_993b_469d_8925_7393c33b0558_SS1 is "CUTP:RNAP:DNA pOR1OR2--utr1--alHL";
  species mw722ec4ac_80c5_4501_a092_98560b5118e5_SS1 in cell_internal_combined = 0; mw722ec4ac_80c5_4501_a092_98560b5118e5_SS1 is "AA:Ribo:RNA utr1--alHL";
  species mw773fc4b1_f808_4bf3_85ad_07ce9b454369_SS1 in cell_internal_combined = 0; mw773fc4b1_f808_4bf3_85ad_07ce9b454369_SS1 is "RNA utr1--alHL:RNase";
  species mw3222fc51_b8a6_481b_adcf_8fa66964731e_SS1 in cell_internal_combined = 0; mw3222fc51_b8a6_481b_adcf_8fa66964731e_SS1 is "Ribo:RNA utr1--alHL:RNase";
  species mwbd8bbca4_ad12_4dd6_80fc_656686d30456_SS1 in cell_internal_combined = 0; mwbd8bbca4_ad12_4dd6_80fc_656686d30456_SS1 is "AA:2AGTP:Ribo:RNA utr1--alHL:RNase";
  species mw5453f37e_770a_422a_ba2f_43c5372ca7be_SS1 in cell_internal_combined = 0; mw5453f37e_770a_422a_ba2f_43c5372ca7be_SS1 is "term_Ribo:RNA utr1--alHL:RNase";
  species mwe1a34348_ddac_4a4e_be5b_0895f8905865_SS1 in cell_internal_combined = 0; mwe1a34348_ddac_4a4e_be5b_0895f8905865_SS1 is "AA:Ribo:RNA utr1--alHL:RNase";
  species mw3c367a17_7386_470c_8c72_954a48def552_SS1_1_combined in cell_internal_combined = 200.0001/cell_internal_combined; mw3c367a17_7386_470c_8c72_954a48def552_SS1_1_combined is "RNAP";
  species mw27aa16fc_b76d_46c2_b301_0456b7e3aace_SS1_1_combined in cell_internal_combined = 60.00004/cell_internal_combined; mw27aa16fc_b76d_46c2_b301_0456b7e3aace_SS1_1_combined is "Ribo";
  species mw8db70522_81fd_468e_bfee_2b7b2106514e_SS1_1_combined in cell_internal_combined = 10.00001/cell_internal_combined; mw8db70522_81fd_468e_bfee_2b7b2106514e_SS1_1_combined is "RecBCD";
  species mw288eb330_bc2f_470f_9628_e990cb2252e5_SS1_1_combined in cell_internal_combined = 200.0001/cell_internal_combined; mw288eb330_bc2f_470f_9628_e990cb2252e5_SS1_1_combined is "RNase";
  species mw34fb2519_79b1_4f10_8668_6410726988c5_SS1_1_combined in cell_internal_combined = 6360096/cell_internal_combined; mw34fb2519_79b1_4f10_8668_6410726988c5_SS1_1_combined is "AGTP";
  species mw4f8d0806_0366_43d5_8a2a_a05ee3287512_SS1_1_combined in cell_internal_combined = 3816058/cell_internal_combined; mw4f8d0806_0366_43d5_8a2a_a05ee3287512_SS1_1_combined is "CUTP";
  species mw715c6bbe_f050_4257_8bc2_159625dc5aa5_SS1_1_combined in cell_internal_combined = 6.360096e7/cell_internal_combined; mw715c6bbe_f050_4257_8bc2_159625dc5aa5_SS1_1_combined is "AA";
  species mweb04477f_13a4_4d28_8518_06b1c5bae4de_SS2 in cell_internal_combined = 0; mweb04477f_13a4_4d28_8518_06b1c5bae4de_SS2 is "protein lacI";
  species mw609aa47a_fc0e_418c_a186_aa3a658fb203_SS2 in cell_internal_combined = 0; mw609aa47a_fc0e_418c_a186_aa3a658fb203_SS2 is "protein lacIdimer";
  species mwc00961a6_47d1_4f5a_9c49_00fb0d02cd8a_SS2 in cell_internal_combined = 0; mwc00961a6_47d1_4f5a_9c49_00fb0d02cd8a_SS2 is "protein lacItetramer";
  species mwcbd6bcc3_2c61_4e12_a6f7_e1ac7bc57188_SS2 in cell_internal_combined = 0; mwcbd6bcc3_2c61_4e12_a6f7_e1ac7bc57188_SS2 is "RNA utr1--lacI";
  species mw6fb7f787_57b9_494d_a431_121e3ccbcda9_SS2 in cell_internal_combined = 0; mw6fb7f787_57b9_494d_a431_121e3ccbcda9_SS2 is "Ribo:RNA utr1--lacI";
  species mwdb801a58_028d_43ff_90eb_830d15b4bc7f_SS2 in cell_internal_combined = 5.000003/cell_internal_combined; mwdb801a58_028d_43ff_90eb_830d15b4bc7f_SS2 is "DNA pOR1OR2--utr1--lacI";
  species mwde89bce9_6b96_41b5_ab10_47fdb6f84323_SS2 in cell_internal_combined = 0; mwde89bce9_6b96_41b5_ab10_47fdb6f84323_SS2 is "RNAP:DNA pOR1OR2--utr1--lacI";
  species mwb8e6b1d7_6c72_4a9b_a640_24ba06276629_SS2 in cell_internal_combined = 0; mwb8e6b1d7_6c72_4a9b_a640_24ba06276629_SS2 is "CUTP:AGTP:RNAP:DNA pOR1OR2--utr1--lacI";
  species mw117ae676_633e_4f3a_be8d_eacdbdddfeea_SS2 in cell_internal_combined = 0; mw117ae676_633e_4f3a_be8d_eacdbdddfeea_SS2 is "term_RNAP:DNA pOR1OR2--utr1--lacI";
  species mw969018c5_d898_4ea0_bb80_35de71266464_SS2 in cell_internal_combined = 0; mw969018c5_d898_4ea0_bb80_35de71266464_SS2 is "AA:2AGTP:Ribo:RNA utr1--lacI";
  species mw7416e86a_aa61_4745_b4bc_072c5e137891_SS2 in cell_internal_combined = 0; mw7416e86a_aa61_4745_b4bc_072c5e137891_SS2 is "term_Ribo:RNA utr1--lacI";
  species mw5c94996f_4533_4f46_813f_fb42fa7356f3_SS2 in cell_internal_combined = 0; mw5c94996f_4533_4f46_813f_fb42fa7356f3_SS2 is "protein deGFP";
  species mw6600ba7f_5b6d_4e5d_89a2_4d798f44476d_SS2 in cell_internal_combined = 0; mw6600ba7f_5b6d_4e5d_89a2_4d798f44476d_SS2 is "protein deGFP*";
  species mw6a8ec7cf_9ce3_4f43_a91b_8cf54a67e9cb_SS2 in cell_internal_combined = 0; mw6a8ec7cf_9ce3_4f43_a91b_8cf54a67e9cb_SS2 is "RNA utr1--deGFP";
  species mw11bfe9cd_0d22_4115_b9f7_163fa42fa97b_SS2 in cell_internal_combined = 0; mw11bfe9cd_0d22_4115_b9f7_163fa42fa97b_SS2 is "Ribo:RNA utr1--deGFP";
  species mw0f006cd4_e78e_48c5_b532_eb6e2f3c6121_SS2 in cell_internal_combined = 5.000003/cell_internal_combined; mw0f006cd4_e78e_48c5_b532_eb6e2f3c6121_SS2 is "DNA plac--utr1--deGFP";
  species mw55a8259b_29cf_445a_a79e_f0229fbc33d2_SS2 in cell_internal_combined = 0; mw55a8259b_29cf_445a_a79e_f0229fbc33d2_SS2 is "RNAP:DNA plac--utr1--deGFP";
  species mw68ff84bd_5ee7_416e_8ada_d4f9bad9d42b_SS2 in cell_internal_combined = 0; mw68ff84bd_5ee7_416e_8ada_d4f9bad9d42b_SS2 is "CUTP:AGTP:RNAP:DNA plac--utr1--deGFP";
  species mwc200e475_c73f_465a_8de3_97b93a64c967_SS2 in cell_internal_combined = 0; mwc200e475_c73f_465a_8de3_97b93a64c967_SS2 is "term_RNAP:DNA plac--utr1--deGFP";
  species mw50cebc13_eef8_41ce_9a71_72ef3e078558_SS2 in cell_internal_combined = 0; mw50cebc13_eef8_41ce_9a71_72ef3e078558_SS2 is "AA:2AGTP:Ribo:RNA utr1--deGFP";
  species mwe03e3eea_a713_4196_a6d8_44a14c926596_SS2 in cell_internal_combined = 0; mwe03e3eea_a713_4196_a6d8_44a14c926596_SS2 is "term_Ribo:RNA utr1--deGFP";
  species mw36dad171_05d7_4907_8d71_c2b3b5e51352_SS2 in cell_internal_combined = 0; mw36dad171_05d7_4907_8d71_c2b3b5e51352_SS2 is "IPTG:protein lacItetramer";
  species mw4740c413_fa03_405b_a56e_3a2fd6375f6c_SS2 in cell_internal_combined = 0; mw4740c413_fa03_405b_a56e_3a2fd6375f6c_SS2 is "AGTP:RNAP:DNA pOR1OR2--utr1--lacI";
  species mwb71129fd_b0dc_41ce_a833_e547a1c07b4f_SS2 in cell_internal_combined = 0; mwb71129fd_b0dc_41ce_a833_e547a1c07b4f_SS2 is "CUTP:RNAP:DNA pOR1OR2--utr1--lacI";
  species mwf36a5d62_cdc5_4e90_af35_a9fa5ddb33e2_SS2 in cell_internal_combined = 0; mwf36a5d62_cdc5_4e90_af35_a9fa5ddb33e2_SS2 is "AA:Ribo:RNA utr1--lacI";
  species mwcb7850c8_3801_4d30_9282_42269ca72cc2_SS2 in cell_internal_combined = 0; mwcb7850c8_3801_4d30_9282_42269ca72cc2_SS2 is "RNA utr1--lacI:RNase";
  species mwf0fa4e98_5b94_43bf_9fd1_16e075a088f9_SS2 in cell_internal_combined = 0; mwf0fa4e98_5b94_43bf_9fd1_16e075a088f9_SS2 is "Ribo:RNA utr1--lacI:RNase";
  species mw87bea200_227d_4010_9616_9bee4d30458b_SS2 in cell_internal_combined = 0; mw87bea200_227d_4010_9616_9bee4d30458b_SS2 is "AA:2AGTP:Ribo:RNA utr1--lacI:RNase";
  species mwd91c4e55_95af_42a7_ac6d_2c307d96e1fe_SS2 in cell_internal_combined = 0; mwd91c4e55_95af_42a7_ac6d_2c307d96e1fe_SS2 is "term_Ribo:RNA utr1--lacI:RNase";
  species mwf056a433_e0f6_461e_bfe3_c2b3c62486ca_SS2 in cell_internal_combined = 0; mwf056a433_e0f6_461e_bfe3_c2b3c62486ca_SS2 is "AA:Ribo:RNA utr1--lacI:RNase";
  species mwd6c5bf43_5a9f_455e_8341_73d1b30d0264_SS2 in cell_internal_combined = 0; mwd6c5bf43_5a9f_455e_8341_73d1b30d0264_SS2 is "AGTP:RNAP:DNA plac--utr1--deGFP";
  species mw49de218b_1e29_45e1_862c_0dc03a516700_SS2 in cell_internal_combined = 0; mw49de218b_1e29_45e1_862c_0dc03a516700_SS2 is "CUTP:RNAP:DNA plac--utr1--deGFP";
  species mw7da17532_fa9d_4ff2_8436_cb08e7696382_SS2 in cell_internal_combined = 0; mw7da17532_fa9d_4ff2_8436_cb08e7696382_SS2 is "DNA plac--utr1--deGFP:protein lacItetramer";
  species mw6729d170_4447_449b_9e97_0908b0caab6b_SS2 in cell_internal_combined = 0; mw6729d170_4447_449b_9e97_0908b0caab6b_SS2 is "AA:Ribo:RNA utr1--deGFP";
  species mw611fccdf_157e_40db_8702_848bfb75c079_SS2 in cell_internal_combined = 0; mw611fccdf_157e_40db_8702_848bfb75c079_SS2 is "RNA utr1--deGFP:RNase";
  species mw7e686ddd_072e_4ab7_8512_92481d978201_SS2 in cell_internal_combined = 0; mw7e686ddd_072e_4ab7_8512_92481d978201_SS2 is "Ribo:RNA utr1--deGFP:RNase";
  species mw88722339_572e_456f_85da_875cfc4e92bc_SS2 in cell_internal_combined = 0; mw88722339_572e_456f_85da_875cfc4e92bc_SS2 is "AA:2AGTP:Ribo:RNA utr1--deGFP:RNase";
  species mw6b40acd5_0395_4c2b_a5d8_eae734923797_SS2 in cell_internal_combined = 0; mw6b40acd5_0395_4c2b_a5d8_eae734923797_SS2 is "term_Ribo:RNA utr1--deGFP:RNase";
  species mwa029c0f1_d85f_44ba_a505_84310ebae4b0_SS2 in cell_internal_combined = 0; mwa029c0f1_d85f_44ba_a505_84310ebae4b0_SS2 is "AA:Ribo:RNA utr1--deGFP:RNase";
  species mwbbb6129b_1e4f_4f45_96c0_f3b1fbebdb22_SS1_1_combined in cell_internal_combined = 0; mwbbb6129b_1e4f_4f45_96c0_f3b1fbebdb22_SS1_1_combined is "AGTP_USED";
  species IPTG_SS3_1_combined in cell_external_combined = 0;
  species mw28f62bd1_3a2b_45ba_be22_53e2eb1a9509_SS2_1_combined in cell_internal_combined = 0; mw28f62bd1_3a2b_45ba_be22_53e2eb1a9509_SS2_1_combined is "IPTG";
  species mw8581196a_7c77_4da8_879e_f2c6f24b1932_SS1_1_combined in cell_internal_combined = 0; mw8581196a_7c77_4da8_879e_f2c6f24b1932_SS1_1_combined is "protein alHL*";
  species xxIPTG_protein_alHL in cell_internal_combined = 0; xxIPTG_protein_alHL is "IPTG:protein alHL*";

  // Parameters:
  AGTPdeg_F_combined = 0;
  k1f = 1 per_second;
  k1r = 1 per_second;
  k2f = 1 per_second;

  // Reactions:
  mwdd72ac09_0203_423a_a52d_0f5873e2fabd_SS1: mw20c9d2b7_2d30_489e_82d1_e71648158436_SS1 => mw8581196a_7c77_4da8_879e_f2c6f24b1932_SS1_1_combined; TXTL_PROT_alHL_MATURATION*mw20c9d2b7_2d30_489e_82d1_e71648158436_SS1;
    TXTL_PROT_alHL_MATURATION = 0.002310491;
  mwd7ab1eef_1416_40d7_a256_da7b194a4b64_SS1: mw3df01083_618d_4509_9811_8b63adf5cb42_SS1 + mw27aa16fc_b76d_46c2_b301_0456b7e3aace_SS1_1_combined -> mwdad3b651_3698_4347_a3af_13c2fd1cd4eb_SS1; mwd7ab1eef_1416_40d7_a256_da7b194a4b64_SS1_TXTL_UTR_UTR1_F*mw3df01083_618d_4509_9811_8b63adf5cb42_SS1*mw27aa16fc_b76d_46c2_b301_0456b7e3aace_SS1_1_combined - mwd7ab1eef_1416_40d7_a256_da7b194a4b64_SS1_TXTL_UTR_UTR1_R*mwdad3b651_3698_4347_a3af_13c2fd1cd4eb_SS1;
    mwd7ab1eef_1416_40d7_a256_da7b194a4b64_SS1_TXTL_UTR_UTR1_F = 0.2; mwd7ab1eef_1416_40d7_a256_da7b194a4b64_SS1_TXTL_UTR_UTR1_R = 4;
  mw32c43fdc_054d_44c4_944e_c7628d4180f7_SS1: mw27bf35db_2b1d_439b_a0c4_81972bf226ef_SS1 + mw3c367a17_7386_470c_8c72_954a48def552_SS1_1_combined -> mwb9ed4bd5_8cd9_4f48_9f51_256760be89c7_SS1; mw32c43fdc_054d_44c4_944e_c7628d4180f7_SS1_TXTL_POR1OR2_RNAPbound_F*mw27bf35db_2b1d_439b_a0c4_81972bf226ef_SS1*mw3c367a17_7386_470c_8c72_954a48def552_SS1_1_combined - mw32c43fdc_054d_44c4_944e_c7628d4180f7_SS1_TXTL_POR1OR2_RNAPbound_R*mwb9ed4bd5_8cd9_4f48_9f51_256760be89c7_SS1;
    mw32c43fdc_054d_44c4_944e_c7628d4180f7_SS1_TXTL_POR1OR2_RNAPbound_F = 20; mw32c43fdc_054d_44c4_944e_c7628d4180f7_SS1_TXTL_POR1OR2_RNAPbound_R = 400;
  mwb85b8fb2_3c0b_4472_aaef_b45b3f328d17_SS1: mw9c2e00f3_d345_4af1_918d_b211abb46cda_SS1 => mwb9ed4bd5_8cd9_4f48_9f51_256760be89c7_SS1; mwb85b8fb2_3c0b_4472_aaef_b45b3f328d17_SS1_TXTL_NTP_consumption*mw9c2e00f3_d345_4af1_918d_b211abb46cda_SS1;
    mwb85b8fb2_3c0b_4472_aaef_b45b3f328d17_SS1_TXTL_NTP_consumption = 0.7485294;
  mw4c3c07d8_d9c7_4a98_901d_a1b666222614_SS1: mw42ea34c3_4490_4d8a_8ee5_dd1c4ac5319c_SS1 => mw3c367a17_7386_470c_8c72_954a48def552_SS1_1_combined + mw27bf35db_2b1d_439b_a0c4_81972bf226ef_SS1; mw4c3c07d8_d9c7_4a98_901d_a1b666222614_SS1_TXTL_RNAPBOUND_TERMINATION_RATE*mw42ea34c3_4490_4d8a_8ee5_dd1c4ac5319c_SS1;
    mw4c3c07d8_d9c7_4a98_901d_a1b666222614_SS1_TXTL_RNAPBOUND_TERMINATION_RATE = 0.05;
  mwb80aa33f_0e67_4823_8723_f9c93b9cfacd_SS1: mwb9ed4bd5_8cd9_4f48_9f51_256760be89c7_SS1 + mw34fb2519_79b1_4f10_8668_6410726988c5_SS1_1_combined -> mw0d097c9c_0e16_42d5_a990_888eb21274ba_SS1; mwb80aa33f_0e67_4823_8723_f9c93b9cfacd_SS1_TXTL_NTP_RNAP_F*mwb9ed4bd5_8cd9_4f48_9f51_256760be89c7_SS1*mw34fb2519_79b1_4f10_8668_6410726988c5_SS1_1_combined - mwb80aa33f_0e67_4823_8723_f9c93b9cfacd_SS1_TXTL_NTP_RNAP_R*mw0d097c9c_0e16_42d5_a990_888eb21274ba_SS1;
    mwb80aa33f_0e67_4823_8723_f9c93b9cfacd_SS1_TXTL_NTP_RNAP_F = 1000; mwb80aa33f_0e67_4823_8723_f9c93b9cfacd_SS1_TXTL_NTP_RNAP_R = 120000000;
  mwb0019472_5c22_4b20_9ba8_5b184acbdc4b_SS1: mwb9ed4bd5_8cd9_4f48_9f51_256760be89c7_SS1 + mw4f8d0806_0366_43d5_8a2a_a05ee3287512_SS1_1_combined -> mwb668d480_993b_469d_8925_7393c33b0558_SS1; mwb0019472_5c22_4b20_9ba8_5b184acbdc4b_SS1_TXTL_NTP_RNAP_F*mwb9ed4bd5_8cd9_4f48_9f51_256760be89c7_SS1*mw4f8d0806_0366_43d5_8a2a_a05ee3287512_SS1_1_combined - mwb0019472_5c22_4b20_9ba8_5b184acbdc4b_SS1_TXTL_NTP_RNAP_R*mwb668d480_993b_469d_8925_7393c33b0558_SS1;
    mwb0019472_5c22_4b20_9ba8_5b184acbdc4b_SS1_TXTL_NTP_RNAP_F = 1000; mwb0019472_5c22_4b20_9ba8_5b184acbdc4b_SS1_TXTL_NTP_RNAP_R = 120000000;
  mw483b2885_4e32_40d4_ae03_ecc24729a62d_SS1: mw0d097c9c_0e16_42d5_a990_888eb21274ba_SS1 + mw4f8d0806_0366_43d5_8a2a_a05ee3287512_SS1_1_combined -> mw9c2e00f3_d345_4af1_918d_b211abb46cda_SS1; mw483b2885_4e32_40d4_ae03_ecc24729a62d_SS1_TXTL_NTP_RNAP_F*mw0d097c9c_0e16_42d5_a990_888eb21274ba_SS1*mw4f8d0806_0366_43d5_8a2a_a05ee3287512_SS1_1_combined - mw483b2885_4e32_40d4_ae03_ecc24729a62d_SS1_TXTL_NTP_RNAP_R*mw9c2e00f3_d345_4af1_918d_b211abb46cda_SS1;
    mw483b2885_4e32_40d4_ae03_ecc24729a62d_SS1_TXTL_NTP_RNAP_F = 1; mw483b2885_4e32_40d4_ae03_ecc24729a62d_SS1_TXTL_NTP_RNAP_R = 120000;
  mwc743b64f_a6a6_493c_8445_a454771ea4b8_SS1: mwb668d480_993b_469d_8925_7393c33b0558_SS1 + mw34fb2519_79b1_4f10_8668_6410726988c5_SS1_1_combined -> mw9c2e00f3_d345_4af1_918d_b211abb46cda_SS1; mwc743b64f_a6a6_493c_8445_a454771ea4b8_SS1_TXTL_NTP_RNAP_F*mwb668d480_993b_469d_8925_7393c33b0558_SS1*mw34fb2519_79b1_4f10_8668_6410726988c5_SS1_1_combined - mwc743b64f_a6a6_493c_8445_a454771ea4b8_SS1_TXTL_NTP_RNAP_R*mw9c2e00f3_d345_4af1_918d_b211abb46cda_SS1;
    mwc743b64f_a6a6_493c_8445_a454771ea4b8_SS1_TXTL_NTP_RNAP_F = 1; mwc743b64f_a6a6_493c_8445_a454771ea4b8_SS1_TXTL_NTP_RNAP_R = 120000;
  mw7df5af94_e685_46a1_beee_1ac0a9c4a9b7_SS1: mw9c2e00f3_d345_4af1_918d_b211abb46cda_SS1 => mw42ea34c3_4490_4d8a_8ee5_dd1c4ac5319c_SS1 + mw3df01083_618d_4509_9811_8b63adf5cb42_SS1; mw7df5af94_e685_46a1_beee_1ac0a9c4a9b7_SS1_TXTL_transcription_rate1*mw9c2e00f3_d345_4af1_918d_b211abb46cda_SS1;
    mw7df5af94_e685_46a1_beee_1ac0a9c4a9b7_SS1_TXTL_transcription_rate1 = 0.001470588;
  mw7ee44b56_392b_44bf_9f64_65be6c0343c2_SS1: mwdad3b651_3698_4347_a3af_13c2fd1cd4eb_SS1 + mw715c6bbe_f050_4257_8bc2_159625dc5aa5_SS1_1_combined -> mw722ec4ac_80c5_4501_a092_98560b5118e5_SS1; mw7ee44b56_392b_44bf_9f64_65be6c0343c2_SS1_TL_AA_F*mwdad3b651_3698_4347_a3af_13c2fd1cd4eb_SS1*mw715c6bbe_f050_4257_8bc2_159625dc5aa5_SS1_1_combined - mw7ee44b56_392b_44bf_9f64_65be6c0343c2_SS1_TL_AA_R*mw722ec4ac_80c5_4501_a092_98560b5118e5_SS1;
    mw7ee44b56_392b_44bf_9f64_65be6c0343c2_SS1_TL_AA_F = 300; mw7ee44b56_392b_44bf_9f64_65be6c0343c2_SS1_TL_AA_R = 0.1;
  mwcba69707_7d63_4853_bdc3_d04b7d068da7_SS1: mw722ec4ac_80c5_4501_a092_98560b5118e5_SS1 + 2 mw34fb2519_79b1_4f10_8668_6410726988c5_SS1_1_combined -> mwd4771b8c_b1d7_4c13_997f_683e301a502a_SS1; mwcba69707_7d63_4853_bdc3_d04b7d068da7_SS1_TL_AGTP_F*mw722ec4ac_80c5_4501_a092_98560b5118e5_SS1*mw34fb2519_79b1_4f10_8668_6410726988c5_SS1_1_combined^2 - mwcba69707_7d63_4853_bdc3_d04b7d068da7_SS1_TL_AGTP_R*mwd4771b8c_b1d7_4c13_997f_683e301a502a_SS1;
    mwcba69707_7d63_4853_bdc3_d04b7d068da7_SS1_TL_AGTP_F = 30; mwcba69707_7d63_4853_bdc3_d04b7d068da7_SS1_TL_AGTP_R = 10;
  mw8025e3c3_09ab_48c9_8537_6e61bcd29c5f_SS1: mwd4771b8c_b1d7_4c13_997f_683e301a502a_SS1 => mwecef8e3a_4d8c_4f45_87ff_436093b9076f_SS1; mw8025e3c3_09ab_48c9_8537_6e61bcd29c5f_SS1_TXTL_TL_AA_consumption*mwd4771b8c_b1d7_4c13_997f_683e301a502a_SS1;
    mw8025e3c3_09ab_48c9_8537_6e61bcd29c5f_SS1_TXTL_TL_AA_consumption = 0.024;
  mw5c15d96d_0b86_4a69_bb1d_6b7934ef3298_SS1: mwd4771b8c_b1d7_4c13_997f_683e301a502a_SS1 => mwecef8e3a_4d8c_4f45_87ff_436093b9076f_SS1 + mw20c9d2b7_2d30_489e_82d1_e71648158436_SS1; mw5c15d96d_0b86_4a69_bb1d_6b7934ef3298_SS1_TXTL_TL_rate*mwd4771b8c_b1d7_4c13_997f_683e301a502a_SS1;
    mw5c15d96d_0b86_4a69_bb1d_6b7934ef3298_SS1_TXTL_TL_rate = 0.012;
  mwd88172cc_70fa_4226_a3b4_de8ced26a0bb_SS1: mwecef8e3a_4d8c_4f45_87ff_436093b9076f_SS1 => mw3df01083_618d_4509_9811_8b63adf5cb42_SS1 + mw27aa16fc_b76d_46c2_b301_0456b7e3aace_SS1_1_combined; mwd88172cc_70fa_4226_a3b4_de8ced26a0bb_SS1_TXTL_RIBOBOUND_TERMINATION_RATE*mwecef8e3a_4d8c_4f45_87ff_436093b9076f_SS1;
    mwd88172cc_70fa_4226_a3b4_de8ced26a0bb_SS1_TXTL_RIBOBOUND_TERMINATION_RATE = 50;
  mw7d29a1c1_af88_4806_a677_0ff5ed99d36d_SS1: mw3df01083_618d_4509_9811_8b63adf5cb42_SS1 + mw288eb330_bc2f_470f_9628_e990cb2252e5_SS1_1_combined -> mw773fc4b1_f808_4bf3_85ad_07ce9b454369_SS1; mw7d29a1c1_af88_4806_a677_0ff5ed99d36d_SS1_TXTL_RNAdeg_F*mw3df01083_618d_4509_9811_8b63adf5cb42_SS1*mw288eb330_bc2f_470f_9628_e990cb2252e5_SS1_1_combined - mw7d29a1c1_af88_4806_a677_0ff5ed99d36d_SS1_TXTL_RNAdeg_R*mw773fc4b1_f808_4bf3_85ad_07ce9b454369_SS1;
    mw7d29a1c1_af88_4806_a677_0ff5ed99d36d_SS1_TXTL_RNAdeg_F = 10; mw7d29a1c1_af88_4806_a677_0ff5ed99d36d_SS1_TXTL_RNAdeg_R = 2000;
  mwc34d382a_d7ec_4899_9d7c_b16f4e2c4783_SS1: mw773fc4b1_f808_4bf3_85ad_07ce9b454369_SS1 => mw288eb330_bc2f_470f_9628_e990cb2252e5_SS1_1_combined; mwc34d382a_d7ec_4899_9d7c_b16f4e2c4783_SS1_TXTL_RNAdeg_F*mw773fc4b1_f808_4bf3_85ad_07ce9b454369_SS1;
    mwc34d382a_d7ec_4899_9d7c_b16f4e2c4783_SS1_TXTL_RNAdeg_F = 0.002777778;
  mw808ed454_cf22_4658_8b50_9e7938af39f6_SS1: mwdad3b651_3698_4347_a3af_13c2fd1cd4eb_SS1 + mw288eb330_bc2f_470f_9628_e990cb2252e5_SS1_1_combined -> mw3222fc51_b8a6_481b_adcf_8fa66964731e_SS1; mw808ed454_cf22_4658_8b50_9e7938af39f6_SS1_TXTL_RNAdeg_F*mwdad3b651_3698_4347_a3af_13c2fd1cd4eb_SS1*mw288eb330_bc2f_470f_9628_e990cb2252e5_SS1_1_combined - mw808ed454_cf22_4658_8b50_9e7938af39f6_SS1_TXTL_RNAdeg_R*mw3222fc51_b8a6_481b_adcf_8fa66964731e_SS1;
    mw808ed454_cf22_4658_8b50_9e7938af39f6_SS1_TXTL_RNAdeg_F = 10; mw808ed454_cf22_4658_8b50_9e7938af39f6_SS1_TXTL_RNAdeg_R = 2000;
  mw61fc5e2b_a2f0_48e0_932d_d8cae7c04c26_SS1: mw3222fc51_b8a6_481b_adcf_8fa66964731e_SS1 => mw288eb330_bc2f_470f_9628_e990cb2252e5_SS1_1_combined + mw27aa16fc_b76d_46c2_b301_0456b7e3aace_SS1_1_combined; mw61fc5e2b_a2f0_48e0_932d_d8cae7c04c26_SS1_TXTL_RNAdeg_F*mw3222fc51_b8a6_481b_adcf_8fa66964731e_SS1;
    mw61fc5e2b_a2f0_48e0_932d_d8cae7c04c26_SS1_TXTL_RNAdeg_F = 0.002777778;
  mwd9e27d2b_0794_4f96_b217_610230786396_SS1: mwd4771b8c_b1d7_4c13_997f_683e301a502a_SS1 + mw288eb330_bc2f_470f_9628_e990cb2252e5_SS1_1_combined -> mwbd8bbca4_ad12_4dd6_80fc_656686d30456_SS1; mwd9e27d2b_0794_4f96_b217_610230786396_SS1_TXTL_RNAdeg_F*mwd4771b8c_b1d7_4c13_997f_683e301a502a_SS1*mw288eb330_bc2f_470f_9628_e990cb2252e5_SS1_1_combined - mwd9e27d2b_0794_4f96_b217_610230786396_SS1_TXTL_RNAdeg_R*mwbd8bbca4_ad12_4dd6_80fc_656686d30456_SS1;
    mwd9e27d2b_0794_4f96_b217_610230786396_SS1_TXTL_RNAdeg_F = 10; mwd9e27d2b_0794_4f96_b217_610230786396_SS1_TXTL_RNAdeg_R = 2000;
  mwe9e8bed5_b0c6_4b78_88d2_06babe473757_SS1: mwbd8bbca4_ad12_4dd6_80fc_656686d30456_SS1 => mw288eb330_bc2f_470f_9628_e990cb2252e5_SS1_1_combined + mw715c6bbe_f050_4257_8bc2_159625dc5aa5_SS1_1_combined + 2 mw34fb2519_79b1_4f10_8668_6410726988c5_SS1_1_combined + mw27aa16fc_b76d_46c2_b301_0456b7e3aace_SS1_1_combined; mwe9e8bed5_b0c6_4b78_88d2_06babe473757_SS1_TXTL_RNAdeg_F*mwbd8bbca4_ad12_4dd6_80fc_656686d30456_SS1;
    mwe9e8bed5_b0c6_4b78_88d2_06babe473757_SS1_TXTL_RNAdeg_F = 0.002777778;
  mw9c8debee_f20e_46af_adcb_7bf420e4dea2_SS1: mwecef8e3a_4d8c_4f45_87ff_436093b9076f_SS1 + mw288eb330_bc2f_470f_9628_e990cb2252e5_SS1_1_combined -> mw5453f37e_770a_422a_ba2f_43c5372ca7be_SS1; mw9c8debee_f20e_46af_adcb_7bf420e4dea2_SS1_TXTL_RNAdeg_F*mwecef8e3a_4d8c_4f45_87ff_436093b9076f_SS1*mw288eb330_bc2f_470f_9628_e990cb2252e5_SS1_1_combined - mw9c8debee_f20e_46af_adcb_7bf420e4dea2_SS1_TXTL_RNAdeg_R*mw5453f37e_770a_422a_ba2f_43c5372ca7be_SS1;
    mw9c8debee_f20e_46af_adcb_7bf420e4dea2_SS1_TXTL_RNAdeg_F = 10; mw9c8debee_f20e_46af_adcb_7bf420e4dea2_SS1_TXTL_RNAdeg_R = 2000;
  mw436881db_622f_457d_9adc_4d50e00496e9_SS1: mw5453f37e_770a_422a_ba2f_43c5372ca7be_SS1 => mw288eb330_bc2f_470f_9628_e990cb2252e5_SS1_1_combined + mw27aa16fc_b76d_46c2_b301_0456b7e3aace_SS1_1_combined; mw436881db_622f_457d_9adc_4d50e00496e9_SS1_TXTL_RNAdeg_F*mw5453f37e_770a_422a_ba2f_43c5372ca7be_SS1;
    mw436881db_622f_457d_9adc_4d50e00496e9_SS1_TXTL_RNAdeg_F = 0.002777778;
  mw3270dad3_c7a3_4305_ad64_dca872557e9c_SS1: mw722ec4ac_80c5_4501_a092_98560b5118e5_SS1 + mw288eb330_bc2f_470f_9628_e990cb2252e5_SS1_1_combined -> mwe1a34348_ddac_4a4e_be5b_0895f8905865_SS1; mw3270dad3_c7a3_4305_ad64_dca872557e9c_SS1_TXTL_RNAdeg_F*mw722ec4ac_80c5_4501_a092_98560b5118e5_SS1*mw288eb330_bc2f_470f_9628_e990cb2252e5_SS1_1_combined - mw3270dad3_c7a3_4305_ad64_dca872557e9c_SS1_TXTL_RNAdeg_R*mwe1a34348_ddac_4a4e_be5b_0895f8905865_SS1;
    mw3270dad3_c7a3_4305_ad64_dca872557e9c_SS1_TXTL_RNAdeg_F = 10; mw3270dad3_c7a3_4305_ad64_dca872557e9c_SS1_TXTL_RNAdeg_R = 2000;
  mwc77fda0b_ed7c_4043_b4e8_7db21fa3ea74_SS1: mwe1a34348_ddac_4a4e_be5b_0895f8905865_SS1 => mw288eb330_bc2f_470f_9628_e990cb2252e5_SS1_1_combined + mw715c6bbe_f050_4257_8bc2_159625dc5aa5_SS1_1_combined + mw27aa16fc_b76d_46c2_b301_0456b7e3aace_SS1_1_combined; mwc77fda0b_ed7c_4043_b4e8_7db21fa3ea74_SS1_TXTL_RNAdeg_F*mwe1a34348_ddac_4a4e_be5b_0895f8905865_SS1;
    mwc77fda0b_ed7c_4043_b4e8_7db21fa3ea74_SS1_TXTL_RNAdeg_F = 0.002777778;
  mwdf2c0f1e_af7c_4b62_9d47_6cc4f9f42a01_SS1_combined: mw34fb2519_79b1_4f10_8668_6410726988c5_SS1_1_combined => mwbbb6129b_1e4f_4f45_96c0_f3b1fbebdb22_SS1_1_combined; AGTPdeg_F_combined*mw34fb2519_79b1_4f10_8668_6410726988c5_SS1_1_combined;
  mwff1cec63_4a3e_4cb5_8e16_57bef83e3ddf_SS2: mwc00961a6_47d1_4f5a_9c49_00fb0d02cd8a_SS2 + mw28f62bd1_3a2b_45ba_be22_53e2eb1a9509_SS2_1_combined -> mw36dad171_05d7_4907_8d71_c2b3b5e51352_SS2; TXTL_INDUCER_LacI_IPTG_F*mwc00961a6_47d1_4f5a_9c49_00fb0d02cd8a_SS2*mw28f62bd1_3a2b_45ba_be22_53e2eb1a9509_SS2_1_combined - TXTL_INDUCER_LacI_IPTG_R*mw36dad171_05d7_4907_8d71_c2b3b5e51352_SS2;
    TXTL_INDUCER_LacI_IPTG_F = 0.1; TXTL_INDUCER_LacI_IPTG_R = 0.01;
  mwcd3b81cf_3a79_46e8_8b86_b4ff4ce2eebe_SS2: 2 mweb04477f_13a4_4d28_8518_06b1c5bae4de_SS2 -> mw609aa47a_fc0e_418c_a186_aa3a658fb203_SS2; kf*mweb04477f_13a4_4d28_8518_06b1c5bae4de_SS2^2 - kr*mw609aa47a_fc0e_418c_a186_aa3a658fb203_SS2;
    kf = 1.1; kr = 1;
  mw3701a3c9_013e_4850_a56f_d955ac7b1af5_SS2: 2 mw609aa47a_fc0e_418c_a186_aa3a658fb203_SS2 -> mwc00961a6_47d1_4f5a_9c49_00fb0d02cd8a_SS2; TXTL_PROT_TETRAMER_proteinlacI_F*mw609aa47a_fc0e_418c_a186_aa3a658fb203_SS2^2 - TXTL_PROT_TETRAMER_proteinlacI_R*mwc00961a6_47d1_4f5a_9c49_00fb0d02cd8a_SS2;
    TXTL_PROT_TETRAMER_proteinlacI_F = 2; TXTL_PROT_TETRAMER_proteinlacI_R = 250;
  mw39391935_db59_4854_a7f3_d007a3c800e9_SS2: mwcbd6bcc3_2c61_4e12_a6f7_e1ac7bc57188_SS2 + mw27aa16fc_b76d_46c2_b301_0456b7e3aace_SS1_1_combined -> mw6fb7f787_57b9_494d_a431_121e3ccbcda9_SS2; mw39391935_db59_4854_a7f3_d007a3c800e9_SS2_TXTL_UTR_UTR1_F*mwcbd6bcc3_2c61_4e12_a6f7_e1ac7bc57188_SS2*mw27aa16fc_b76d_46c2_b301_0456b7e3aace_SS1_1_combined - mw39391935_db59_4854_a7f3_d007a3c800e9_SS2_TXTL_UTR_UTR1_R*mw6fb7f787_57b9_494d_a431_121e3ccbcda9_SS2;
    mw39391935_db59_4854_a7f3_d007a3c800e9_SS2_TXTL_UTR_UTR1_F = 0.2; mw39391935_db59_4854_a7f3_d007a3c800e9_SS2_TXTL_UTR_UTR1_R = 4;
  mwa1f4ef50_1840_44c6_b67d_a4e5a1a3c6fd_SS2: mwdb801a58_028d_43ff_90eb_830d15b4bc7f_SS2 + mw3c367a17_7386_470c_8c72_954a48def552_SS1_1_combined -> mwde89bce9_6b96_41b5_ab10_47fdb6f84323_SS2; mwa1f4ef50_1840_44c6_b67d_a4e5a1a3c6fd_SS2_TXTL_POR1OR2_RNAPbound_F*mwdb801a58_028d_43ff_90eb_830d15b4bc7f_SS2*mw3c367a17_7386_470c_8c72_954a48def552_SS1_1_combined - mwa1f4ef50_1840_44c6_b67d_a4e5a1a3c6fd_SS2_TXTL_POR1OR2_RNAPbound_R*mwde89bce9_6b96_41b5_ab10_47fdb6f84323_SS2;
    mwa1f4ef50_1840_44c6_b67d_a4e5a1a3c6fd_SS2_TXTL_POR1OR2_RNAPbound_F = 20; mwa1f4ef50_1840_44c6_b67d_a4e5a1a3c6fd_SS2_TXTL_POR1OR2_RNAPbound_R = 400;
  mw4a66ddbd_47a7_43ce_af40_6e87913f3535_SS2: mwb8e6b1d7_6c72_4a9b_a640_24ba06276629_SS2 => mwde89bce9_6b96_41b5_ab10_47fdb6f84323_SS2; mw4a66ddbd_47a7_43ce_af40_6e87913f3535_SS2_TXTL_NTP_consumption*mwb8e6b1d7_6c72_4a9b_a640_24ba06276629_SS2;
    mw4a66ddbd_47a7_43ce_af40_6e87913f3535_SS2_TXTL_NTP_consumption = 0.7487705;
  mwfdef4d20_4109_463d_b082_b17425eea08c_SS2: mw117ae676_633e_4f3a_be8d_eacdbdddfeea_SS2 => mw3c367a17_7386_470c_8c72_954a48def552_SS1_1_combined + mwdb801a58_028d_43ff_90eb_830d15b4bc7f_SS2; mwfdef4d20_4109_463d_b082_b17425eea08c_SS2_TXTL_RNAPBOUND_TERMINATION_RATE*mw117ae676_633e_4f3a_be8d_eacdbdddfeea_SS2;
    mwfdef4d20_4109_463d_b082_b17425eea08c_SS2_TXTL_RNAPBOUND_TERMINATION_RATE = 0.05;
  mw1f48fbad_07b8_4e1d_bbe5_fd536dbd34bb_SS2: mwde89bce9_6b96_41b5_ab10_47fdb6f84323_SS2 + mw34fb2519_79b1_4f10_8668_6410726988c5_SS1_1_combined -> mw4740c413_fa03_405b_a56e_3a2fd6375f6c_SS2; mw1f48fbad_07b8_4e1d_bbe5_fd536dbd34bb_SS2_TXTL_NTP_RNAP_F*mwde89bce9_6b96_41b5_ab10_47fdb6f84323_SS2*mw34fb2519_79b1_4f10_8668_6410726988c5_SS1_1_combined - mw1f48fbad_07b8_4e1d_bbe5_fd536dbd34bb_SS2_TXTL_NTP_RNAP_R*mw4740c413_fa03_405b_a56e_3a2fd6375f6c_SS2;
    mw1f48fbad_07b8_4e1d_bbe5_fd536dbd34bb_SS2_TXTL_NTP_RNAP_F = 1000; mw1f48fbad_07b8_4e1d_bbe5_fd536dbd34bb_SS2_TXTL_NTP_RNAP_R = 120000000;
  mwd1f72a45_72cd_40ec_960f_1239c4292778_SS2: mwde89bce9_6b96_41b5_ab10_47fdb6f84323_SS2 + mw4f8d0806_0366_43d5_8a2a_a05ee3287512_SS1_1_combined -> mwb71129fd_b0dc_41ce_a833_e547a1c07b4f_SS2; mwd1f72a45_72cd_40ec_960f_1239c4292778_SS2_TXTL_NTP_RNAP_F*mwde89bce9_6b96_41b5_ab10_47fdb6f84323_SS2*mw4f8d0806_0366_43d5_8a2a_a05ee3287512_SS1_1_combined - mwd1f72a45_72cd_40ec_960f_1239c4292778_SS2_TXTL_NTP_RNAP_R*mwb71129fd_b0dc_41ce_a833_e547a1c07b4f_SS2;
    mwd1f72a45_72cd_40ec_960f_1239c4292778_SS2_TXTL_NTP_RNAP_F = 1000; mwd1f72a45_72cd_40ec_960f_1239c4292778_SS2_TXTL_NTP_RNAP_R = 120000000;
  mw4c9145df_8b24_4aaa_a454_8036c6007b39_SS2: mw4740c413_fa03_405b_a56e_3a2fd6375f6c_SS2 + mw4f8d0806_0366_43d5_8a2a_a05ee3287512_SS1_1_combined -> mwb8e6b1d7_6c72_4a9b_a640_24ba06276629_SS2; mw4c9145df_8b24_4aaa_a454_8036c6007b39_SS2_TXTL_NTP_RNAP_F*mw4740c413_fa03_405b_a56e_3a2fd6375f6c_SS2*mw4f8d0806_0366_43d5_8a2a_a05ee3287512_SS1_1_combined - mw4c9145df_8b24_4aaa_a454_8036c6007b39_SS2_TXTL_NTP_RNAP_R*mwb8e6b1d7_6c72_4a9b_a640_24ba06276629_SS2;
    mw4c9145df_8b24_4aaa_a454_8036c6007b39_SS2_TXTL_NTP_RNAP_F = 1; mw4c9145df_8b24_4aaa_a454_8036c6007b39_SS2_TXTL_NTP_RNAP_R = 120000;
  mwaa070dd1_2fdb_4813_8e3e_0e4755cfbdd6_SS2: mwb71129fd_b0dc_41ce_a833_e547a1c07b4f_SS2 + mw34fb2519_79b1_4f10_8668_6410726988c5_SS1_1_combined -> mwb8e6b1d7_6c72_4a9b_a640_24ba06276629_SS2; mwaa070dd1_2fdb_4813_8e3e_0e4755cfbdd6_SS2_TXTL_NTP_RNAP_F*mwb71129fd_b0dc_41ce_a833_e547a1c07b4f_SS2*mw34fb2519_79b1_4f10_8668_6410726988c5_SS1_1_combined - mwaa070dd1_2fdb_4813_8e3e_0e4755cfbdd6_SS2_TXTL_NTP_RNAP_R*mwb8e6b1d7_6c72_4a9b_a640_24ba06276629_SS2;
    mwaa070dd1_2fdb_4813_8e3e_0e4755cfbdd6_SS2_TXTL_NTP_RNAP_F = 1; mwaa070dd1_2fdb_4813_8e3e_0e4755cfbdd6_SS2_TXTL_NTP_RNAP_R = 120000;
  mwa28f59ba_7f2e_49a2_979b_4a26d5a45d5f_SS2: mwb8e6b1d7_6c72_4a9b_a640_24ba06276629_SS2 => mw117ae676_633e_4f3a_be8d_eacdbdddfeea_SS2 + mwcbd6bcc3_2c61_4e12_a6f7_e1ac7bc57188_SS2; mwa28f59ba_7f2e_49a2_979b_4a26d5a45d5f_SS2_TXTL_transcription_rate1*mwb8e6b1d7_6c72_4a9b_a640_24ba06276629_SS2;
    mwa28f59ba_7f2e_49a2_979b_4a26d5a45d5f_SS2_TXTL_transcription_rate1 = 0.001229508;
  mw84c3bc07_76f7_4c44_a07f_2bc8abfa4bc2_SS2: mw6fb7f787_57b9_494d_a431_121e3ccbcda9_SS2 + mw715c6bbe_f050_4257_8bc2_159625dc5aa5_SS1_1_combined -> mwf36a5d62_cdc5_4e90_af35_a9fa5ddb33e2_SS2; mw84c3bc07_76f7_4c44_a07f_2bc8abfa4bc2_SS2_TL_AA_F*mw6fb7f787_57b9_494d_a431_121e3ccbcda9_SS2*mw715c6bbe_f050_4257_8bc2_159625dc5aa5_SS1_1_combined - mw84c3bc07_76f7_4c44_a07f_2bc8abfa4bc2_SS2_TL_AA_R*mwf36a5d62_cdc5_4e90_af35_a9fa5ddb33e2_SS2;
    mw84c3bc07_76f7_4c44_a07f_2bc8abfa4bc2_SS2_TL_AA_F = 300; mw84c3bc07_76f7_4c44_a07f_2bc8abfa4bc2_SS2_TL_AA_R = 0.1;
  mw93caaec5_11f1_4f31_ab8f_aff6bbb0d5dc_SS2: mwf36a5d62_cdc5_4e90_af35_a9fa5ddb33e2_SS2 + 2 mw34fb2519_79b1_4f10_8668_6410726988c5_SS1_1_combined -> mw969018c5_d898_4ea0_bb80_35de71266464_SS2; mw93caaec5_11f1_4f31_ab8f_aff6bbb0d5dc_SS2_TL_AGTP_F*mwf36a5d62_cdc5_4e90_af35_a9fa5ddb33e2_SS2*mw34fb2519_79b1_4f10_8668_6410726988c5_SS1_1_combined^2 - mw93caaec5_11f1_4f31_ab8f_aff6bbb0d5dc_SS2_TL_AGTP_R*mw969018c5_d898_4ea0_bb80_35de71266464_SS2;
    mw93caaec5_11f1_4f31_ab8f_aff6bbb0d5dc_SS2_TL_AGTP_F = 30; mw93caaec5_11f1_4f31_ab8f_aff6bbb0d5dc_SS2_TL_AGTP_R = 10;
  mw97df6501_7bfc_4165_945f_baf68c2be0e8_SS2: mw969018c5_d898_4ea0_bb80_35de71266464_SS2 => mw7416e86a_aa61_4745_b4bc_072c5e137891_SS2; mw97df6501_7bfc_4165_945f_baf68c2be0e8_SS2_TXTL_TL_AA_consumption*mw969018c5_d898_4ea0_bb80_35de71266464_SS2;
    mw97df6501_7bfc_4165_945f_baf68c2be0e8_SS2_TXTL_TL_AA_consumption = 0.03;
  mwab45a163_e2fe_4937_b582_ccdec790dcb5_SS2: mw969018c5_d898_4ea0_bb80_35de71266464_SS2 => mw7416e86a_aa61_4745_b4bc_072c5e137891_SS2 + mweb04477f_13a4_4d28_8518_06b1c5bae4de_SS2; mwab45a163_e2fe_4937_b582_ccdec790dcb5_SS2_TXTL_TL_rate*mw969018c5_d898_4ea0_bb80_35de71266464_SS2;
    mwab45a163_e2fe_4937_b582_ccdec790dcb5_SS2_TXTL_TL_rate = 0.01;
  mwe75db1d4_7d1f_4ac9_94fb_4ec0ae693fcf_SS2: mw7416e86a_aa61_4745_b4bc_072c5e137891_SS2 => mwcbd6bcc3_2c61_4e12_a6f7_e1ac7bc57188_SS2 + mw27aa16fc_b76d_46c2_b301_0456b7e3aace_SS1_1_combined; mwe75db1d4_7d1f_4ac9_94fb_4ec0ae693fcf_SS2_TXTL_RIBOBOUND_TERMINATION_RATE*mw7416e86a_aa61_4745_b4bc_072c5e137891_SS2;
    mwe75db1d4_7d1f_4ac9_94fb_4ec0ae693fcf_SS2_TXTL_RIBOBOUND_TERMINATION_RATE = 50;
  mwe24cd258_a7e7_40f5_833d_c3d41e0ef046_SS2: mwcbd6bcc3_2c61_4e12_a6f7_e1ac7bc57188_SS2 + mw288eb330_bc2f_470f_9628_e990cb2252e5_SS1_1_combined -> mwcb7850c8_3801_4d30_9282_42269ca72cc2_SS2; mwe24cd258_a7e7_40f5_833d_c3d41e0ef046_SS2_TXTL_RNAdeg_F*mwcbd6bcc3_2c61_4e12_a6f7_e1ac7bc57188_SS2*mw288eb330_bc2f_470f_9628_e990cb2252e5_SS1_1_combined - mwe24cd258_a7e7_40f5_833d_c3d41e0ef046_SS2_TXTL_RNAdeg_R*mwcb7850c8_3801_4d30_9282_42269ca72cc2_SS2;
    mwe24cd258_a7e7_40f5_833d_c3d41e0ef046_SS2_TXTL_RNAdeg_F = 10; mwe24cd258_a7e7_40f5_833d_c3d41e0ef046_SS2_TXTL_RNAdeg_R = 2000;
  mw6f4a87f4_3466_4884_b88c_642b912e202f_SS2: mwcb7850c8_3801_4d30_9282_42269ca72cc2_SS2 => mw288eb330_bc2f_470f_9628_e990cb2252e5_SS1_1_combined; mw6f4a87f4_3466_4884_b88c_642b912e202f_SS2_TXTL_RNAdeg_F*mwcb7850c8_3801_4d30_9282_42269ca72cc2_SS2;
    mw6f4a87f4_3466_4884_b88c_642b912e202f_SS2_TXTL_RNAdeg_F = 0.002777778;
  mw4db04782_491a_4679_8196_cafbc55b9f95_SS2: mw6fb7f787_57b9_494d_a431_121e3ccbcda9_SS2 + mw288eb330_bc2f_470f_9628_e990cb2252e5_SS1_1_combined -> mwf0fa4e98_5b94_43bf_9fd1_16e075a088f9_SS2; mw4db04782_491a_4679_8196_cafbc55b9f95_SS2_TXTL_RNAdeg_F*mw6fb7f787_57b9_494d_a431_121e3ccbcda9_SS2*mw288eb330_bc2f_470f_9628_e990cb2252e5_SS1_1_combined - mw4db04782_491a_4679_8196_cafbc55b9f95_SS2_TXTL_RNAdeg_R*mwf0fa4e98_5b94_43bf_9fd1_16e075a088f9_SS2;
    mw4db04782_491a_4679_8196_cafbc55b9f95_SS2_TXTL_RNAdeg_F = 10; mw4db04782_491a_4679_8196_cafbc55b9f95_SS2_TXTL_RNAdeg_R = 2000;
  mwff98d8db_9eb8_4b79_8b38_e7e04bbc7217_SS2: mwf0fa4e98_5b94_43bf_9fd1_16e075a088f9_SS2 => mw288eb330_bc2f_470f_9628_e990cb2252e5_SS1_1_combined + mw27aa16fc_b76d_46c2_b301_0456b7e3aace_SS1_1_combined; mwff98d8db_9eb8_4b79_8b38_e7e04bbc7217_SS2_TXTL_RNAdeg_F*mwf0fa4e98_5b94_43bf_9fd1_16e075a088f9_SS2;
    mwff98d8db_9eb8_4b79_8b38_e7e04bbc7217_SS2_TXTL_RNAdeg_F = 0.002777778;
  mw3d049690_08fa_4d0a_ba4c_0a9b22df2891_SS2: mw969018c5_d898_4ea0_bb80_35de71266464_SS2 + mw288eb330_bc2f_470f_9628_e990cb2252e5_SS1_1_combined -> mw87bea200_227d_4010_9616_9bee4d30458b_SS2; mw3d049690_08fa_4d0a_ba4c_0a9b22df2891_SS2_TXTL_RNAdeg_F*mw969018c5_d898_4ea0_bb80_35de71266464_SS2*mw288eb330_bc2f_470f_9628_e990cb2252e5_SS1_1_combined - mw3d049690_08fa_4d0a_ba4c_0a9b22df2891_SS2_TXTL_RNAdeg_R*mw87bea200_227d_4010_9616_9bee4d30458b_SS2;
    mw3d049690_08fa_4d0a_ba4c_0a9b22df2891_SS2_TXTL_RNAdeg_F = 10; mw3d049690_08fa_4d0a_ba4c_0a9b22df2891_SS2_TXTL_RNAdeg_R = 2000;
  mwecbf84a6_a947_4d45_ab03_ff2e84d9393e_SS2: mw87bea200_227d_4010_9616_9bee4d30458b_SS2 => mw288eb330_bc2f_470f_9628_e990cb2252e5_SS1_1_combined + mw715c6bbe_f050_4257_8bc2_159625dc5aa5_SS1_1_combined + 2 mw34fb2519_79b1_4f10_8668_6410726988c5_SS1_1_combined + mw27aa16fc_b76d_46c2_b301_0456b7e3aace_SS1_1_combined; mwecbf84a6_a947_4d45_ab03_ff2e84d9393e_SS2_TXTL_RNAdeg_F*mw87bea200_227d_4010_9616_9bee4d30458b_SS2;
    mwecbf84a6_a947_4d45_ab03_ff2e84d9393e_SS2_TXTL_RNAdeg_F = 0.002777778;
  mwbd81f83f_4a97_4d53_b31d_ece9ad1375d6_SS2: mw7416e86a_aa61_4745_b4bc_072c5e137891_SS2 + mw288eb330_bc2f_470f_9628_e990cb2252e5_SS1_1_combined -> mwd91c4e55_95af_42a7_ac6d_2c307d96e1fe_SS2; mwbd81f83f_4a97_4d53_b31d_ece9ad1375d6_SS2_TXTL_RNAdeg_F*mw7416e86a_aa61_4745_b4bc_072c5e137891_SS2*mw288eb330_bc2f_470f_9628_e990cb2252e5_SS1_1_combined - mwbd81f83f_4a97_4d53_b31d_ece9ad1375d6_SS2_TXTL_RNAdeg_R*mwd91c4e55_95af_42a7_ac6d_2c307d96e1fe_SS2;
    mwbd81f83f_4a97_4d53_b31d_ece9ad1375d6_SS2_TXTL_RNAdeg_F = 10; mwbd81f83f_4a97_4d53_b31d_ece9ad1375d6_SS2_TXTL_RNAdeg_R = 2000;
  mw26898fb3_ee4b_481d_a532_0cbdbd5fc17d_SS2: mwd91c4e55_95af_42a7_ac6d_2c307d96e1fe_SS2 => mw288eb330_bc2f_470f_9628_e990cb2252e5_SS1_1_combined + mw27aa16fc_b76d_46c2_b301_0456b7e3aace_SS1_1_combined; mw26898fb3_ee4b_481d_a532_0cbdbd5fc17d_SS2_TXTL_RNAdeg_F*mwd91c4e55_95af_42a7_ac6d_2c307d96e1fe_SS2;
    mw26898fb3_ee4b_481d_a532_0cbdbd5fc17d_SS2_TXTL_RNAdeg_F = 0.002777778;
  mwdba62f7f_eedb_4972_bd0f_2056dfa80482_SS2: mwf36a5d62_cdc5_4e90_af35_a9fa5ddb33e2_SS2 + mw288eb330_bc2f_470f_9628_e990cb2252e5_SS1_1_combined -> mwf056a433_e0f6_461e_bfe3_c2b3c62486ca_SS2; mwdba62f7f_eedb_4972_bd0f_2056dfa80482_SS2_TXTL_RNAdeg_F*mwf36a5d62_cdc5_4e90_af35_a9fa5ddb33e2_SS2*mw288eb330_bc2f_470f_9628_e990cb2252e5_SS1_1_combined - mwdba62f7f_eedb_4972_bd0f_2056dfa80482_SS2_TXTL_RNAdeg_R*mwf056a433_e0f6_461e_bfe3_c2b3c62486ca_SS2;
    mwdba62f7f_eedb_4972_bd0f_2056dfa80482_SS2_TXTL_RNAdeg_F = 10; mwdba62f7f_eedb_4972_bd0f_2056dfa80482_SS2_TXTL_RNAdeg_R = 2000;
  mwe4c90670_b834_4436_a2a3_a0cade5efa4f_SS2: mwf056a433_e0f6_461e_bfe3_c2b3c62486ca_SS2 => mw288eb330_bc2f_470f_9628_e990cb2252e5_SS1_1_combined + mw715c6bbe_f050_4257_8bc2_159625dc5aa5_SS1_1_combined + mw27aa16fc_b76d_46c2_b301_0456b7e3aace_SS1_1_combined; mwe4c90670_b834_4436_a2a3_a0cade5efa4f_SS2_TXTL_RNAdeg_F*mwf056a433_e0f6_461e_bfe3_c2b3c62486ca_SS2;
    mwe4c90670_b834_4436_a2a3_a0cade5efa4f_SS2_TXTL_RNAdeg_F = 0.002777778;
  mw96c464c0_18c2_4178_82dd_e41acc33fb34_SS2: mw5c94996f_4533_4f46_813f_fb42fa7356f3_SS2 => mw6600ba7f_5b6d_4e5d_89a2_4d798f44476d_SS2; TXTL_PROT_deGFP_MATURATION*mw5c94996f_4533_4f46_813f_fb42fa7356f3_SS2;
    TXTL_PROT_deGFP_MATURATION = 0.002310491;
  mw662fff41_e987_4afc_a587_e68c159d727c_SS2: mw6a8ec7cf_9ce3_4f43_a91b_8cf54a67e9cb_SS2 + mw27aa16fc_b76d_46c2_b301_0456b7e3aace_SS1_1_combined -> mw11bfe9cd_0d22_4115_b9f7_163fa42fa97b_SS2; mw662fff41_e987_4afc_a587_e68c159d727c_SS2_TXTL_UTR_UTR1_F*mw6a8ec7cf_9ce3_4f43_a91b_8cf54a67e9cb_SS2*mw27aa16fc_b76d_46c2_b301_0456b7e3aace_SS1_1_combined - mw662fff41_e987_4afc_a587_e68c159d727c_SS2_TXTL_UTR_UTR1_R*mw11bfe9cd_0d22_4115_b9f7_163fa42fa97b_SS2;
    mw662fff41_e987_4afc_a587_e68c159d727c_SS2_TXTL_UTR_UTR1_F = 0.2; mw662fff41_e987_4afc_a587_e68c159d727c_SS2_TXTL_UTR_UTR1_R = 4;
  mw63c8c74c_e420_4859_bc9d_f3cd3b410fed_SS2: mw0f006cd4_e78e_48c5_b532_eb6e2f3c6121_SS2 + mw3c367a17_7386_470c_8c72_954a48def552_SS1_1_combined -> mw55a8259b_29cf_445a_a79e_f0229fbc33d2_SS2; TXTL_PLAC_RNAPbound_F*mw0f006cd4_e78e_48c5_b532_eb6e2f3c6121_SS2*mw3c367a17_7386_470c_8c72_954a48def552_SS1_1_combined - TXTL_PLAC_RNAPbound_R*mw55a8259b_29cf_445a_a79e_f0229fbc33d2_SS2;
    TXTL_PLAC_RNAPbound_F = 20; TXTL_PLAC_RNAPbound_R = 400;
  mw2db33076_5d6d_4b30_8fc6_4a0e38c7f22c_SS2: mw68ff84bd_5ee7_416e_8ada_d4f9bad9d42b_SS2 => mw55a8259b_29cf_445a_a79e_f0229fbc33d2_SS2; mw2db33076_5d6d_4b30_8fc6_4a0e38c7f22c_SS2_TXTL_NTP_consumption*mw68ff84bd_5ee7_416e_8ada_d4f9bad9d42b_SS2;
    mw2db33076_5d6d_4b30_8fc6_4a0e38c7f22c_SS2_TXTL_NTP_consumption = 0.7485294;
  mw9fa51c7f_e24a_43d0_a99c_9a123f64c696_SS2: mwc200e475_c73f_465a_8de3_97b93a64c967_SS2 => mw3c367a17_7386_470c_8c72_954a48def552_SS1_1_combined + mw0f006cd4_e78e_48c5_b532_eb6e2f3c6121_SS2; mw9fa51c7f_e24a_43d0_a99c_9a123f64c696_SS2_TXTL_RNAPBOUND_TERMINATION_RATE*mwc200e475_c73f_465a_8de3_97b93a64c967_SS2;
    mw9fa51c7f_e24a_43d0_a99c_9a123f64c696_SS2_TXTL_RNAPBOUND_TERMINATION_RATE = 0.05;
  mw8486db3d_08d8_4c71_a449_c98a2309d0c0_SS2: mw55a8259b_29cf_445a_a79e_f0229fbc33d2_SS2 + mw34fb2519_79b1_4f10_8668_6410726988c5_SS1_1_combined -> mwd6c5bf43_5a9f_455e_8341_73d1b30d0264_SS2; mw8486db3d_08d8_4c71_a449_c98a2309d0c0_SS2_TXTL_NTP_RNAP_F*mw55a8259b_29cf_445a_a79e_f0229fbc33d2_SS2*mw34fb2519_79b1_4f10_8668_6410726988c5_SS1_1_combined - mw8486db3d_08d8_4c71_a449_c98a2309d0c0_SS2_TXTL_NTP_RNAP_R*mwd6c5bf43_5a9f_455e_8341_73d1b30d0264_SS2;
    mw8486db3d_08d8_4c71_a449_c98a2309d0c0_SS2_TXTL_NTP_RNAP_F = 1000; mw8486db3d_08d8_4c71_a449_c98a2309d0c0_SS2_TXTL_NTP_RNAP_R = 120000000;
  mwfab17263_0776_4af5_82cc_4b5f841b645f_SS2: mw55a8259b_29cf_445a_a79e_f0229fbc33d2_SS2 + mw4f8d0806_0366_43d5_8a2a_a05ee3287512_SS1_1_combined -> mw49de218b_1e29_45e1_862c_0dc03a516700_SS2; mwfab17263_0776_4af5_82cc_4b5f841b645f_SS2_TXTL_NTP_RNAP_F*mw55a8259b_29cf_445a_a79e_f0229fbc33d2_SS2*mw4f8d0806_0366_43d5_8a2a_a05ee3287512_SS1_1_combined - mwfab17263_0776_4af5_82cc_4b5f841b645f_SS2_TXTL_NTP_RNAP_R*mw49de218b_1e29_45e1_862c_0dc03a516700_SS2;
    mwfab17263_0776_4af5_82cc_4b5f841b645f_SS2_TXTL_NTP_RNAP_F = 1000; mwfab17263_0776_4af5_82cc_4b5f841b645f_SS2_TXTL_NTP_RNAP_R = 120000000;
  mw7ad9678a_3fe9_40fc_843b_1f49e071adf1_SS2: mwd6c5bf43_5a9f_455e_8341_73d1b30d0264_SS2 + mw4f8d0806_0366_43d5_8a2a_a05ee3287512_SS1_1_combined -> mw68ff84bd_5ee7_416e_8ada_d4f9bad9d42b_SS2; mw7ad9678a_3fe9_40fc_843b_1f49e071adf1_SS2_TXTL_NTP_RNAP_F*mwd6c5bf43_5a9f_455e_8341_73d1b30d0264_SS2*mw4f8d0806_0366_43d5_8a2a_a05ee3287512_SS1_1_combined - mw7ad9678a_3fe9_40fc_843b_1f49e071adf1_SS2_TXTL_NTP_RNAP_R*mw68ff84bd_5ee7_416e_8ada_d4f9bad9d42b_SS2;
    mw7ad9678a_3fe9_40fc_843b_1f49e071adf1_SS2_TXTL_NTP_RNAP_F = 1; mw7ad9678a_3fe9_40fc_843b_1f49e071adf1_SS2_TXTL_NTP_RNAP_R = 120000;
  mw6a52a681_b8b0_446c_a757_b22fbc312241_SS2: mw49de218b_1e29_45e1_862c_0dc03a516700_SS2 + mw34fb2519_79b1_4f10_8668_6410726988c5_SS1_1_combined -> mw68ff84bd_5ee7_416e_8ada_d4f9bad9d42b_SS2; mw6a52a681_b8b0_446c_a757_b22fbc312241_SS2_TXTL_NTP_RNAP_F*mw49de218b_1e29_45e1_862c_0dc03a516700_SS2*mw34fb2519_79b1_4f10_8668_6410726988c5_SS1_1_combined - mw6a52a681_b8b0_446c_a757_b22fbc312241_SS2_TXTL_NTP_RNAP_R*mw68ff84bd_5ee7_416e_8ada_d4f9bad9d42b_SS2;
    mw6a52a681_b8b0_446c_a757_b22fbc312241_SS2_TXTL_NTP_RNAP_F = 1; mw6a52a681_b8b0_446c_a757_b22fbc312241_SS2_TXTL_NTP_RNAP_R = 120000;
  mw3d0ed74a_6798_4c0b_969d_48ad2e8c8e02_SS2: mw68ff84bd_5ee7_416e_8ada_d4f9bad9d42b_SS2 => mwc200e475_c73f_465a_8de3_97b93a64c967_SS2 + mw6a8ec7cf_9ce3_4f43_a91b_8cf54a67e9cb_SS2; mw3d0ed74a_6798_4c0b_969d_48ad2e8c8e02_SS2_TXTL_transcription_rate1*mw68ff84bd_5ee7_416e_8ada_d4f9bad9d42b_SS2;
    mw3d0ed74a_6798_4c0b_969d_48ad2e8c8e02_SS2_TXTL_transcription_rate1 = 0.001470588;
  mwd2561193_1367_4f4f_b059_18f9b02de6a1_SS2: mw0f006cd4_e78e_48c5_b532_eb6e2f3c6121_SS2 + mwc00961a6_47d1_4f5a_9c49_00fb0d02cd8a_SS2 -> mw7da17532_fa9d_4ff2_8436_cb08e7696382_SS2; placI_sequestration_F*mw0f006cd4_e78e_48c5_b532_eb6e2f3c6121_SS2*mwc00961a6_47d1_4f5a_9c49_00fb0d02cd8a_SS2 - placI_sequestration_R*mw7da17532_fa9d_4ff2_8436_cb08e7696382_SS2;
    placI_sequestration_F = 150; placI_sequestration_R = 0.1;
  mw9b7e5a40_78d9_4ae0_8175_8c704b3e5e15_SS2: mw11bfe9cd_0d22_4115_b9f7_163fa42fa97b_SS2 + mw715c6bbe_f050_4257_8bc2_159625dc5aa5_SS1_1_combined -> mw6729d170_4447_449b_9e97_0908b0caab6b_SS2; mw9b7e5a40_78d9_4ae0_8175_8c704b3e5e15_SS2_TL_AA_F*mw11bfe9cd_0d22_4115_b9f7_163fa42fa97b_SS2*mw715c6bbe_f050_4257_8bc2_159625dc5aa5_SS1_1_combined - mw9b7e5a40_78d9_4ae0_8175_8c704b3e5e15_SS2_TL_AA_R*mw6729d170_4447_449b_9e97_0908b0caab6b_SS2;
    mw9b7e5a40_78d9_4ae0_8175_8c704b3e5e15_SS2_TL_AA_F = 300; mw9b7e5a40_78d9_4ae0_8175_8c704b3e5e15_SS2_TL_AA_R = 0.1;
  mw886cdd23_9cc1_4a2c_988e_4e7847ce9edb_SS2: mw6729d170_4447_449b_9e97_0908b0caab6b_SS2 + 2 mw34fb2519_79b1_4f10_8668_6410726988c5_SS1_1_combined -> mw50cebc13_eef8_41ce_9a71_72ef3e078558_SS2; mw886cdd23_9cc1_4a2c_988e_4e7847ce9edb_SS2_TL_AGTP_F*mw6729d170_4447_449b_9e97_0908b0caab6b_SS2*mw34fb2519_79b1_4f10_8668_6410726988c5_SS1_1_combined^2 - mw886cdd23_9cc1_4a2c_988e_4e7847ce9edb_SS2_TL_AGTP_R*mw50cebc13_eef8_41ce_9a71_72ef3e078558_SS2;
    mw886cdd23_9cc1_4a2c_988e_4e7847ce9edb_SS2_TL_AGTP_F = 30; mw886cdd23_9cc1_4a2c_988e_4e7847ce9edb_SS2_TL_AGTP_R = 10;
  mw7d42552a_2eb5_4d3e_9a91_c978c2293ae0_SS2: mw50cebc13_eef8_41ce_9a71_72ef3e078558_SS2 => mwe03e3eea_a713_4196_a6d8_44a14c926596_SS2; mw7d42552a_2eb5_4d3e_9a91_c978c2293ae0_SS2_TXTL_TL_AA_consumption*mw50cebc13_eef8_41ce_9a71_72ef3e078558_SS2;
    mw7d42552a_2eb5_4d3e_9a91_c978c2293ae0_SS2_TXTL_TL_AA_consumption = 0.024;
  mw5c80f96c_3d4b_4e22_876a_054655c1bf29_SS2: mw50cebc13_eef8_41ce_9a71_72ef3e078558_SS2 => mwe03e3eea_a713_4196_a6d8_44a14c926596_SS2 + mw5c94996f_4533_4f46_813f_fb42fa7356f3_SS2; mw5c80f96c_3d4b_4e22_876a_054655c1bf29_SS2_TXTL_TL_rate*mw50cebc13_eef8_41ce_9a71_72ef3e078558_SS2;
    mw5c80f96c_3d4b_4e22_876a_054655c1bf29_SS2_TXTL_TL_rate = 0.012;
  mw4f5fe0af_785d_49d5_b933_2f5c065fce88_SS2: mwe03e3eea_a713_4196_a6d8_44a14c926596_SS2 => mw6a8ec7cf_9ce3_4f43_a91b_8cf54a67e9cb_SS2 + mw27aa16fc_b76d_46c2_b301_0456b7e3aace_SS1_1_combined; mw4f5fe0af_785d_49d5_b933_2f5c065fce88_SS2_TXTL_RIBOBOUND_TERMINATION_RATE*mwe03e3eea_a713_4196_a6d8_44a14c926596_SS2;
    mw4f5fe0af_785d_49d5_b933_2f5c065fce88_SS2_TXTL_RIBOBOUND_TERMINATION_RATE = 50;
  mw02c6a3ac_95fe_4064_9ee1_8d2ea4e0fb42_SS2: mw6a8ec7cf_9ce3_4f43_a91b_8cf54a67e9cb_SS2 + mw288eb330_bc2f_470f_9628_e990cb2252e5_SS1_1_combined -> mw611fccdf_157e_40db_8702_848bfb75c079_SS2; mw02c6a3ac_95fe_4064_9ee1_8d2ea4e0fb42_SS2_TXTL_RNAdeg_F*mw6a8ec7cf_9ce3_4f43_a91b_8cf54a67e9cb_SS2*mw288eb330_bc2f_470f_9628_e990cb2252e5_SS1_1_combined - mw02c6a3ac_95fe_4064_9ee1_8d2ea4e0fb42_SS2_TXTL_RNAdeg_R*mw611fccdf_157e_40db_8702_848bfb75c079_SS2;
    mw02c6a3ac_95fe_4064_9ee1_8d2ea4e0fb42_SS2_TXTL_RNAdeg_F = 10; mw02c6a3ac_95fe_4064_9ee1_8d2ea4e0fb42_SS2_TXTL_RNAdeg_R = 2000;
  mwb06ed782_368d_4da8_84b0_d1f9a6cfabfd_SS2: mw611fccdf_157e_40db_8702_848bfb75c079_SS2 => mw288eb330_bc2f_470f_9628_e990cb2252e5_SS1_1_combined; mwb06ed782_368d_4da8_84b0_d1f9a6cfabfd_SS2_TXTL_RNAdeg_F*mw611fccdf_157e_40db_8702_848bfb75c079_SS2;
    mwb06ed782_368d_4da8_84b0_d1f9a6cfabfd_SS2_TXTL_RNAdeg_F = 0.002777778;
  mw61e9151f_eb11_4ec4_89ee_3abff528e7a3_SS2: mw11bfe9cd_0d22_4115_b9f7_163fa42fa97b_SS2 + mw288eb330_bc2f_470f_9628_e990cb2252e5_SS1_1_combined -> mw7e686ddd_072e_4ab7_8512_92481d978201_SS2; mw61e9151f_eb11_4ec4_89ee_3abff528e7a3_SS2_TXTL_RNAdeg_F*mw11bfe9cd_0d22_4115_b9f7_163fa42fa97b_SS2*mw288eb330_bc2f_470f_9628_e990cb2252e5_SS1_1_combined - mw61e9151f_eb11_4ec4_89ee_3abff528e7a3_SS2_TXTL_RNAdeg_R*mw7e686ddd_072e_4ab7_8512_92481d978201_SS2;
    mw61e9151f_eb11_4ec4_89ee_3abff528e7a3_SS2_TXTL_RNAdeg_F = 10; mw61e9151f_eb11_4ec4_89ee_3abff528e7a3_SS2_TXTL_RNAdeg_R = 2000;
  mw672e4b6a_34a1_4d9f_8b84_dc9d39af0453_SS2: mw7e686ddd_072e_4ab7_8512_92481d978201_SS2 => mw288eb330_bc2f_470f_9628_e990cb2252e5_SS1_1_combined + mw27aa16fc_b76d_46c2_b301_0456b7e3aace_SS1_1_combined; mw672e4b6a_34a1_4d9f_8b84_dc9d39af0453_SS2_TXTL_RNAdeg_F*mw7e686ddd_072e_4ab7_8512_92481d978201_SS2;
    mw672e4b6a_34a1_4d9f_8b84_dc9d39af0453_SS2_TXTL_RNAdeg_F = 0.002777778;
  mwa1246a57_cc2a_492f_a329_0d7575269aac_SS2: mw50cebc13_eef8_41ce_9a71_72ef3e078558_SS2 + mw288eb330_bc2f_470f_9628_e990cb2252e5_SS1_1_combined -> mw88722339_572e_456f_85da_875cfc4e92bc_SS2; mwa1246a57_cc2a_492f_a329_0d7575269aac_SS2_TXTL_RNAdeg_F*mw50cebc13_eef8_41ce_9a71_72ef3e078558_SS2*mw288eb330_bc2f_470f_9628_e990cb2252e5_SS1_1_combined - mwa1246a57_cc2a_492f_a329_0d7575269aac_SS2_TXTL_RNAdeg_R*mw88722339_572e_456f_85da_875cfc4e92bc_SS2;
    mwa1246a57_cc2a_492f_a329_0d7575269aac_SS2_TXTL_RNAdeg_F = 10; mwa1246a57_cc2a_492f_a329_0d7575269aac_SS2_TXTL_RNAdeg_R = 2000;
  mwb7a568a8_418c_4172_aae2_974d59a9300a_SS2: mw88722339_572e_456f_85da_875cfc4e92bc_SS2 => mw288eb330_bc2f_470f_9628_e990cb2252e5_SS1_1_combined + mw715c6bbe_f050_4257_8bc2_159625dc5aa5_SS1_1_combined + 2 mw34fb2519_79b1_4f10_8668_6410726988c5_SS1_1_combined + mw27aa16fc_b76d_46c2_b301_0456b7e3aace_SS1_1_combined; mwb7a568a8_418c_4172_aae2_974d59a9300a_SS2_TXTL_RNAdeg_F*mw88722339_572e_456f_85da_875cfc4e92bc_SS2;
    mwb7a568a8_418c_4172_aae2_974d59a9300a_SS2_TXTL_RNAdeg_F = 0.002777778;
  mwee1494a3_9573_4d5d_89b8_02246c41395c_SS2: mwe03e3eea_a713_4196_a6d8_44a14c926596_SS2 + mw288eb330_bc2f_470f_9628_e990cb2252e5_SS1_1_combined -> mw6b40acd5_0395_4c2b_a5d8_eae734923797_SS2; mwee1494a3_9573_4d5d_89b8_02246c41395c_SS2_TXTL_RNAdeg_F*mwe03e3eea_a713_4196_a6d8_44a14c926596_SS2*mw288eb330_bc2f_470f_9628_e990cb2252e5_SS1_1_combined - mwee1494a3_9573_4d5d_89b8_02246c41395c_SS2_TXTL_RNAdeg_R*mw6b40acd5_0395_4c2b_a5d8_eae734923797_SS2;
    mwee1494a3_9573_4d5d_89b8_02246c41395c_SS2_TXTL_RNAdeg_F = 10; mwee1494a3_9573_4d5d_89b8_02246c41395c_SS2_TXTL_RNAdeg_R = 2000;
  mw3f39d269_c02c_4365_a0ab_dc7a7c17d03b_SS2: mw6b40acd5_0395_4c2b_a5d8_eae734923797_SS2 => mw288eb330_bc2f_470f_9628_e990cb2252e5_SS1_1_combined + mw27aa16fc_b76d_46c2_b301_0456b7e3aace_SS1_1_combined; mw3f39d269_c02c_4365_a0ab_dc7a7c17d03b_SS2_TXTL_RNAdeg_F*mw6b40acd5_0395_4c2b_a5d8_eae734923797_SS2;
    mw3f39d269_c02c_4365_a0ab_dc7a7c17d03b_SS2_TXTL_RNAdeg_F = 0.002777778;
  mwc81c8682_5085_488d_b949_d8b342a4bd66_SS2: mw6729d170_4447_449b_9e97_0908b0caab6b_SS2 + mw288eb330_bc2f_470f_9628_e990cb2252e5_SS1_1_combined -> mwa029c0f1_d85f_44ba_a505_84310ebae4b0_SS2; mwc81c8682_5085_488d_b949_d8b342a4bd66_SS2_TXTL_RNAdeg_F*mw6729d170_4447_449b_9e97_0908b0caab6b_SS2*mw288eb330_bc2f_470f_9628_e990cb2252e5_SS1_1_combined - mwc81c8682_5085_488d_b949_d8b342a4bd66_SS2_TXTL_RNAdeg_R*mwa029c0f1_d85f_44ba_a505_84310ebae4b0_SS2;
    mwc81c8682_5085_488d_b949_d8b342a4bd66_SS2_TXTL_RNAdeg_F = 10; mwc81c8682_5085_488d_b949_d8b342a4bd66_SS2_TXTL_RNAdeg_R = 2000;
  mwe07c9a9d_6c42_4bf2_b230_0d74190adf43_SS2: mwa029c0f1_d85f_44ba_a505_84310ebae4b0_SS2 => mw288eb330_bc2f_470f_9628_e990cb2252e5_SS1_1_combined + mw715c6bbe_f050_4257_8bc2_159625dc5aa5_SS1_1_combined + mw27aa16fc_b76d_46c2_b301_0456b7e3aace_SS1_1_combined; mwe07c9a9d_6c42_4bf2_b230_0d74190adf43_SS2_TXTL_RNAdeg_F*mwa029c0f1_d85f_44ba_a505_84310ebae4b0_SS2;
    mwe07c9a9d_6c42_4bf2_b230_0d74190adf43_SS2_TXTL_RNAdeg_F = 0.002777778;
  r1: IPTG_SS3_1_combined + mw8581196a_7c77_4da8_879e_f2c6f24b1932_SS1_1_combined -> xxIPTG_protein_alHL; k1f*IPTG_SS3_1_combined*mw8581196a_7c77_4da8_879e_f2c6f24b1932_SS1_1_combined - k1r*xxIPTG_protein_alHL;
  r2: xxIPTG_protein_alHL => mw28f62bd1_3a2b_45ba_be22_53e2eb1a9509_SS2_1_combined + mw8581196a_7c77_4da8_879e_f2c6f24b1932_SS1_1_combined; k2f*xxIPTG_protein_alHL;

  // Events:
  event_156: at (time <= 5400): AGTPdeg_F_combined = 0;
  event_157: at (time > 5400): AGTPdeg_F_combined = 0.0002;
  event_158: at (time <= 5400): AGTPdeg_F_combined = 0;
  event_159: at (time > 5400): AGTPdeg_F_combined = 0.0002;

  // Unit definitions:
  unit volume = litre;
  unit substance = mole;
  unit area = metre^2;
  unit per_second = 1 / second;
end
