// SBML level 3 version 1

model DP_2()
  // model units - substance: count, time: second, extent: mole

  // Compartments:
  compartment cell = 1 litre;

  // Species:
  species $inP_2 in cell = 50/cell;
  species X in cell = 50/cell;
  species inP_X_2 in cell = 0; inP_X_2 is "inP:X";
  species X_P_2 in cell = 0; X_P_2 is "X:P";
  species E_2 in cell = 50/cell;
  species E_X_P_2 in cell = 0; E_X_P_2 is "E:X:P";
  species inP_X_P_2 in cell = 0; inP_X_P_2 is "inP:X:P";
  species X_P_P_2 in cell = 0; X_P_P_2 is "X:P:P";
  species E_X_P_P_2 in cell = 0; E_X_P_P_2 is "E:X:P:P";

  // Parameters:
  k1f_2 = 1 per_second;
  k1r_2 = 1 per_second;
  k2f_2 = 1 per_second;
  k3f_2 = 1 per_second;
  k3r_2 = 1 per_second;
  k4f_2 = 1 per_second;
  k5f_2 = 1 per_second;
  k5r_2 = 1 per_second;
  k6f_2 = 1 per_second;
  k7f_2 = 1 per_second;
  k7r_2 = 1 per_second;
  k8f_2 = 1 per_second;
  k2r = 1 per_second;
  k2f = 1 per_second;

  // Reactions:
  r1_2: $inP_2 + X -> inP_X_2; k1f_2*inP_2*X - k1r_2*inP_X_2;
  r2_2: inP_X_2 -> $inP_2 + X_P_2; k2f*inP_X_2 - k2r*inP_2*X_P_2;
  r3_2: E_2 + X_P_2 -> E_X_P_2; k3f_2*E_2*X_P_2 - k3r_2*E_X_P_2;
  r4_2: E_X_P_2 => E_2 + X; k4f_2*E_X_P_2;
  r5_2: $inP_2 + X_P_2 -> inP_X_P_2; k5f_2*inP_2*X_P_2 - k5r_2*inP_X_P_2;
  r6_2: inP_X_P_2 => X_P_P_2 + $inP_2; k6f_2*inP_X_P_2;
  r7_2: E_2 + X_P_P_2 -> E_X_P_P_2; k7f_2*E_2*X_P_P_2 - k7r_2*E_X_P_P_2;
  r8_2: E_X_P_P_2 => X_P_2 + E_2; k8f_2*E_X_P_P_2;

  // Unit definitions:
  unit per_second = 1 / second;
  unit count = dimensionless;
end
