// SBML level 3 version 1

model IFFLmodel_IFFL()
  // model units - substance: count, time: second, extent: mole

  // Compartments:
  compartment cell = 1 litre;

  // Species:
  species inp_IFFL_IFFL in cell = 5.555556/cell;
  species DA_IFFL_IFFL in cell = 5.555556/cell;
  species C1_IFFL_IFFL in cell = 0;
  species mA_IFFL_IFFL in cell = 0;
  species pA_IFFL_IFFL in cell = 0;
  species C2_IFFL_IFFL in cell = 0;
  species DB_IFFL_IFFL in cell = 5.555556/cell;
  species mB_IFFL_IFFL in cell = 0;
  species pB_IFFL_IFFL in cell = 0;
  species C3_IFFL_IFFL in cell = 0;
  species DC_IFFL_IFFL in cell = 5.555556/cell;
  species C4_IFFL_IFFL in cell = 0;
  species C5_IFFL_IFFL in cell = 0;
  species C6_IFFL_IFFL in cell = 0;
  species mC_IFFL_IFFL in cell = 0;
  species out_IFFL_IFFL in cell = 0;

  // Parameters:
  k1f_IFFL = 1 per_second;
  k1r_IFFL = 1 per_second;
  k2f_IFFL = 1 per_second;
  k3f_IFFL = 1 per_second;
  k4f_IFFL = 1 per_second;
  k5f_IFFL = 1 per_second;
  k6f_IFFL = 1 per_second;
  k6r_IFFL = 1 per_second;
  k7f_IFFL = 1 per_second;
  k8f_IFFL = 1 per_second;
  k9f_IFFL = 1 per_second;
  k10f_IFFL = 1 per_second;
  k11f_IFFL = 1 per_second;
  k11r_IFFL = 1 per_second;
  k12f_IFFL = 1 per_second;
  k12r_IFFL = 1 per_second;
  k13f_IFFL = 1 per_second;
  k13r_IFFL = 1 per_second;
  k14f_IFFL = 1 per_second;
  k14r_IFFL = 1 per_second;
  k15f_IFFL = 1 per_second;
  k16f_IFFL = 1 per_second;
  k17f_IFFL = 1 per_second;
  k18f_IFFL = 1 per_second;

  // Reactions:
  r1_IFFL: inp_IFFL_IFFL + DA_IFFL_IFFL -> C1_IFFL_IFFL; k1f_IFFL*inp_IFFL_IFFL*DA_IFFL_IFFL - k1r_IFFL*C1_IFFL_IFFL;
  r2_IFFL: C1_IFFL_IFFL => C1_IFFL_IFFL + mA_IFFL_IFFL; k2f_IFFL*C1_IFFL_IFFL;
  r3_IFFL: mA_IFFL_IFFL => mA_IFFL_IFFL + pA_IFFL_IFFL; k3f_IFFL*mA_IFFL_IFFL;
  r4_IFFL: mA_IFFL_IFFL => ; k4f_IFFL*mA_IFFL_IFFL;
  r5_IFFL: pA_IFFL_IFFL => ; k5f_IFFL*pA_IFFL_IFFL;
  r6_IFFL: pA_IFFL_IFFL + DB_IFFL_IFFL -> C2_IFFL_IFFL; k6f_IFFL*pA_IFFL_IFFL*DB_IFFL_IFFL - k6r_IFFL*C2_IFFL_IFFL;
  r7_IFFL: C2_IFFL_IFFL => C2_IFFL_IFFL + mB_IFFL_IFFL; k7f_IFFL*C2_IFFL_IFFL;
  r8_IFFL: mB_IFFL_IFFL => mB_IFFL_IFFL + pB_IFFL_IFFL; k8f_IFFL*mB_IFFL_IFFL;
  r9_IFFL: mB_IFFL_IFFL => ; k9f_IFFL*mB_IFFL_IFFL;
  r10_IFFL: pB_IFFL_IFFL => ; k10f_IFFL*pB_IFFL_IFFL;
  r11_IFFL: pB_IFFL_IFFL + DC_IFFL_IFFL -> C3_IFFL_IFFL; k11f_IFFL*pB_IFFL_IFFL*DC_IFFL_IFFL - k11r_IFFL*C3_IFFL_IFFL;
  r12_IFFL: pA_IFFL_IFFL + DC_IFFL_IFFL -> C4_IFFL_IFFL; k12f_IFFL*pA_IFFL_IFFL*DC_IFFL_IFFL - k12r_IFFL*C4_IFFL_IFFL;
  r13_IFFL: pA_IFFL_IFFL + C3_IFFL_IFFL -> C5_IFFL_IFFL; k13f_IFFL*pA_IFFL_IFFL*C3_IFFL_IFFL - k13r_IFFL*C5_IFFL_IFFL;
  r14_IFFL: pB_IFFL_IFFL + C4_IFFL_IFFL -> C6_IFFL_IFFL; k14f_IFFL*pB_IFFL_IFFL*C4_IFFL_IFFL - k14r_IFFL*C6_IFFL_IFFL;
  r15_IFFL: C4_IFFL_IFFL => C4_IFFL_IFFL + mC_IFFL_IFFL; k15f_IFFL*C4_IFFL_IFFL;
  r16_IFFL: mC_IFFL_IFFL => mC_IFFL_IFFL + out_IFFL_IFFL; k16f_IFFL*mC_IFFL_IFFL;
  r17_IFFL: mC_IFFL_IFFL => ; k17f_IFFL*mC_IFFL_IFFL;
  r18_IFFL: out_IFFL_IFFL => ; k18f_IFFL*out_IFFL_IFFL;

  // Unit definitions:
  unit per_second = 1 / second;
  unit count = dimensionless;
end
