// SBML level 3 version 1

model connected_subsystems_combined_subsystems__DP_DP1_DP_DP2_IFFLmodel()
  // model units - substance: count, time: second, extent: mole

  // Compartments:
  compartment cell_DP1_combined = 3 litre;

  // Species:
  species $inP_combined in cell_DP1_combined = 50/cell_DP1_combined;
  species X_combined in cell_DP1_combined = 50/cell_DP1_combined;
  species inP_X_combined in cell_DP1_combined = 0; inP_X_combined is "inP:X";
  species X_P_combined in cell_DP1_combined = 0; X_P_combined is "X:P";
  species E_combined in cell_DP1_combined = 50/cell_DP1_combined;
  species E_X_P_combined in cell_DP1_combined = 0; E_X_P_combined is "E:X:P";
  species inP_X_P_combined in cell_DP1_combined = 0; inP_X_P_combined is "inP:X:P";
  species E_X_P_P_combined in cell_DP1_combined = 0; E_X_P_P_combined is "E:X:P:P";
  species inp_IFFL in cell_DP1_combined = 50/cell_DP1_combined;
  species DA_IFFL in cell_DP1_combined = 50/cell_DP1_combined;
  species C1_IFFL in cell_DP1_combined = 0;
  species mA_IFFL in cell_DP1_combined = 0;
  species pA_IFFL_connected_with_X_P_P in cell_DP1_combined = 50/cell_DP1_combined;
  species C2_IFFL in cell_DP1_combined = 0;
  species DB_IFFL in cell_DP1_combined = 50/cell_DP1_combined;
  species mB_IFFL in cell_DP1_combined = 0;
  species pB_IFFL_connected_with_X_P_P_DP2 in cell_DP1_combined = 50/cell_DP1_combined;
  species C3_IFFL in cell_DP1_combined = 0;
  species DC_IFFL in cell_DP1_combined = 50/cell_DP1_combined;
  species C4_IFFL in cell_DP1_combined = 0;
  species C5_IFFL in cell_DP1_combined = 0;
  species C6_IFFL in cell_DP1_combined = 0;
  species mC_IFFL in cell_DP1_combined = 0;
  species out_IFFL in cell_DP1_combined = 0;

  // Parameters:
  k1f_DP1 = 1 per_second;
  k1r_DP1 = 1 per_second;
  k2f_DP1 = 1 per_second;
  k3f_DP1 = 1 per_second;
  k3r_DP1 = 1 per_second;
  k4f_DP1 = 1 per_second;
  k5f_DP1 = 1 per_second;
  k5r_DP1 = 1 per_second;
  k6f_DP1 = 1 per_second;
  k7f_DP1 = 1 per_second;
  k7r_DP1 = 1 per_second;
  k8f_DP1 = 1 per_second;
  k1f_DP2 = 1 per_second;
  k1r_DP2 = 1 per_second;
  k2f_DP2 = 1 per_second;
  k3f_DP2 = 1 per_second;
  k3r_DP2 = 1 per_second;
  k4f_DP2 = 1 per_second;
  k5f_DP2 = 1 per_second;
  k5r_DP2 = 1 per_second;
  k6f_DP2 = 1 per_second;
  k7f_DP2 = 1 per_second;
  k7r_DP2 = 1 per_second;
  k8f_DP2 = 1 per_second;
  k1f = 1 per_second;
  k1r = 1 per_second;
  k2f = 1 per_second;
  k3f = 1 per_second;
  k4f = 1 per_second;
  k5f = 1 per_second;
  k6f = 1 per_second;
  k6r = 1 per_second;
  k7f = 1 per_second;
  k8f = 1 per_second;
  k9f = 1 per_second;
  k10f = 1 per_second;
  k11f = 1 per_second;
  k11r = 1 per_second;
  k12f = 1 per_second;
  k12r = 1 per_second;
  k13f = 1 per_second;
  k13r = 1 per_second;
  k14f = 1 per_second;
  k14r = 1 per_second;
  k15f = 1 per_second;
  k16f = 1 per_second;
  k17f = 1 per_second;
  k18f = 1 per_second;

  // Reactions:
  r1_DP1_combined: $inP_combined + X_combined -> inP_X_combined; k1f_DP1*inP_combined*X_combined - k1r_DP1*inP_X_combined;
  r2_DP1_combined: inP_X_combined => $inP_combined + X_P_combined; k2f_DP1*inP_X_combined;
  r3_DP1_combined: E_combined + X_P_combined -> E_X_P_combined; k3f_DP1*E_combined*X_P_combined - k3r_DP1*E_X_P_combined;
  r4_DP1_combined: E_X_P_combined => E_combined + X_combined; k4f_DP1*E_X_P_combined;
  r5_DP1_combined: $inP_combined + X_P_combined -> inP_X_P_combined; k5f_DP1*inP_combined*X_P_combined - k5r_DP1*inP_X_P_combined;
  r6_DP1: inP_X_P_combined => pA_IFFL_connected_with_X_P_P + $inP_combined; k6f_DP1*inP_X_P_combined;
  r7_DP1: E_combined + pA_IFFL_connected_with_X_P_P -> E_X_P_P_combined; k7f_DP1*E_combined*pA_IFFL_connected_with_X_P_P - k7r_DP1*E_X_P_P_combined;
  r8_DP1_combined: E_X_P_P_combined => X_P_combined + E_combined; k8f_DP1*E_X_P_P_combined;
  r6_DP2: inP_X_P_combined => pB_IFFL_connected_with_X_P_P_DP2 + $inP_combined; k6f_DP2*inP_X_P_combined;
  r7_DP2: E_combined + pB_IFFL_connected_with_X_P_P_DP2 -> E_X_P_P_combined; k7f_DP2*E_combined*pB_IFFL_connected_with_X_P_P_DP2 - k7r_DP2*E_X_P_P_combined;
  r1: inp_IFFL + DA_IFFL -> C1_IFFL; k1f*inp_IFFL*DA_IFFL - k1r*C1_IFFL;
  r2: C1_IFFL => C1_IFFL + mA_IFFL; k2f*C1_IFFL;
  r3: mA_IFFL => mA_IFFL + pA_IFFL_connected_with_X_P_P; k3f*mA_IFFL;
  r4: mA_IFFL => ; k4f*mA_IFFL;
  r5: pA_IFFL_connected_with_X_P_P => ; k5f*pA_IFFL_connected_with_X_P_P;
  r6: pA_IFFL_connected_with_X_P_P + DB_IFFL -> C2_IFFL; k6f*pA_IFFL_connected_with_X_P_P*DB_IFFL - k6r*C2_IFFL;
  r7: C2_IFFL => C2_IFFL + mB_IFFL; k7f*C2_IFFL;
  r8: mB_IFFL => mB_IFFL + pB_IFFL_connected_with_X_P_P_DP2; k8f*mB_IFFL;
  r9: mB_IFFL => ; k9f*mB_IFFL;
  r10: pB_IFFL_connected_with_X_P_P_DP2 => ; k10f*pB_IFFL_connected_with_X_P_P_DP2;
  r11: pB_IFFL_connected_with_X_P_P_DP2 + DC_IFFL -> C3_IFFL; k11f*pB_IFFL_connected_with_X_P_P_DP2*DC_IFFL - k11r*C3_IFFL;
  r12: pA_IFFL_connected_with_X_P_P + DC_IFFL -> C4_IFFL; k12f*pA_IFFL_connected_with_X_P_P*DC_IFFL - k12r*C4_IFFL;
  r13: pA_IFFL_connected_with_X_P_P + C3_IFFL -> C5_IFFL; k13f*pA_IFFL_connected_with_X_P_P*C3_IFFL - k13r*C5_IFFL;
  r14: pB_IFFL_connected_with_X_P_P_DP2 + C4_IFFL -> C6_IFFL; k14f*pB_IFFL_connected_with_X_P_P_DP2*C4_IFFL - k14r*C6_IFFL;
  r15: C4_IFFL => C4_IFFL + mC_IFFL; k15f*C4_IFFL;
  r16: mC_IFFL => mC_IFFL + out_IFFL; k16f*mC_IFFL;
  r17: mC_IFFL => ; k17f*mC_IFFL;
  r18: out_IFFL => ; k18f*out_IFFL;

  // Unit definitions:
  unit per_second = 1 / second;
  unit count = dimensionless;
end
