// SBML level 3 version 1

model combined_Subsystems__mwaa780036_6cf8_4571_8d74_b3043b255fb8_S1_mwdbb9ef8f_479f_4401_b3c8_e793526a2f6e_S2_mwdbb9ef8f_479f_4401_b3c8_e793526a2f6e_S2_mwdbb9ef8f_479f_4401_b3c8_e793526a2f6e_S2()
  // model units - substance: substance, time: second, volume: volume, area: area, length: metre, extent: substance

  // Compartments:
  compartment cell = 1 volume;

  // Species:
  species RecBCD_combined in cell = 10.00001/cell;
  species RNase_combined in cell = 200.0001/cell;
  species protein_tetR_combined in cell = 0;
  species aTc_combined in cell = 0;
  species protein_tetRdimer_combined in cell = 0;
  species RNA_utr1__tetR_combined in cell = 0; RNA_utr1__tetR_combined is "RNA utr1--tetR";
  species Ribo_RNA_utr1__tetR_combined in cell = 0; Ribo_RNA_utr1__tetR_combined is "Ribo:RNA utr1--tetR";
  species DNA_ptet__utr1__tetR_combined in cell = 2.000001/cell; DNA_ptet__utr1__tetR_combined is "DNA ptet--utr1--tetR";
  species RNAP_DNA_ptet__utr1__tetR_combined in cell = 0; RNAP_DNA_ptet__utr1__tetR_combined is "RNAP:DNA ptet--utr1--tetR";
  species CUTP_AGTP_RNAP_DNA_ptet__utr1__tetR_combined in cell = 0; CUTP_AGTP_RNAP_DNA_ptet__utr1__tetR_combined is "CUTP:AGTP:RNAP:DNA ptet--utr1--tetR";
  species term_RNAP_DNA_ptet__utr1__tetR_combined in cell = 0; term_RNAP_DNA_ptet__utr1__tetR_combined is "term_RNAP:DNA ptet--utr1--tetR";
  species AA_2AGTP_Ribo_RNA_utr1__tetR_combined in cell = 0; AA_2AGTP_Ribo_RNA_utr1__tetR_combined is "AA:2AGTP:Ribo:RNA utr1--tetR";
  species term_Ribo_RNA_utr1__tetR_combined in cell = 0; term_Ribo_RNA_utr1__tetR_combined is "term_Ribo:RNA utr1--tetR";
  species protein_deGFP_combined in cell = 0;
  species xxprotein_deGFP_combined in cell = 0; xxprotein_deGFP_combined is "protein deGFP*";
  species RNA_utr1__deGFP_combined in cell = 0; RNA_utr1__deGFP_combined is "RNA utr1--deGFP";
  species Ribo_RNA_utr1__deGFP_combined in cell = 0; Ribo_RNA_utr1__deGFP_combined is "Ribo:RNA utr1--deGFP";
  species DNA_ptet__utr1__deGFP_combined in cell = 2.000001/cell; DNA_ptet__utr1__deGFP_combined is "DNA ptet--utr1--deGFP";
  species RNAP_DNA_ptet__utr1__deGFP_combined in cell = 0; RNAP_DNA_ptet__utr1__deGFP_combined is "RNAP:DNA ptet--utr1--deGFP";
  species CUTP_AGTP_RNAP_DNA_ptet__utr1__deGFP_combined in cell = 0; CUTP_AGTP_RNAP_DNA_ptet__utr1__deGFP_combined is "CUTP:AGTP:RNAP:DNA ptet--utr1--deGFP";
  species term_RNAP_DNA_ptet__utr1__deGFP_combined in cell = 0; term_RNAP_DNA_ptet__utr1__deGFP_combined is "term_RNAP:DNA ptet--utr1--deGFP";
  species AA_2AGTP_Ribo_RNA_utr1__deGFP_combined in cell = 0; AA_2AGTP_Ribo_RNA_utr1__deGFP_combined is "AA:2AGTP:Ribo:RNA utr1--deGFP";
  species term_Ribo_RNA_utr1__deGFP_combined in cell = 0; term_Ribo_RNA_utr1__deGFP_combined is "term_Ribo:RNA utr1--deGFP";
  species x_2_aTc_protein_tetRdimer_combined in cell = 0; x_2_aTc_protein_tetRdimer_combined is "2 aTc:protein tetRdimer";
  species AGTP_RNAP_DNA_ptet__utr1__tetR_combined in cell = 0; AGTP_RNAP_DNA_ptet__utr1__tetR_combined is "AGTP:RNAP:DNA ptet--utr1--tetR";
  species CUTP_RNAP_DNA_ptet__utr1__tetR_combined in cell = 0; CUTP_RNAP_DNA_ptet__utr1__tetR_combined is "CUTP:RNAP:DNA ptet--utr1--tetR";
  species DNA_ptet__utr1__tetR_protein_tetRdimer_combined in cell = 0; DNA_ptet__utr1__tetR_protein_tetRdimer_combined is "DNA ptet--utr1--tetR:protein tetRdimer";
  species AA_Ribo_RNA_utr1__tetR_combined in cell = 0; AA_Ribo_RNA_utr1__tetR_combined is "AA:Ribo:RNA utr1--tetR";
  species RNA_utr1__tetR_RNase_combined in cell = 0; RNA_utr1__tetR_RNase_combined is "RNA utr1--tetR:RNase";
  species Ribo_RNA_utr1__tetR_RNase_combined in cell = 0; Ribo_RNA_utr1__tetR_RNase_combined is "Ribo:RNA utr1--tetR:RNase";
  species AA_2AGTP_Ribo_RNA_utr1__tetR_RNase_combined in cell = 0; AA_2AGTP_Ribo_RNA_utr1__tetR_RNase_combined is "AA:2AGTP:Ribo:RNA utr1--tetR:RNase";
  species term_Ribo_RNA_utr1__tetR_RNase_combined in cell = 0; term_Ribo_RNA_utr1__tetR_RNase_combined is "term_Ribo:RNA utr1--tetR:RNase";
  species AA_Ribo_RNA_utr1__tetR_RNase_combined in cell = 0; AA_Ribo_RNA_utr1__tetR_RNase_combined is "AA:Ribo:RNA utr1--tetR:RNase";
  species AGTP_RNAP_DNA_ptet__utr1__deGFP_combined in cell = 0; AGTP_RNAP_DNA_ptet__utr1__deGFP_combined is "AGTP:RNAP:DNA ptet--utr1--deGFP";
  species CUTP_RNAP_DNA_ptet__utr1__deGFP_combined in cell = 0; CUTP_RNAP_DNA_ptet__utr1__deGFP_combined is "CUTP:RNAP:DNA ptet--utr1--deGFP";
  species DNA_ptet__utr1__deGFP_protein_tetRdimer_combined in cell = 0; DNA_ptet__utr1__deGFP_protein_tetRdimer_combined is "DNA ptet--utr1--deGFP:protein tetRdimer";
  species AA_Ribo_RNA_utr1__deGFP_combined in cell = 0; AA_Ribo_RNA_utr1__deGFP_combined is "AA:Ribo:RNA utr1--deGFP";
  species RNA_utr1__deGFP_RNase_combined in cell = 0; RNA_utr1__deGFP_RNase_combined is "RNA utr1--deGFP:RNase";
  species Ribo_RNA_utr1__deGFP_RNase_combined in cell = 0; Ribo_RNA_utr1__deGFP_RNase_combined is "Ribo:RNA utr1--deGFP:RNase";
  species AA_2AGTP_Ribo_RNA_utr1__deGFP_RNase_combined in cell = 0; AA_2AGTP_Ribo_RNA_utr1__deGFP_RNase_combined is "AA:2AGTP:Ribo:RNA utr1--deGFP:RNase";
  species term_Ribo_RNA_utr1__deGFP_RNase_combined in cell = 0; term_Ribo_RNA_utr1__deGFP_RNase_combined is "term_Ribo:RNA utr1--deGFP:RNase";
  species AA_Ribo_RNA_utr1__deGFP_RNase_combined in cell = 0; AA_Ribo_RNA_utr1__deGFP_RNase_combined is "AA:Ribo:RNA utr1--deGFP:RNase";
  species AGTP_USED_combined in cell = 0;
  species RNAP_shared in cell = 100/cell;
  species Ribo_shared in cell = 60.00004/cell;
  species AGTP_shared in cell = 6360096/cell;
  species CUTP_shared in cell = 3816058/cell;
  species AA_shared in cell = 6.360096e7/cell;

  // Parameters:
  mw8cf83496_9f55_4eca_9dc2_b30c8e67d7bd_S1 = 0; mw8cf83496_9f55_4eca_9dc2_b30c8e67d7bd_S1 is "AGTPdeg_F";
  mw5c2bb4d9_3548_456f_a5fe_b970d5bbbf8a_S2 = 0; mw5c2bb4d9_3548_456f_a5fe_b970d5bbbf8a_S2 is "AGTPdeg_F";

  // Reactions:
  mw261560c9_9435_4f37_9618_76226e0b55e6_S1: protein_tetRdimer_combined + 2 aTc_combined -> x_2_aTc_protein_tetRdimer_combined; mw261560c9_9435_4f37_9618_76226e0b55e6_S1_TXTL_INDUCER_TETR_ATC_F*protein_tetRdimer_combined*aTc_combined^2 - mw261560c9_9435_4f37_9618_76226e0b55e6_S1_TXTL_INDUCER_TETR_ATC_R*x_2_aTc_protein_tetRdimer_combined;
    mw261560c9_9435_4f37_9618_76226e0b55e6_S1_TXTL_INDUCER_TETR_ATC_F = 1e-5; mw261560c9_9435_4f37_9618_76226e0b55e6_S1_TXTL_INDUCER_TETR_ATC_R = 0.1;
  mw4379ceb8_935a_47a0_866b_797117c19b01_S1: 2 protein_tetR_combined -> protein_tetRdimer_combined; mw4379ceb8_935a_47a0_866b_797117c19b01_S1_kf*protein_tetR_combined^2 - mw4379ceb8_935a_47a0_866b_797117c19b01_S1_kr*protein_tetRdimer_combined;
    mw4379ceb8_935a_47a0_866b_797117c19b01_S1_kf = 1; mw4379ceb8_935a_47a0_866b_797117c19b01_S1_kr = 1;
  mw01f62f46_208c_4421_9d29_c35407ee9aba_S1: RNA_utr1__tetR_combined + Ribo_shared -> Ribo_RNA_utr1__tetR_combined; mw01f62f46_208c_4421_9d29_c35407ee9aba_S1_TXTL_UTR_UTR1_F*RNA_utr1__tetR_combined*Ribo_shared - mw01f62f46_208c_4421_9d29_c35407ee9aba_S1_TXTL_UTR_UTR1_R*Ribo_RNA_utr1__tetR_combined;
    mw01f62f46_208c_4421_9d29_c35407ee9aba_S1_TXTL_UTR_UTR1_F = 0.2; mw01f62f46_208c_4421_9d29_c35407ee9aba_S1_TXTL_UTR_UTR1_R = 4;
  mwf778efef_ff33_4460_a6a8_43c86b82e63f_S1: DNA_ptet__utr1__tetR_combined + RNAP_shared -> RNAP_DNA_ptet__utr1__tetR_combined; mwf778efef_ff33_4460_a6a8_43c86b82e63f_S1_TXTL_PTET_RNAPbound_F*DNA_ptet__utr1__tetR_combined*RNAP_shared - mwf778efef_ff33_4460_a6a8_43c86b82e63f_S1_TXTL_PTET_RNAPbound_R*RNAP_DNA_ptet__utr1__tetR_combined;
    mwf778efef_ff33_4460_a6a8_43c86b82e63f_S1_TXTL_PTET_RNAPbound_F = 20; mwf778efef_ff33_4460_a6a8_43c86b82e63f_S1_TXTL_PTET_RNAPbound_R = 400;
  mwc85712ed_78b3_4e88_b982_9a98e8f0b9e3_S1: CUTP_AGTP_RNAP_DNA_ptet__utr1__tetR_combined => RNAP_DNA_ptet__utr1__tetR_combined; mwc85712ed_78b3_4e88_b982_9a98e8f0b9e3_S1_TXTL_NTP_consumption*CUTP_AGTP_RNAP_DNA_ptet__utr1__tetR_combined;
    mwc85712ed_78b3_4e88_b982_9a98e8f0b9e3_S1_TXTL_NTP_consumption = 0.7487705;
  mwfacc3108_198d_47d5_a4c4_209d38019ce8_S1: term_RNAP_DNA_ptet__utr1__tetR_combined => RNAP_shared + DNA_ptet__utr1__tetR_combined; mwfacc3108_198d_47d5_a4c4_209d38019ce8_S1_TXTL_RNAPBOUND_TERMINATION_RATE*term_RNAP_DNA_ptet__utr1__tetR_combined;
    mwfacc3108_198d_47d5_a4c4_209d38019ce8_S1_TXTL_RNAPBOUND_TERMINATION_RATE = 0.05;
  mw22f6c31f_b7a2_45d2_bbe2_b7fa4d0ed135_S1: RNAP_DNA_ptet__utr1__tetR_combined + AGTP_shared -> AGTP_RNAP_DNA_ptet__utr1__tetR_combined; mw22f6c31f_b7a2_45d2_bbe2_b7fa4d0ed135_S1_TXTL_NTP_RNAP_F*RNAP_DNA_ptet__utr1__tetR_combined*AGTP_shared - mw22f6c31f_b7a2_45d2_bbe2_b7fa4d0ed135_S1_TXTL_NTP_RNAP_R*AGTP_RNAP_DNA_ptet__utr1__tetR_combined;
    mw22f6c31f_b7a2_45d2_bbe2_b7fa4d0ed135_S1_TXTL_NTP_RNAP_F = 1000; mw22f6c31f_b7a2_45d2_bbe2_b7fa4d0ed135_S1_TXTL_NTP_RNAP_R = 120000000;
  mwd4422ffd_15bc_476e_a245_2b9defd21926_S1: RNAP_DNA_ptet__utr1__tetR_combined + CUTP_shared -> CUTP_RNAP_DNA_ptet__utr1__tetR_combined; mwd4422ffd_15bc_476e_a245_2b9defd21926_S1_TXTL_NTP_RNAP_F*RNAP_DNA_ptet__utr1__tetR_combined*CUTP_shared - mwd4422ffd_15bc_476e_a245_2b9defd21926_S1_TXTL_NTP_RNAP_R*CUTP_RNAP_DNA_ptet__utr1__tetR_combined;
    mwd4422ffd_15bc_476e_a245_2b9defd21926_S1_TXTL_NTP_RNAP_F = 1000; mwd4422ffd_15bc_476e_a245_2b9defd21926_S1_TXTL_NTP_RNAP_R = 120000000;
  mw7fd8f5e9_8781_4616_910b_2db46169f3ce_S1: AGTP_RNAP_DNA_ptet__utr1__tetR_combined + CUTP_shared -> CUTP_AGTP_RNAP_DNA_ptet__utr1__tetR_combined; mw7fd8f5e9_8781_4616_910b_2db46169f3ce_S1_TXTL_NTP_RNAP_F*AGTP_RNAP_DNA_ptet__utr1__tetR_combined*CUTP_shared - mw7fd8f5e9_8781_4616_910b_2db46169f3ce_S1_TXTL_NTP_RNAP_R*CUTP_AGTP_RNAP_DNA_ptet__utr1__tetR_combined;
    mw7fd8f5e9_8781_4616_910b_2db46169f3ce_S1_TXTL_NTP_RNAP_F = 1; mw7fd8f5e9_8781_4616_910b_2db46169f3ce_S1_TXTL_NTP_RNAP_R = 120000;
  mw52ec9b9c_c5ec_47a9_8850_f0d2fd8259d2_S1: CUTP_RNAP_DNA_ptet__utr1__tetR_combined + AGTP_shared -> CUTP_AGTP_RNAP_DNA_ptet__utr1__tetR_combined; mw52ec9b9c_c5ec_47a9_8850_f0d2fd8259d2_S1_TXTL_NTP_RNAP_F*CUTP_RNAP_DNA_ptet__utr1__tetR_combined*AGTP_shared - mw52ec9b9c_c5ec_47a9_8850_f0d2fd8259d2_S1_TXTL_NTP_RNAP_R*CUTP_AGTP_RNAP_DNA_ptet__utr1__tetR_combined;
    mw52ec9b9c_c5ec_47a9_8850_f0d2fd8259d2_S1_TXTL_NTP_RNAP_F = 1; mw52ec9b9c_c5ec_47a9_8850_f0d2fd8259d2_S1_TXTL_NTP_RNAP_R = 120000;
  mw9570edab_f28e_43e9_9fa1_a587f1aea1fb_S1: CUTP_AGTP_RNAP_DNA_ptet__utr1__tetR_combined => term_RNAP_DNA_ptet__utr1__tetR_combined + RNA_utr1__tetR_combined; mw9570edab_f28e_43e9_9fa1_a587f1aea1fb_S1_TXTL_transcription_rate1*CUTP_AGTP_RNAP_DNA_ptet__utr1__tetR_combined;
    mw9570edab_f28e_43e9_9fa1_a587f1aea1fb_S1_TXTL_transcription_rate1 = 0.001229508;
  mwf13844c5_47b9_4824_a257_bac195c63389_S1: DNA_ptet__utr1__tetR_combined + protein_tetRdimer_combined -> DNA_ptet__utr1__tetR_protein_tetRdimer_combined; mwf13844c5_47b9_4824_a257_bac195c63389_S1_ptet_sequestration_F*DNA_ptet__utr1__tetR_combined*protein_tetRdimer_combined - mwf13844c5_47b9_4824_a257_bac195c63389_S1_ptet_sequestration_R*DNA_ptet__utr1__tetR_protein_tetRdimer_combined;
    mwf13844c5_47b9_4824_a257_bac195c63389_S1_ptet_sequestration_F = 0.25; mwf13844c5_47b9_4824_a257_bac195c63389_S1_ptet_sequestration_R = 0.000111;
  mwe5276aaa_52a0_4182_8fae_34e3176acd5a_S1: Ribo_RNA_utr1__tetR_combined + AA_shared -> AA_Ribo_RNA_utr1__tetR_combined; mwe5276aaa_52a0_4182_8fae_34e3176acd5a_S1_TL_AA_F*Ribo_RNA_utr1__tetR_combined*AA_shared - mwe5276aaa_52a0_4182_8fae_34e3176acd5a_S1_TL_AA_R*AA_Ribo_RNA_utr1__tetR_combined;
    mwe5276aaa_52a0_4182_8fae_34e3176acd5a_S1_TL_AA_F = 300; mwe5276aaa_52a0_4182_8fae_34e3176acd5a_S1_TL_AA_R = 0.1;
  mw663a4449_77dc_4e1c_85d5_d8540cf82602_S1: AA_Ribo_RNA_utr1__tetR_combined + 2 AGTP_shared -> AA_2AGTP_Ribo_RNA_utr1__tetR_combined; mw663a4449_77dc_4e1c_85d5_d8540cf82602_S1_TL_AGTP_F*AA_Ribo_RNA_utr1__tetR_combined*AGTP_shared^2 - mw663a4449_77dc_4e1c_85d5_d8540cf82602_S1_TL_AGTP_R*AA_2AGTP_Ribo_RNA_utr1__tetR_combined;
    mw663a4449_77dc_4e1c_85d5_d8540cf82602_S1_TL_AGTP_F = 30; mw663a4449_77dc_4e1c_85d5_d8540cf82602_S1_TL_AGTP_R = 10;
  mw6841d216_de98_4a36_becc_10ebf204fdac_S1: AA_2AGTP_Ribo_RNA_utr1__tetR_combined => term_Ribo_RNA_utr1__tetR_combined; mw6841d216_de98_4a36_becc_10ebf204fdac_S1_TXTL_TL_AA_consumption*AA_2AGTP_Ribo_RNA_utr1__tetR_combined;
    mw6841d216_de98_4a36_becc_10ebf204fdac_S1_TXTL_TL_AA_consumption = 0.03;
  mw1542a388_1a94_4782_a22d_3686d1916665_S1: AA_2AGTP_Ribo_RNA_utr1__tetR_combined => term_Ribo_RNA_utr1__tetR_combined + protein_tetR_combined; mw1542a388_1a94_4782_a22d_3686d1916665_S1_TXTL_TL_rate*AA_2AGTP_Ribo_RNA_utr1__tetR_combined;
    mw1542a388_1a94_4782_a22d_3686d1916665_S1_TXTL_TL_rate = 0.01;
  mw8d90576f_d934_46f0_9bb1_5286e4e7663c_S1: term_Ribo_RNA_utr1__tetR_combined => RNA_utr1__tetR_combined + Ribo_shared; mw8d90576f_d934_46f0_9bb1_5286e4e7663c_S1_TXTL_RIBOBOUND_TERMINATION_RATE*term_Ribo_RNA_utr1__tetR_combined;
    mw8d90576f_d934_46f0_9bb1_5286e4e7663c_S1_TXTL_RIBOBOUND_TERMINATION_RATE = 50;
  mwd855a09e_d3d0_4ec6_97ed_33bcc30301d0_S1: RNA_utr1__tetR_combined + RNase_combined -> RNA_utr1__tetR_RNase_combined; mwd855a09e_d3d0_4ec6_97ed_33bcc30301d0_S1_TXTL_RNAdeg_F*RNA_utr1__tetR_combined*RNase_combined - mwd855a09e_d3d0_4ec6_97ed_33bcc30301d0_S1_TXTL_RNAdeg_R*RNA_utr1__tetR_RNase_combined;
    mwd855a09e_d3d0_4ec6_97ed_33bcc30301d0_S1_TXTL_RNAdeg_F = 10; mwd855a09e_d3d0_4ec6_97ed_33bcc30301d0_S1_TXTL_RNAdeg_R = 2000;
  mw1b944b0a_5e80_4820_91af_54696c0fef10_S1: RNA_utr1__tetR_RNase_combined => RNase_combined; mw1b944b0a_5e80_4820_91af_54696c0fef10_S1_TXTL_RNAdeg_F*RNA_utr1__tetR_RNase_combined;
    mw1b944b0a_5e80_4820_91af_54696c0fef10_S1_TXTL_RNAdeg_F = 0.002777778;
  mwc97b54ff_94d5_4d4b_b86d_c1098d17d91c_S1: Ribo_RNA_utr1__tetR_combined + RNase_combined -> Ribo_RNA_utr1__tetR_RNase_combined; mwc97b54ff_94d5_4d4b_b86d_c1098d17d91c_S1_TXTL_RNAdeg_F*Ribo_RNA_utr1__tetR_combined*RNase_combined - mwc97b54ff_94d5_4d4b_b86d_c1098d17d91c_S1_TXTL_RNAdeg_R*Ribo_RNA_utr1__tetR_RNase_combined;
    mwc97b54ff_94d5_4d4b_b86d_c1098d17d91c_S1_TXTL_RNAdeg_F = 10; mwc97b54ff_94d5_4d4b_b86d_c1098d17d91c_S1_TXTL_RNAdeg_R = 2000;
  mw8f8ae793_3eb1_4543_86be_fd3f46891edf_S1: Ribo_RNA_utr1__tetR_RNase_combined => RNase_combined + Ribo_shared; mw8f8ae793_3eb1_4543_86be_fd3f46891edf_S1_TXTL_RNAdeg_F*Ribo_RNA_utr1__tetR_RNase_combined;
    mw8f8ae793_3eb1_4543_86be_fd3f46891edf_S1_TXTL_RNAdeg_F = 0.002777778;
  mwa3c80ce8_3f35_4896_851f_f001d31b13b1_S1: AA_2AGTP_Ribo_RNA_utr1__tetR_combined + RNase_combined -> AA_2AGTP_Ribo_RNA_utr1__tetR_RNase_combined; mwa3c80ce8_3f35_4896_851f_f001d31b13b1_S1_TXTL_RNAdeg_F*AA_2AGTP_Ribo_RNA_utr1__tetR_combined*RNase_combined - mwa3c80ce8_3f35_4896_851f_f001d31b13b1_S1_TXTL_RNAdeg_R*AA_2AGTP_Ribo_RNA_utr1__tetR_RNase_combined;
    mwa3c80ce8_3f35_4896_851f_f001d31b13b1_S1_TXTL_RNAdeg_F = 10; mwa3c80ce8_3f35_4896_851f_f001d31b13b1_S1_TXTL_RNAdeg_R = 2000;
  mwcc627b8e_86a7_4999_9341_4f0cedf8c23a_S1: AA_2AGTP_Ribo_RNA_utr1__tetR_RNase_combined => RNase_combined + AA_shared + 2 AGTP_shared + Ribo_shared; mwcc627b8e_86a7_4999_9341_4f0cedf8c23a_S1_TXTL_RNAdeg_F*AA_2AGTP_Ribo_RNA_utr1__tetR_RNase_combined;
    mwcc627b8e_86a7_4999_9341_4f0cedf8c23a_S1_TXTL_RNAdeg_F = 0.002777778;
  mw1af36775_1f35_45b6_975f_b76651538f69_S1: term_Ribo_RNA_utr1__tetR_combined + RNase_combined -> term_Ribo_RNA_utr1__tetR_RNase_combined; mw1af36775_1f35_45b6_975f_b76651538f69_S1_TXTL_RNAdeg_F*term_Ribo_RNA_utr1__tetR_combined*RNase_combined - mw1af36775_1f35_45b6_975f_b76651538f69_S1_TXTL_RNAdeg_R*term_Ribo_RNA_utr1__tetR_RNase_combined;
    mw1af36775_1f35_45b6_975f_b76651538f69_S1_TXTL_RNAdeg_F = 10; mw1af36775_1f35_45b6_975f_b76651538f69_S1_TXTL_RNAdeg_R = 2000;
  mw8923a15b_5ca5_4b31_b3fa_71c7a85b40ba_S1: term_Ribo_RNA_utr1__tetR_RNase_combined => RNase_combined + Ribo_shared; mw8923a15b_5ca5_4b31_b3fa_71c7a85b40ba_S1_TXTL_RNAdeg_F*term_Ribo_RNA_utr1__tetR_RNase_combined;
    mw8923a15b_5ca5_4b31_b3fa_71c7a85b40ba_S1_TXTL_RNAdeg_F = 0.002777778;
  mwccc63baa_1053_479b_9ff1_39d327e8333a_S1: AA_Ribo_RNA_utr1__tetR_combined + RNase_combined -> AA_Ribo_RNA_utr1__tetR_RNase_combined; mwccc63baa_1053_479b_9ff1_39d327e8333a_S1_TXTL_RNAdeg_F*AA_Ribo_RNA_utr1__tetR_combined*RNase_combined - mwccc63baa_1053_479b_9ff1_39d327e8333a_S1_TXTL_RNAdeg_R*AA_Ribo_RNA_utr1__tetR_RNase_combined;
    mwccc63baa_1053_479b_9ff1_39d327e8333a_S1_TXTL_RNAdeg_F = 10; mwccc63baa_1053_479b_9ff1_39d327e8333a_S1_TXTL_RNAdeg_R = 2000;
  mwbab355ff_b4a0_46b1_8cd7_7fe19f6c6237_S1: AA_Ribo_RNA_utr1__tetR_RNase_combined => RNase_combined + AA_shared + Ribo_shared; mwbab355ff_b4a0_46b1_8cd7_7fe19f6c6237_S1_TXTL_RNAdeg_F*AA_Ribo_RNA_utr1__tetR_RNase_combined;
    mwbab355ff_b4a0_46b1_8cd7_7fe19f6c6237_S1_TXTL_RNAdeg_F = 0.002777778;
  mw33c8c753_f1f0_4603_a47d_e608c3f4238c_S1: protein_deGFP_combined => xxprotein_deGFP_combined; mw33c8c753_f1f0_4603_a47d_e608c3f4238c_S1_TXTL_PROT_deGFP_MATURATION*protein_deGFP_combined;
    mw33c8c753_f1f0_4603_a47d_e608c3f4238c_S1_TXTL_PROT_deGFP_MATURATION = 0.002310491;
  mw0a8085cb_a37c_4ec8_b616_a3e137a85859_S1: RNA_utr1__deGFP_combined + Ribo_shared -> Ribo_RNA_utr1__deGFP_combined; mw0a8085cb_a37c_4ec8_b616_a3e137a85859_S1_TXTL_UTR_UTR1_F*RNA_utr1__deGFP_combined*Ribo_shared - mw0a8085cb_a37c_4ec8_b616_a3e137a85859_S1_TXTL_UTR_UTR1_R*Ribo_RNA_utr1__deGFP_combined;
    mw0a8085cb_a37c_4ec8_b616_a3e137a85859_S1_TXTL_UTR_UTR1_F = 0.2; mw0a8085cb_a37c_4ec8_b616_a3e137a85859_S1_TXTL_UTR_UTR1_R = 4;
  mwadcc1921_bcf9_496f_b494_ae735cb96f05_S1: DNA_ptet__utr1__deGFP_combined + RNAP_shared -> RNAP_DNA_ptet__utr1__deGFP_combined; mwadcc1921_bcf9_496f_b494_ae735cb96f05_S1_TXTL_PTET_RNAPbound_F*DNA_ptet__utr1__deGFP_combined*RNAP_shared - mwadcc1921_bcf9_496f_b494_ae735cb96f05_S1_TXTL_PTET_RNAPbound_R*RNAP_DNA_ptet__utr1__deGFP_combined;
    mwadcc1921_bcf9_496f_b494_ae735cb96f05_S1_TXTL_PTET_RNAPbound_F = 20; mwadcc1921_bcf9_496f_b494_ae735cb96f05_S1_TXTL_PTET_RNAPbound_R = 400;
  mwa7aef5c0_8f0c_48cc_b368_e528103e3618_S1: CUTP_AGTP_RNAP_DNA_ptet__utr1__deGFP_combined => RNAP_DNA_ptet__utr1__deGFP_combined; mwa7aef5c0_8f0c_48cc_b368_e528103e3618_S1_TXTL_NTP_consumption*CUTP_AGTP_RNAP_DNA_ptet__utr1__deGFP_combined;
    mwa7aef5c0_8f0c_48cc_b368_e528103e3618_S1_TXTL_NTP_consumption = 0.7485294;
  mwf14b01c4_74b3_4280_b757_a500cd789302_S1: term_RNAP_DNA_ptet__utr1__deGFP_combined => RNAP_shared + DNA_ptet__utr1__deGFP_combined; mwf14b01c4_74b3_4280_b757_a500cd789302_S1_TXTL_RNAPBOUND_TERMINATION_RATE*term_RNAP_DNA_ptet__utr1__deGFP_combined;
    mwf14b01c4_74b3_4280_b757_a500cd789302_S1_TXTL_RNAPBOUND_TERMINATION_RATE = 0.05;
  mw3fcf3d1e_2278_4250_9850_9551806333ad_S1: RNAP_DNA_ptet__utr1__deGFP_combined + AGTP_shared -> AGTP_RNAP_DNA_ptet__utr1__deGFP_combined; mw3fcf3d1e_2278_4250_9850_9551806333ad_S1_TXTL_NTP_RNAP_F*RNAP_DNA_ptet__utr1__deGFP_combined*AGTP_shared - mw3fcf3d1e_2278_4250_9850_9551806333ad_S1_TXTL_NTP_RNAP_R*AGTP_RNAP_DNA_ptet__utr1__deGFP_combined;
    mw3fcf3d1e_2278_4250_9850_9551806333ad_S1_TXTL_NTP_RNAP_F = 1000; mw3fcf3d1e_2278_4250_9850_9551806333ad_S1_TXTL_NTP_RNAP_R = 120000000;
  mwc694e1fa_d43b_450d_91ac_d265858ae3ec_S1: RNAP_DNA_ptet__utr1__deGFP_combined + CUTP_shared -> CUTP_RNAP_DNA_ptet__utr1__deGFP_combined; mwc694e1fa_d43b_450d_91ac_d265858ae3ec_S1_TXTL_NTP_RNAP_F*RNAP_DNA_ptet__utr1__deGFP_combined*CUTP_shared - mwc694e1fa_d43b_450d_91ac_d265858ae3ec_S1_TXTL_NTP_RNAP_R*CUTP_RNAP_DNA_ptet__utr1__deGFP_combined;
    mwc694e1fa_d43b_450d_91ac_d265858ae3ec_S1_TXTL_NTP_RNAP_F = 1000; mwc694e1fa_d43b_450d_91ac_d265858ae3ec_S1_TXTL_NTP_RNAP_R = 120000000;
  mwd9bdfed6_5f4b_4b46_91bb_38f915c2cc6a_S1: AGTP_RNAP_DNA_ptet__utr1__deGFP_combined + CUTP_shared -> CUTP_AGTP_RNAP_DNA_ptet__utr1__deGFP_combined; mwd9bdfed6_5f4b_4b46_91bb_38f915c2cc6a_S1_TXTL_NTP_RNAP_F*AGTP_RNAP_DNA_ptet__utr1__deGFP_combined*CUTP_shared - mwd9bdfed6_5f4b_4b46_91bb_38f915c2cc6a_S1_TXTL_NTP_RNAP_R*CUTP_AGTP_RNAP_DNA_ptet__utr1__deGFP_combined;
    mwd9bdfed6_5f4b_4b46_91bb_38f915c2cc6a_S1_TXTL_NTP_RNAP_F = 1; mwd9bdfed6_5f4b_4b46_91bb_38f915c2cc6a_S1_TXTL_NTP_RNAP_R = 120000;
  mw38e78944_5fc4_486e_91fc_103472e2e3b2_S1: CUTP_RNAP_DNA_ptet__utr1__deGFP_combined + AGTP_shared -> CUTP_AGTP_RNAP_DNA_ptet__utr1__deGFP_combined; mw38e78944_5fc4_486e_91fc_103472e2e3b2_S1_TXTL_NTP_RNAP_F*CUTP_RNAP_DNA_ptet__utr1__deGFP_combined*AGTP_shared - mw38e78944_5fc4_486e_91fc_103472e2e3b2_S1_TXTL_NTP_RNAP_R*CUTP_AGTP_RNAP_DNA_ptet__utr1__deGFP_combined;
    mw38e78944_5fc4_486e_91fc_103472e2e3b2_S1_TXTL_NTP_RNAP_F = 1; mw38e78944_5fc4_486e_91fc_103472e2e3b2_S1_TXTL_NTP_RNAP_R = 120000;
  mw87161df6_8d6c_4a3d_9ef9_fb84883d0cb8_S1: CUTP_AGTP_RNAP_DNA_ptet__utr1__deGFP_combined => term_RNAP_DNA_ptet__utr1__deGFP_combined + RNA_utr1__deGFP_combined; mw87161df6_8d6c_4a3d_9ef9_fb84883d0cb8_S1_TXTL_transcription_rate1*CUTP_AGTP_RNAP_DNA_ptet__utr1__deGFP_combined;
    mw87161df6_8d6c_4a3d_9ef9_fb84883d0cb8_S1_TXTL_transcription_rate1 = 0.001470588;
  mw254fe677_70a8_47b3_8db3_a4d012988ecb_S1: DNA_ptet__utr1__deGFP_combined + protein_tetRdimer_combined -> DNA_ptet__utr1__deGFP_protein_tetRdimer_combined; mw254fe677_70a8_47b3_8db3_a4d012988ecb_S1_ptet_sequestration_F*DNA_ptet__utr1__deGFP_combined*protein_tetRdimer_combined - mw254fe677_70a8_47b3_8db3_a4d012988ecb_S1_ptet_sequestration_R*DNA_ptet__utr1__deGFP_protein_tetRdimer_combined;
    mw254fe677_70a8_47b3_8db3_a4d012988ecb_S1_ptet_sequestration_F = 0.25; mw254fe677_70a8_47b3_8db3_a4d012988ecb_S1_ptet_sequestration_R = 0.000111;
  mwae863f5a_3c0c_4f88_b343_9978b1435f3d_S1: Ribo_RNA_utr1__deGFP_combined + AA_shared -> AA_Ribo_RNA_utr1__deGFP_combined; mwae863f5a_3c0c_4f88_b343_9978b1435f3d_S1_TL_AA_F*Ribo_RNA_utr1__deGFP_combined*AA_shared - mwae863f5a_3c0c_4f88_b343_9978b1435f3d_S1_TL_AA_R*AA_Ribo_RNA_utr1__deGFP_combined;
    mwae863f5a_3c0c_4f88_b343_9978b1435f3d_S1_TL_AA_F = 300; mwae863f5a_3c0c_4f88_b343_9978b1435f3d_S1_TL_AA_R = 0.1;
  mw046f3557_355c_4f6e_8047_010690b1c022_S1: AA_Ribo_RNA_utr1__deGFP_combined + 2 AGTP_shared -> AA_2AGTP_Ribo_RNA_utr1__deGFP_combined; mw046f3557_355c_4f6e_8047_010690b1c022_S1_TL_AGTP_F*AA_Ribo_RNA_utr1__deGFP_combined*AGTP_shared^2 - mw046f3557_355c_4f6e_8047_010690b1c022_S1_TL_AGTP_R*AA_2AGTP_Ribo_RNA_utr1__deGFP_combined;
    mw046f3557_355c_4f6e_8047_010690b1c022_S1_TL_AGTP_F = 30; mw046f3557_355c_4f6e_8047_010690b1c022_S1_TL_AGTP_R = 10;
  mw8d6564f3_cb8b_48b6_ae84_116a746321a9_S1: AA_2AGTP_Ribo_RNA_utr1__deGFP_combined => term_Ribo_RNA_utr1__deGFP_combined; mw8d6564f3_cb8b_48b6_ae84_116a746321a9_S1_TXTL_TL_AA_consumption*AA_2AGTP_Ribo_RNA_utr1__deGFP_combined;
    mw8d6564f3_cb8b_48b6_ae84_116a746321a9_S1_TXTL_TL_AA_consumption = 0.024;
  mw352c0ac9_7853_45c7_9606_84119b701958_S1: AA_2AGTP_Ribo_RNA_utr1__deGFP_combined => term_Ribo_RNA_utr1__deGFP_combined + protein_deGFP_combined; mw352c0ac9_7853_45c7_9606_84119b701958_S1_TXTL_TL_rate*AA_2AGTP_Ribo_RNA_utr1__deGFP_combined;
    mw352c0ac9_7853_45c7_9606_84119b701958_S1_TXTL_TL_rate = 0.012;
  mw0a346a00_5d8b_48cd_8497_cf9dcc9f78b5_S1: term_Ribo_RNA_utr1__deGFP_combined => RNA_utr1__deGFP_combined + Ribo_shared; mw0a346a00_5d8b_48cd_8497_cf9dcc9f78b5_S1_TXTL_RIBOBOUND_TERMINATION_RATE*term_Ribo_RNA_utr1__deGFP_combined;
    mw0a346a00_5d8b_48cd_8497_cf9dcc9f78b5_S1_TXTL_RIBOBOUND_TERMINATION_RATE = 50;
  mw1d8b5d9a_6616_43d5_92db_d9bd77098727_S1: RNA_utr1__deGFP_combined + RNase_combined -> RNA_utr1__deGFP_RNase_combined; mw1d8b5d9a_6616_43d5_92db_d9bd77098727_S1_TXTL_RNAdeg_F*RNA_utr1__deGFP_combined*RNase_combined - mw1d8b5d9a_6616_43d5_92db_d9bd77098727_S1_TXTL_RNAdeg_R*RNA_utr1__deGFP_RNase_combined;
    mw1d8b5d9a_6616_43d5_92db_d9bd77098727_S1_TXTL_RNAdeg_F = 10; mw1d8b5d9a_6616_43d5_92db_d9bd77098727_S1_TXTL_RNAdeg_R = 2000;
  mwa46df03c_2bd9_4c61_bd50_3c3bfb7b048e_S1: RNA_utr1__deGFP_RNase_combined => RNase_combined; mwa46df03c_2bd9_4c61_bd50_3c3bfb7b048e_S1_TXTL_RNAdeg_F*RNA_utr1__deGFP_RNase_combined;
    mwa46df03c_2bd9_4c61_bd50_3c3bfb7b048e_S1_TXTL_RNAdeg_F = 0.002777778;
  mw64f66203_56ca_4c7b_a473_3b59bf36a8f0_S1: Ribo_RNA_utr1__deGFP_combined + RNase_combined -> Ribo_RNA_utr1__deGFP_RNase_combined; mw64f66203_56ca_4c7b_a473_3b59bf36a8f0_S1_TXTL_RNAdeg_F*Ribo_RNA_utr1__deGFP_combined*RNase_combined - mw64f66203_56ca_4c7b_a473_3b59bf36a8f0_S1_TXTL_RNAdeg_R*Ribo_RNA_utr1__deGFP_RNase_combined;
    mw64f66203_56ca_4c7b_a473_3b59bf36a8f0_S1_TXTL_RNAdeg_F = 10; mw64f66203_56ca_4c7b_a473_3b59bf36a8f0_S1_TXTL_RNAdeg_R = 2000;
  mwd908b797_43cc_4fe3_afc6_5c2ad0fd6fb7_S1: Ribo_RNA_utr1__deGFP_RNase_combined => RNase_combined + Ribo_shared; mwd908b797_43cc_4fe3_afc6_5c2ad0fd6fb7_S1_TXTL_RNAdeg_F*Ribo_RNA_utr1__deGFP_RNase_combined;
    mwd908b797_43cc_4fe3_afc6_5c2ad0fd6fb7_S1_TXTL_RNAdeg_F = 0.002777778;
  mw45e32f77_600c_4bfa_be6b_61a691ac4825_S1: AA_2AGTP_Ribo_RNA_utr1__deGFP_combined + RNase_combined -> AA_2AGTP_Ribo_RNA_utr1__deGFP_RNase_combined; mw45e32f77_600c_4bfa_be6b_61a691ac4825_S1_TXTL_RNAdeg_F*AA_2AGTP_Ribo_RNA_utr1__deGFP_combined*RNase_combined - mw45e32f77_600c_4bfa_be6b_61a691ac4825_S1_TXTL_RNAdeg_R*AA_2AGTP_Ribo_RNA_utr1__deGFP_RNase_combined;
    mw45e32f77_600c_4bfa_be6b_61a691ac4825_S1_TXTL_RNAdeg_F = 10; mw45e32f77_600c_4bfa_be6b_61a691ac4825_S1_TXTL_RNAdeg_R = 2000;
  mw96c500a3_466d_4a0c_b1c8_37a4f88a97bf_S1: AA_2AGTP_Ribo_RNA_utr1__deGFP_RNase_combined => RNase_combined + AA_shared + 2 AGTP_shared + Ribo_shared; mw96c500a3_466d_4a0c_b1c8_37a4f88a97bf_S1_TXTL_RNAdeg_F*AA_2AGTP_Ribo_RNA_utr1__deGFP_RNase_combined;
    mw96c500a3_466d_4a0c_b1c8_37a4f88a97bf_S1_TXTL_RNAdeg_F = 0.002777778;
  mw7b19ed98_b513_4cc4_9cde_68f25750300d_S1: term_Ribo_RNA_utr1__deGFP_combined + RNase_combined -> term_Ribo_RNA_utr1__deGFP_RNase_combined; mw7b19ed98_b513_4cc4_9cde_68f25750300d_S1_TXTL_RNAdeg_F*term_Ribo_RNA_utr1__deGFP_combined*RNase_combined - mw7b19ed98_b513_4cc4_9cde_68f25750300d_S1_TXTL_RNAdeg_R*term_Ribo_RNA_utr1__deGFP_RNase_combined;
    mw7b19ed98_b513_4cc4_9cde_68f25750300d_S1_TXTL_RNAdeg_F = 10; mw7b19ed98_b513_4cc4_9cde_68f25750300d_S1_TXTL_RNAdeg_R = 2000;
  mw933a0de6_03a4_40ee_b046_e9921fa80fdd_S1: term_Ribo_RNA_utr1__deGFP_RNase_combined => RNase_combined + Ribo_shared; mw933a0de6_03a4_40ee_b046_e9921fa80fdd_S1_TXTL_RNAdeg_F*term_Ribo_RNA_utr1__deGFP_RNase_combined;
    mw933a0de6_03a4_40ee_b046_e9921fa80fdd_S1_TXTL_RNAdeg_F = 0.002777778;
  mwa82efff1_b77f_433a_9ac4_2e985626923f_S1: AA_Ribo_RNA_utr1__deGFP_combined + RNase_combined -> AA_Ribo_RNA_utr1__deGFP_RNase_combined; mwa82efff1_b77f_433a_9ac4_2e985626923f_S1_TXTL_RNAdeg_F*AA_Ribo_RNA_utr1__deGFP_combined*RNase_combined - mwa82efff1_b77f_433a_9ac4_2e985626923f_S1_TXTL_RNAdeg_R*AA_Ribo_RNA_utr1__deGFP_RNase_combined;
    mwa82efff1_b77f_433a_9ac4_2e985626923f_S1_TXTL_RNAdeg_F = 10; mwa82efff1_b77f_433a_9ac4_2e985626923f_S1_TXTL_RNAdeg_R = 2000;
  mw2ef81203_bcca_4f06_9a33_39c6d8daa350_S1: AA_Ribo_RNA_utr1__deGFP_RNase_combined => RNase_combined + AA_shared + Ribo_shared; mw2ef81203_bcca_4f06_9a33_39c6d8daa350_S1_TXTL_RNAdeg_F*AA_Ribo_RNA_utr1__deGFP_RNase_combined;
    mw2ef81203_bcca_4f06_9a33_39c6d8daa350_S1_TXTL_RNAdeg_F = 0.002777778;
  mw1b9080f1_fce6_4fd8_94aa_833805b25467_S1: AGTP_shared => AGTP_USED_combined; mw8cf83496_9f55_4eca_9dc2_b30c8e67d7bd_S1*AGTP_shared;
  mw79d8dcb2_e075_4db1_9747_f7b2806512a5_S2: protein_tetRdimer_combined + 2 aTc_combined -> x_2_aTc_protein_tetRdimer_combined; mw79d8dcb2_e075_4db1_9747_f7b2806512a5_S2_TXTL_INDUCER_TETR_ATC_F*protein_tetRdimer_combined*aTc_combined^2 - mw79d8dcb2_e075_4db1_9747_f7b2806512a5_S2_TXTL_INDUCER_TETR_ATC_R*x_2_aTc_protein_tetRdimer_combined;
    mw79d8dcb2_e075_4db1_9747_f7b2806512a5_S2_TXTL_INDUCER_TETR_ATC_F = 1e-5; mw79d8dcb2_e075_4db1_9747_f7b2806512a5_S2_TXTL_INDUCER_TETR_ATC_R = 0.1;
  mw04fec241_b2ab_4809_8255_316687f8f15a_S2: 2 protein_tetR_combined -> protein_tetRdimer_combined; mw04fec241_b2ab_4809_8255_316687f8f15a_S2_kf*protein_tetR_combined^2 - mw04fec241_b2ab_4809_8255_316687f8f15a_S2_kr*protein_tetRdimer_combined;
    mw04fec241_b2ab_4809_8255_316687f8f15a_S2_kf = 1; mw04fec241_b2ab_4809_8255_316687f8f15a_S2_kr = 1;
  mwcc0895bd_b5ba_4a14_a659_6d6e36df38f1_S2: RNA_utr1__tetR_combined + Ribo_shared -> Ribo_RNA_utr1__tetR_combined; mwcc0895bd_b5ba_4a14_a659_6d6e36df38f1_S2_TXTL_UTR_UTR1_F*RNA_utr1__tetR_combined*Ribo_shared - mwcc0895bd_b5ba_4a14_a659_6d6e36df38f1_S2_TXTL_UTR_UTR1_R*Ribo_RNA_utr1__tetR_combined;
    mwcc0895bd_b5ba_4a14_a659_6d6e36df38f1_S2_TXTL_UTR_UTR1_F = 0.2; mwcc0895bd_b5ba_4a14_a659_6d6e36df38f1_S2_TXTL_UTR_UTR1_R = 4;
  mwb3f0e3af_da8f_4f01_9c10_b76675ba1546_S2: DNA_ptet__utr1__tetR_combined + RNAP_shared -> RNAP_DNA_ptet__utr1__tetR_combined; mwb3f0e3af_da8f_4f01_9c10_b76675ba1546_S2_TXTL_PTET_RNAPbound_F*DNA_ptet__utr1__tetR_combined*RNAP_shared - mwb3f0e3af_da8f_4f01_9c10_b76675ba1546_S2_TXTL_PTET_RNAPbound_R*RNAP_DNA_ptet__utr1__tetR_combined;
    mwb3f0e3af_da8f_4f01_9c10_b76675ba1546_S2_TXTL_PTET_RNAPbound_F = 20; mwb3f0e3af_da8f_4f01_9c10_b76675ba1546_S2_TXTL_PTET_RNAPbound_R = 400;
  mwf11fa2ad_c8ad_44d1_a04d_5b0a417cd881_S2: CUTP_AGTP_RNAP_DNA_ptet__utr1__tetR_combined => RNAP_DNA_ptet__utr1__tetR_combined; mwf11fa2ad_c8ad_44d1_a04d_5b0a417cd881_S2_TXTL_NTP_consumption*CUTP_AGTP_RNAP_DNA_ptet__utr1__tetR_combined;
    mwf11fa2ad_c8ad_44d1_a04d_5b0a417cd881_S2_TXTL_NTP_consumption = 0.7487705;
  mw966b06a8_429a_4168_905d_e9b90c80e226_S2: term_RNAP_DNA_ptet__utr1__tetR_combined => RNAP_shared + DNA_ptet__utr1__tetR_combined; mw966b06a8_429a_4168_905d_e9b90c80e226_S2_TXTL_RNAPBOUND_TERMINATION_RATE*term_RNAP_DNA_ptet__utr1__tetR_combined;
    mw966b06a8_429a_4168_905d_e9b90c80e226_S2_TXTL_RNAPBOUND_TERMINATION_RATE = 0.05;
  mwa8036764_9730_4e54_abea_d70e0410a362_S2: RNAP_DNA_ptet__utr1__tetR_combined + AGTP_shared -> AGTP_RNAP_DNA_ptet__utr1__tetR_combined; mwa8036764_9730_4e54_abea_d70e0410a362_S2_TXTL_NTP_RNAP_F*RNAP_DNA_ptet__utr1__tetR_combined*AGTP_shared - mwa8036764_9730_4e54_abea_d70e0410a362_S2_TXTL_NTP_RNAP_R*AGTP_RNAP_DNA_ptet__utr1__tetR_combined;
    mwa8036764_9730_4e54_abea_d70e0410a362_S2_TXTL_NTP_RNAP_F = 1000; mwa8036764_9730_4e54_abea_d70e0410a362_S2_TXTL_NTP_RNAP_R = 120000000;
  mw1e5411e8_8a6b_422f_a49a_ea52eb66c78a_S2: RNAP_DNA_ptet__utr1__tetR_combined + CUTP_shared -> CUTP_RNAP_DNA_ptet__utr1__tetR_combined; mw1e5411e8_8a6b_422f_a49a_ea52eb66c78a_S2_TXTL_NTP_RNAP_F*RNAP_DNA_ptet__utr1__tetR_combined*CUTP_shared - mw1e5411e8_8a6b_422f_a49a_ea52eb66c78a_S2_TXTL_NTP_RNAP_R*CUTP_RNAP_DNA_ptet__utr1__tetR_combined;
    mw1e5411e8_8a6b_422f_a49a_ea52eb66c78a_S2_TXTL_NTP_RNAP_F = 1000; mw1e5411e8_8a6b_422f_a49a_ea52eb66c78a_S2_TXTL_NTP_RNAP_R = 120000000;
  mw6f420cdd_d7b1_4c49_87ea_dacf3d627f3f_S2: AGTP_RNAP_DNA_ptet__utr1__tetR_combined + CUTP_shared -> CUTP_AGTP_RNAP_DNA_ptet__utr1__tetR_combined; mw6f420cdd_d7b1_4c49_87ea_dacf3d627f3f_S2_TXTL_NTP_RNAP_F*AGTP_RNAP_DNA_ptet__utr1__tetR_combined*CUTP_shared - mw6f420cdd_d7b1_4c49_87ea_dacf3d627f3f_S2_TXTL_NTP_RNAP_R*CUTP_AGTP_RNAP_DNA_ptet__utr1__tetR_combined;
    mw6f420cdd_d7b1_4c49_87ea_dacf3d627f3f_S2_TXTL_NTP_RNAP_F = 1; mw6f420cdd_d7b1_4c49_87ea_dacf3d627f3f_S2_TXTL_NTP_RNAP_R = 120000;
  mw2c378739_e0a8_4f2f_bd5d_6e1cdf1c4040_S2: CUTP_RNAP_DNA_ptet__utr1__tetR_combined + AGTP_shared -> CUTP_AGTP_RNAP_DNA_ptet__utr1__tetR_combined; mw2c378739_e0a8_4f2f_bd5d_6e1cdf1c4040_S2_TXTL_NTP_RNAP_F*CUTP_RNAP_DNA_ptet__utr1__tetR_combined*AGTP_shared - mw2c378739_e0a8_4f2f_bd5d_6e1cdf1c4040_S2_TXTL_NTP_RNAP_R*CUTP_AGTP_RNAP_DNA_ptet__utr1__tetR_combined;
    mw2c378739_e0a8_4f2f_bd5d_6e1cdf1c4040_S2_TXTL_NTP_RNAP_F = 1; mw2c378739_e0a8_4f2f_bd5d_6e1cdf1c4040_S2_TXTL_NTP_RNAP_R = 120000;
  mw7ab55f4f_2343_4497_a092_9eba464a6a9d_S2: CUTP_AGTP_RNAP_DNA_ptet__utr1__tetR_combined => term_RNAP_DNA_ptet__utr1__tetR_combined + RNA_utr1__tetR_combined; mw7ab55f4f_2343_4497_a092_9eba464a6a9d_S2_TXTL_transcription_rate1*CUTP_AGTP_RNAP_DNA_ptet__utr1__tetR_combined;
    mw7ab55f4f_2343_4497_a092_9eba464a6a9d_S2_TXTL_transcription_rate1 = 0.001229508;
  mwdfcf0afe_1b13_42cb_bdb6_c018d212ac10_S2: DNA_ptet__utr1__tetR_combined + protein_tetRdimer_combined -> DNA_ptet__utr1__tetR_protein_tetRdimer_combined; mwdfcf0afe_1b13_42cb_bdb6_c018d212ac10_S2_ptet_sequestration_F*DNA_ptet__utr1__tetR_combined*protein_tetRdimer_combined - mwdfcf0afe_1b13_42cb_bdb6_c018d212ac10_S2_ptet_sequestration_R*DNA_ptet__utr1__tetR_protein_tetRdimer_combined;
    mwdfcf0afe_1b13_42cb_bdb6_c018d212ac10_S2_ptet_sequestration_F = 0.25; mwdfcf0afe_1b13_42cb_bdb6_c018d212ac10_S2_ptet_sequestration_R = 0.000111;
  mwd8e9ea2a_103c_4c1c_b0c3_d4010b328d2c_S2: Ribo_RNA_utr1__tetR_combined + AA_shared -> AA_Ribo_RNA_utr1__tetR_combined; mwd8e9ea2a_103c_4c1c_b0c3_d4010b328d2c_S2_TL_AA_F*Ribo_RNA_utr1__tetR_combined*AA_shared - mwd8e9ea2a_103c_4c1c_b0c3_d4010b328d2c_S2_TL_AA_R*AA_Ribo_RNA_utr1__tetR_combined;
    mwd8e9ea2a_103c_4c1c_b0c3_d4010b328d2c_S2_TL_AA_F = 300; mwd8e9ea2a_103c_4c1c_b0c3_d4010b328d2c_S2_TL_AA_R = 0.1;
  mwab4dce27_f199_420f_9b02_db0f75bcb3c7_S2: AA_Ribo_RNA_utr1__tetR_combined + 2 AGTP_shared -> AA_2AGTP_Ribo_RNA_utr1__tetR_combined; mwab4dce27_f199_420f_9b02_db0f75bcb3c7_S2_TL_AGTP_F*AA_Ribo_RNA_utr1__tetR_combined*AGTP_shared^2 - mwab4dce27_f199_420f_9b02_db0f75bcb3c7_S2_TL_AGTP_R*AA_2AGTP_Ribo_RNA_utr1__tetR_combined;
    mwab4dce27_f199_420f_9b02_db0f75bcb3c7_S2_TL_AGTP_F = 30; mwab4dce27_f199_420f_9b02_db0f75bcb3c7_S2_TL_AGTP_R = 10;
  mw3817aebd_e483_46e8_9fa2_f036d592149f_S2: AA_2AGTP_Ribo_RNA_utr1__tetR_combined => term_Ribo_RNA_utr1__tetR_combined; mw3817aebd_e483_46e8_9fa2_f036d592149f_S2_TXTL_TL_AA_consumption*AA_2AGTP_Ribo_RNA_utr1__tetR_combined;
    mw3817aebd_e483_46e8_9fa2_f036d592149f_S2_TXTL_TL_AA_consumption = 0.03;
  mw86f540af_62e6_43b6_9b7c_7387e5f39a6e_S2: AA_2AGTP_Ribo_RNA_utr1__tetR_combined => term_Ribo_RNA_utr1__tetR_combined + protein_tetR_combined; mw86f540af_62e6_43b6_9b7c_7387e5f39a6e_S2_TXTL_TL_rate*AA_2AGTP_Ribo_RNA_utr1__tetR_combined;
    mw86f540af_62e6_43b6_9b7c_7387e5f39a6e_S2_TXTL_TL_rate = 0.01;
  mw4be48152_e8ed_44ae_95ee_85cb9955d4ed_S2: term_Ribo_RNA_utr1__tetR_combined => RNA_utr1__tetR_combined + Ribo_shared; mw4be48152_e8ed_44ae_95ee_85cb9955d4ed_S2_TXTL_RIBOBOUND_TERMINATION_RATE*term_Ribo_RNA_utr1__tetR_combined;
    mw4be48152_e8ed_44ae_95ee_85cb9955d4ed_S2_TXTL_RIBOBOUND_TERMINATION_RATE = 50;
  mwe2a194b9_a07a_45d2_b723_53d4cdd8e8eb_S2: RNA_utr1__tetR_combined + RNase_combined -> RNA_utr1__tetR_RNase_combined; mwe2a194b9_a07a_45d2_b723_53d4cdd8e8eb_S2_TXTL_RNAdeg_F*RNA_utr1__tetR_combined*RNase_combined - mwe2a194b9_a07a_45d2_b723_53d4cdd8e8eb_S2_TXTL_RNAdeg_R*RNA_utr1__tetR_RNase_combined;
    mwe2a194b9_a07a_45d2_b723_53d4cdd8e8eb_S2_TXTL_RNAdeg_F = 10; mwe2a194b9_a07a_45d2_b723_53d4cdd8e8eb_S2_TXTL_RNAdeg_R = 2000;
  mwa4cad143_61cd_4e55_a1e2_46a7143d0177_S2: RNA_utr1__tetR_RNase_combined => RNase_combined; mwa4cad143_61cd_4e55_a1e2_46a7143d0177_S2_TXTL_RNAdeg_F*RNA_utr1__tetR_RNase_combined;
    mwa4cad143_61cd_4e55_a1e2_46a7143d0177_S2_TXTL_RNAdeg_F = 0.002777778;
  mwb619efce_c55f_4388_8926_9c9a055b3987_S2: Ribo_RNA_utr1__tetR_combined + RNase_combined -> Ribo_RNA_utr1__tetR_RNase_combined; mwb619efce_c55f_4388_8926_9c9a055b3987_S2_TXTL_RNAdeg_F*Ribo_RNA_utr1__tetR_combined*RNase_combined - mwb619efce_c55f_4388_8926_9c9a055b3987_S2_TXTL_RNAdeg_R*Ribo_RNA_utr1__tetR_RNase_combined;
    mwb619efce_c55f_4388_8926_9c9a055b3987_S2_TXTL_RNAdeg_F = 10; mwb619efce_c55f_4388_8926_9c9a055b3987_S2_TXTL_RNAdeg_R = 2000;
  mw25c9d764_07a0_4e65_92d6_7e7291a4b8e8_S2: Ribo_RNA_utr1__tetR_RNase_combined => RNase_combined + Ribo_shared; mw25c9d764_07a0_4e65_92d6_7e7291a4b8e8_S2_TXTL_RNAdeg_F*Ribo_RNA_utr1__tetR_RNase_combined;
    mw25c9d764_07a0_4e65_92d6_7e7291a4b8e8_S2_TXTL_RNAdeg_F = 0.002777778;
  mwdb80a497_53ad_4b3d_82eb_de6ecb7483c0_S2: AA_2AGTP_Ribo_RNA_utr1__tetR_combined + RNase_combined -> AA_2AGTP_Ribo_RNA_utr1__tetR_RNase_combined; mwdb80a497_53ad_4b3d_82eb_de6ecb7483c0_S2_TXTL_RNAdeg_F*AA_2AGTP_Ribo_RNA_utr1__tetR_combined*RNase_combined - mwdb80a497_53ad_4b3d_82eb_de6ecb7483c0_S2_TXTL_RNAdeg_R*AA_2AGTP_Ribo_RNA_utr1__tetR_RNase_combined;
    mwdb80a497_53ad_4b3d_82eb_de6ecb7483c0_S2_TXTL_RNAdeg_F = 10; mwdb80a497_53ad_4b3d_82eb_de6ecb7483c0_S2_TXTL_RNAdeg_R = 2000;
  mw039541f5_9a22_4e8c_82f9_029e768f1ef9_S2: AA_2AGTP_Ribo_RNA_utr1__tetR_RNase_combined => RNase_combined + AA_shared + 2 AGTP_shared + Ribo_shared; mw039541f5_9a22_4e8c_82f9_029e768f1ef9_S2_TXTL_RNAdeg_F*AA_2AGTP_Ribo_RNA_utr1__tetR_RNase_combined;
    mw039541f5_9a22_4e8c_82f9_029e768f1ef9_S2_TXTL_RNAdeg_F = 0.002777778;
  mw70fe9eca_4050_4d5a_ae39_cf834d0d224e_S2: term_Ribo_RNA_utr1__tetR_combined + RNase_combined -> term_Ribo_RNA_utr1__tetR_RNase_combined; mw70fe9eca_4050_4d5a_ae39_cf834d0d224e_S2_TXTL_RNAdeg_F*term_Ribo_RNA_utr1__tetR_combined*RNase_combined - mw70fe9eca_4050_4d5a_ae39_cf834d0d224e_S2_TXTL_RNAdeg_R*term_Ribo_RNA_utr1__tetR_RNase_combined;
    mw70fe9eca_4050_4d5a_ae39_cf834d0d224e_S2_TXTL_RNAdeg_F = 10; mw70fe9eca_4050_4d5a_ae39_cf834d0d224e_S2_TXTL_RNAdeg_R = 2000;
  mw717cb6af_4bf2_41ae_b5a1_b4aab5741a3f_S2: term_Ribo_RNA_utr1__tetR_RNase_combined => RNase_combined + Ribo_shared; mw717cb6af_4bf2_41ae_b5a1_b4aab5741a3f_S2_TXTL_RNAdeg_F*term_Ribo_RNA_utr1__tetR_RNase_combined;
    mw717cb6af_4bf2_41ae_b5a1_b4aab5741a3f_S2_TXTL_RNAdeg_F = 0.002777778;
  mw50db268e_6acc_4639_a5b6_1c30e51415ed_S2: AA_Ribo_RNA_utr1__tetR_combined + RNase_combined -> AA_Ribo_RNA_utr1__tetR_RNase_combined; mw50db268e_6acc_4639_a5b6_1c30e51415ed_S2_TXTL_RNAdeg_F*AA_Ribo_RNA_utr1__tetR_combined*RNase_combined - mw50db268e_6acc_4639_a5b6_1c30e51415ed_S2_TXTL_RNAdeg_R*AA_Ribo_RNA_utr1__tetR_RNase_combined;
    mw50db268e_6acc_4639_a5b6_1c30e51415ed_S2_TXTL_RNAdeg_F = 10; mw50db268e_6acc_4639_a5b6_1c30e51415ed_S2_TXTL_RNAdeg_R = 2000;
  mw6d133498_a914_47b0_85db_4eef6ee43479_S2: AA_Ribo_RNA_utr1__tetR_RNase_combined => RNase_combined + AA_shared + Ribo_shared; mw6d133498_a914_47b0_85db_4eef6ee43479_S2_TXTL_RNAdeg_F*AA_Ribo_RNA_utr1__tetR_RNase_combined;
    mw6d133498_a914_47b0_85db_4eef6ee43479_S2_TXTL_RNAdeg_F = 0.002777778;
  mweb609a9d_005b_442a_ba00_efbec3c4c10f_S2: protein_deGFP_combined => xxprotein_deGFP_combined; mweb609a9d_005b_442a_ba00_efbec3c4c10f_S2_TXTL_PROT_deGFP_MATURATION*protein_deGFP_combined;
    mweb609a9d_005b_442a_ba00_efbec3c4c10f_S2_TXTL_PROT_deGFP_MATURATION = 0.002310491;
  mw933e3d35_3803_4057_8a35_62361f0d6851_S2: RNA_utr1__deGFP_combined + Ribo_shared -> Ribo_RNA_utr1__deGFP_combined; mw933e3d35_3803_4057_8a35_62361f0d6851_S2_TXTL_UTR_UTR1_F*RNA_utr1__deGFP_combined*Ribo_shared - mw933e3d35_3803_4057_8a35_62361f0d6851_S2_TXTL_UTR_UTR1_R*Ribo_RNA_utr1__deGFP_combined;
    mw933e3d35_3803_4057_8a35_62361f0d6851_S2_TXTL_UTR_UTR1_F = 0.2; mw933e3d35_3803_4057_8a35_62361f0d6851_S2_TXTL_UTR_UTR1_R = 4;
  mw9fc68b79_c7e6_4295_96e3_efe1e96f9cb5_S2: DNA_ptet__utr1__deGFP_combined + RNAP_shared -> RNAP_DNA_ptet__utr1__deGFP_combined; mw9fc68b79_c7e6_4295_96e3_efe1e96f9cb5_S2_TXTL_PTET_RNAPbound_F*DNA_ptet__utr1__deGFP_combined*RNAP_shared - mw9fc68b79_c7e6_4295_96e3_efe1e96f9cb5_S2_TXTL_PTET_RNAPbound_R*RNAP_DNA_ptet__utr1__deGFP_combined;
    mw9fc68b79_c7e6_4295_96e3_efe1e96f9cb5_S2_TXTL_PTET_RNAPbound_F = 20; mw9fc68b79_c7e6_4295_96e3_efe1e96f9cb5_S2_TXTL_PTET_RNAPbound_R = 400;
  mw8f42659f_3b44_4ab0_a563_032509c8e7e3_S2: CUTP_AGTP_RNAP_DNA_ptet__utr1__deGFP_combined => RNAP_DNA_ptet__utr1__deGFP_combined; mw8f42659f_3b44_4ab0_a563_032509c8e7e3_S2_TXTL_NTP_consumption*CUTP_AGTP_RNAP_DNA_ptet__utr1__deGFP_combined;
    mw8f42659f_3b44_4ab0_a563_032509c8e7e3_S2_TXTL_NTP_consumption = 0.7485294;
  mw3f5e39e1_647e_4025_9592_3574f4cdf8b9_S2: term_RNAP_DNA_ptet__utr1__deGFP_combined => RNAP_shared + DNA_ptet__utr1__deGFP_combined; mw3f5e39e1_647e_4025_9592_3574f4cdf8b9_S2_TXTL_RNAPBOUND_TERMINATION_RATE*term_RNAP_DNA_ptet__utr1__deGFP_combined;
    mw3f5e39e1_647e_4025_9592_3574f4cdf8b9_S2_TXTL_RNAPBOUND_TERMINATION_RATE = 0.05;
  mwa1a88959_a485_44d5_abd1_e445dc10fa89_S2: RNAP_DNA_ptet__utr1__deGFP_combined + AGTP_shared -> AGTP_RNAP_DNA_ptet__utr1__deGFP_combined; mwa1a88959_a485_44d5_abd1_e445dc10fa89_S2_TXTL_NTP_RNAP_F*RNAP_DNA_ptet__utr1__deGFP_combined*AGTP_shared - mwa1a88959_a485_44d5_abd1_e445dc10fa89_S2_TXTL_NTP_RNAP_R*AGTP_RNAP_DNA_ptet__utr1__deGFP_combined;
    mwa1a88959_a485_44d5_abd1_e445dc10fa89_S2_TXTL_NTP_RNAP_F = 1000; mwa1a88959_a485_44d5_abd1_e445dc10fa89_S2_TXTL_NTP_RNAP_R = 120000000;
  mw69e3ac18_1d6c_45cf_b4c3_d3e21b6f5cc0_S2: RNAP_DNA_ptet__utr1__deGFP_combined + CUTP_shared -> CUTP_RNAP_DNA_ptet__utr1__deGFP_combined; mw69e3ac18_1d6c_45cf_b4c3_d3e21b6f5cc0_S2_TXTL_NTP_RNAP_F*RNAP_DNA_ptet__utr1__deGFP_combined*CUTP_shared - mw69e3ac18_1d6c_45cf_b4c3_d3e21b6f5cc0_S2_TXTL_NTP_RNAP_R*CUTP_RNAP_DNA_ptet__utr1__deGFP_combined;
    mw69e3ac18_1d6c_45cf_b4c3_d3e21b6f5cc0_S2_TXTL_NTP_RNAP_F = 1000; mw69e3ac18_1d6c_45cf_b4c3_d3e21b6f5cc0_S2_TXTL_NTP_RNAP_R = 120000000;
  mwa1b87b9b_0725_4909_b1b2_0e61d6bed826_S2: AGTP_RNAP_DNA_ptet__utr1__deGFP_combined + CUTP_shared -> CUTP_AGTP_RNAP_DNA_ptet__utr1__deGFP_combined; mwa1b87b9b_0725_4909_b1b2_0e61d6bed826_S2_TXTL_NTP_RNAP_F*AGTP_RNAP_DNA_ptet__utr1__deGFP_combined*CUTP_shared - mwa1b87b9b_0725_4909_b1b2_0e61d6bed826_S2_TXTL_NTP_RNAP_R*CUTP_AGTP_RNAP_DNA_ptet__utr1__deGFP_combined;
    mwa1b87b9b_0725_4909_b1b2_0e61d6bed826_S2_TXTL_NTP_RNAP_F = 1; mwa1b87b9b_0725_4909_b1b2_0e61d6bed826_S2_TXTL_NTP_RNAP_R = 120000;
  mw2569ac6d_fdcd_432e_902c_4cf408daa6ef_S2: CUTP_RNAP_DNA_ptet__utr1__deGFP_combined + AGTP_shared -> CUTP_AGTP_RNAP_DNA_ptet__utr1__deGFP_combined; mw2569ac6d_fdcd_432e_902c_4cf408daa6ef_S2_TXTL_NTP_RNAP_F*CUTP_RNAP_DNA_ptet__utr1__deGFP_combined*AGTP_shared - mw2569ac6d_fdcd_432e_902c_4cf408daa6ef_S2_TXTL_NTP_RNAP_R*CUTP_AGTP_RNAP_DNA_ptet__utr1__deGFP_combined;
    mw2569ac6d_fdcd_432e_902c_4cf408daa6ef_S2_TXTL_NTP_RNAP_F = 1; mw2569ac6d_fdcd_432e_902c_4cf408daa6ef_S2_TXTL_NTP_RNAP_R = 120000;
  mw26514d1f_d571_40f0_b058_048eae750994_S2: CUTP_AGTP_RNAP_DNA_ptet__utr1__deGFP_combined => term_RNAP_DNA_ptet__utr1__deGFP_combined + RNA_utr1__deGFP_combined; mw26514d1f_d571_40f0_b058_048eae750994_S2_TXTL_transcription_rate1*CUTP_AGTP_RNAP_DNA_ptet__utr1__deGFP_combined;
    mw26514d1f_d571_40f0_b058_048eae750994_S2_TXTL_transcription_rate1 = 0.001470588;
  mw4cf7dc9f_0dfb_476d_8331_59d0efb8874a_S2: DNA_ptet__utr1__deGFP_combined + protein_tetRdimer_combined -> DNA_ptet__utr1__deGFP_protein_tetRdimer_combined; mw4cf7dc9f_0dfb_476d_8331_59d0efb8874a_S2_ptet_sequestration_F*DNA_ptet__utr1__deGFP_combined*protein_tetRdimer_combined - mw4cf7dc9f_0dfb_476d_8331_59d0efb8874a_S2_ptet_sequestration_R*DNA_ptet__utr1__deGFP_protein_tetRdimer_combined;
    mw4cf7dc9f_0dfb_476d_8331_59d0efb8874a_S2_ptet_sequestration_F = 0.25; mw4cf7dc9f_0dfb_476d_8331_59d0efb8874a_S2_ptet_sequestration_R = 0.000111;
  mw3d5a07dc_e40f_40af_ba87_0a40619b4220_S2: Ribo_RNA_utr1__deGFP_combined + AA_shared -> AA_Ribo_RNA_utr1__deGFP_combined; mw3d5a07dc_e40f_40af_ba87_0a40619b4220_S2_TL_AA_F*Ribo_RNA_utr1__deGFP_combined*AA_shared - mw3d5a07dc_e40f_40af_ba87_0a40619b4220_S2_TL_AA_R*AA_Ribo_RNA_utr1__deGFP_combined;
    mw3d5a07dc_e40f_40af_ba87_0a40619b4220_S2_TL_AA_F = 300; mw3d5a07dc_e40f_40af_ba87_0a40619b4220_S2_TL_AA_R = 0.1;
  mwf254e794_a573_4233_9066_8ab855ecc3f0_S2: AA_Ribo_RNA_utr1__deGFP_combined + 2 AGTP_shared -> AA_2AGTP_Ribo_RNA_utr1__deGFP_combined; mwf254e794_a573_4233_9066_8ab855ecc3f0_S2_TL_AGTP_F*AA_Ribo_RNA_utr1__deGFP_combined*AGTP_shared^2 - mwf254e794_a573_4233_9066_8ab855ecc3f0_S2_TL_AGTP_R*AA_2AGTP_Ribo_RNA_utr1__deGFP_combined;
    mwf254e794_a573_4233_9066_8ab855ecc3f0_S2_TL_AGTP_F = 30; mwf254e794_a573_4233_9066_8ab855ecc3f0_S2_TL_AGTP_R = 10;
  mw4cde338c_0ac4_4b25_be18_203c086ac162_S2: AA_2AGTP_Ribo_RNA_utr1__deGFP_combined => term_Ribo_RNA_utr1__deGFP_combined; mw4cde338c_0ac4_4b25_be18_203c086ac162_S2_TXTL_TL_AA_consumption*AA_2AGTP_Ribo_RNA_utr1__deGFP_combined;
    mw4cde338c_0ac4_4b25_be18_203c086ac162_S2_TXTL_TL_AA_consumption = 0.024;
  mwc62c3ab8_28a7_420c_98f8_df28486db563_S2: AA_2AGTP_Ribo_RNA_utr1__deGFP_combined => term_Ribo_RNA_utr1__deGFP_combined + protein_deGFP_combined; mwc62c3ab8_28a7_420c_98f8_df28486db563_S2_TXTL_TL_rate*AA_2AGTP_Ribo_RNA_utr1__deGFP_combined;
    mwc62c3ab8_28a7_420c_98f8_df28486db563_S2_TXTL_TL_rate = 0.012;
  mwf82df561_7fae_4b63_bd03_c89e89b762ba_S2: term_Ribo_RNA_utr1__deGFP_combined => RNA_utr1__deGFP_combined + Ribo_shared; mwf82df561_7fae_4b63_bd03_c89e89b762ba_S2_TXTL_RIBOBOUND_TERMINATION_RATE*term_Ribo_RNA_utr1__deGFP_combined;
    mwf82df561_7fae_4b63_bd03_c89e89b762ba_S2_TXTL_RIBOBOUND_TERMINATION_RATE = 50;
  mwd3eea109_9057_43ec_9c1a_868943fd0b51_S2: RNA_utr1__deGFP_combined + RNase_combined -> RNA_utr1__deGFP_RNase_combined; mwd3eea109_9057_43ec_9c1a_868943fd0b51_S2_TXTL_RNAdeg_F*RNA_utr1__deGFP_combined*RNase_combined - mwd3eea109_9057_43ec_9c1a_868943fd0b51_S2_TXTL_RNAdeg_R*RNA_utr1__deGFP_RNase_combined;
    mwd3eea109_9057_43ec_9c1a_868943fd0b51_S2_TXTL_RNAdeg_F = 10; mwd3eea109_9057_43ec_9c1a_868943fd0b51_S2_TXTL_RNAdeg_R = 2000;
  mw54b9acd4_df18_4408_9fb3_8cfd8f7080d3_S2: RNA_utr1__deGFP_RNase_combined => RNase_combined; mw54b9acd4_df18_4408_9fb3_8cfd8f7080d3_S2_TXTL_RNAdeg_F*RNA_utr1__deGFP_RNase_combined;
    mw54b9acd4_df18_4408_9fb3_8cfd8f7080d3_S2_TXTL_RNAdeg_F = 0.002777778;
  mwe0536f60_dad8_4b3b_a6da_af2add0cb49e_S2: Ribo_RNA_utr1__deGFP_combined + RNase_combined -> Ribo_RNA_utr1__deGFP_RNase_combined; mwe0536f60_dad8_4b3b_a6da_af2add0cb49e_S2_TXTL_RNAdeg_F*Ribo_RNA_utr1__deGFP_combined*RNase_combined - mwe0536f60_dad8_4b3b_a6da_af2add0cb49e_S2_TXTL_RNAdeg_R*Ribo_RNA_utr1__deGFP_RNase_combined;
    mwe0536f60_dad8_4b3b_a6da_af2add0cb49e_S2_TXTL_RNAdeg_F = 10; mwe0536f60_dad8_4b3b_a6da_af2add0cb49e_S2_TXTL_RNAdeg_R = 2000;
  mw686da9b4_436f_4853_8400_e759124c01d2_S2: Ribo_RNA_utr1__deGFP_RNase_combined => RNase_combined + Ribo_shared; mw686da9b4_436f_4853_8400_e759124c01d2_S2_TXTL_RNAdeg_F*Ribo_RNA_utr1__deGFP_RNase_combined;
    mw686da9b4_436f_4853_8400_e759124c01d2_S2_TXTL_RNAdeg_F = 0.002777778;
  mw5c598418_45bf_4c86_b37a_a1e884f1babb_S2: AA_2AGTP_Ribo_RNA_utr1__deGFP_combined + RNase_combined -> AA_2AGTP_Ribo_RNA_utr1__deGFP_RNase_combined; mw5c598418_45bf_4c86_b37a_a1e884f1babb_S2_TXTL_RNAdeg_F*AA_2AGTP_Ribo_RNA_utr1__deGFP_combined*RNase_combined - mw5c598418_45bf_4c86_b37a_a1e884f1babb_S2_TXTL_RNAdeg_R*AA_2AGTP_Ribo_RNA_utr1__deGFP_RNase_combined;
    mw5c598418_45bf_4c86_b37a_a1e884f1babb_S2_TXTL_RNAdeg_F = 10; mw5c598418_45bf_4c86_b37a_a1e884f1babb_S2_TXTL_RNAdeg_R = 2000;
  mw3e69ecc4_2b4b_4e06_83c8_9460b4fa5e7a_S2: AA_2AGTP_Ribo_RNA_utr1__deGFP_RNase_combined => RNase_combined + AA_shared + 2 AGTP_shared + Ribo_shared; mw3e69ecc4_2b4b_4e06_83c8_9460b4fa5e7a_S2_TXTL_RNAdeg_F*AA_2AGTP_Ribo_RNA_utr1__deGFP_RNase_combined;
    mw3e69ecc4_2b4b_4e06_83c8_9460b4fa5e7a_S2_TXTL_RNAdeg_F = 0.002777778;
  mw41dc1176_f556_482f_8006_486a3b61ef38_S2: term_Ribo_RNA_utr1__deGFP_combined + RNase_combined -> term_Ribo_RNA_utr1__deGFP_RNase_combined; mw41dc1176_f556_482f_8006_486a3b61ef38_S2_TXTL_RNAdeg_F*term_Ribo_RNA_utr1__deGFP_combined*RNase_combined - mw41dc1176_f556_482f_8006_486a3b61ef38_S2_TXTL_RNAdeg_R*term_Ribo_RNA_utr1__deGFP_RNase_combined;
    mw41dc1176_f556_482f_8006_486a3b61ef38_S2_TXTL_RNAdeg_F = 10; mw41dc1176_f556_482f_8006_486a3b61ef38_S2_TXTL_RNAdeg_R = 2000;
  mw488453cf_aa4e_41aa_bfe5_87f8d0a118ab_S2: term_Ribo_RNA_utr1__deGFP_RNase_combined => RNase_combined + Ribo_shared; mw488453cf_aa4e_41aa_bfe5_87f8d0a118ab_S2_TXTL_RNAdeg_F*term_Ribo_RNA_utr1__deGFP_RNase_combined;
    mw488453cf_aa4e_41aa_bfe5_87f8d0a118ab_S2_TXTL_RNAdeg_F = 0.002777778;
  mwe42ea471_36a2_4c40_a444_864a83b6aba8_S2: AA_Ribo_RNA_utr1__deGFP_combined + RNase_combined -> AA_Ribo_RNA_utr1__deGFP_RNase_combined; mwe42ea471_36a2_4c40_a444_864a83b6aba8_S2_TXTL_RNAdeg_F*AA_Ribo_RNA_utr1__deGFP_combined*RNase_combined - mwe42ea471_36a2_4c40_a444_864a83b6aba8_S2_TXTL_RNAdeg_R*AA_Ribo_RNA_utr1__deGFP_RNase_combined;
    mwe42ea471_36a2_4c40_a444_864a83b6aba8_S2_TXTL_RNAdeg_F = 10; mwe42ea471_36a2_4c40_a444_864a83b6aba8_S2_TXTL_RNAdeg_R = 2000;
  mwfb70b1e9_7b65_409a_8fc9_14bb651756a9_S2: AA_Ribo_RNA_utr1__deGFP_RNase_combined => RNase_combined + AA_shared + Ribo_shared; mwfb70b1e9_7b65_409a_8fc9_14bb651756a9_S2_TXTL_RNAdeg_F*AA_Ribo_RNA_utr1__deGFP_RNase_combined;
    mwfb70b1e9_7b65_409a_8fc9_14bb651756a9_S2_TXTL_RNAdeg_F = 0.002777778;
  mw425e1f92_9d3e_4f30_a916_810607a32b67_S2: AGTP_shared => AGTP_USED_combined; mw5c2bb4d9_3548_456f_a5fe_b970d5bbbf8a_S2*AGTP_shared;

  // Events:
  event_160: at (time <= 5400): mw8cf83496_9f55_4eca_9dc2_b30c8e67d7bd_S1 = 0;
  event_161: at (time > 5400): mw8cf83496_9f55_4eca_9dc2_b30c8e67d7bd_S1 = 0.0002;
  event_162: at (time <= 5400): mw5c2bb4d9_3548_456f_a5fe_b970d5bbbf8a_S2 = 0;
  event_163: at (time > 5400): mw5c2bb4d9_3548_456f_a5fe_b970d5bbbf8a_S2 = 0.0002;

  // Unit definitions:
  unit volume = litre;
  unit substance = mole;
  unit area = metre^2;
end
