// SBML level 2 version 4

model mix_of_E30VNPRL_E30VNPRL_gene_expression()
  // mix_of_E30VNPRL_E30VNPRL_gene_expression

  // Compartments:
  compartment contents = 1;

  // Species:
  species RNAP in contents = 100.0001/contents;
  species Ribo in contents = 30.00002/contents;
  species RecBCD in contents = 5.000003/contents;
  species RNase in contents = 100.0001/contents;
  species AGTP in contents = 3180048/contents;
  species CUTP in contents = 1908029/contents;
  species AA in contents = 3.180048e7/contents;
  species protein_tetR in contents = 0;
  species aTc in contents = 0;
  species protein_tetRdimer in contents = 0;
  species RNA_utr1_tetR in contents = 0; RNA_utr1_tetR is "RNA utr1--tetR";
  species Ribo_RNA_utr1_tetR in contents = 0; Ribo_RNA_utr1_tetR is "Ribo:RNA utr1--tetR";
  species DNA_psigX_utr1_tetR in contents = 0.5000003/contents; DNA_psigX_utr1_tetR is "DNA psigX--utr1--tetR";
  species RNAPSIGX in contents = 0;
  species RNAPSIGX_DNA_psigX_utr1_tetR in contents = 0; RNAPSIGX_DNA_psigX_utr1_tetR is "RNAPSIGX:DNA psigX--utr1--tetR";
  species AA_2AGTP_Ribo_RNA_utr1_tetR in contents = 0; AA_2AGTP_Ribo_RNA_utr1_tetR is "AA:2AGTP:Ribo:RNA utr1--tetR";
  species term_Ribo_RNA_utr1_tetR in contents = 0; term_Ribo_RNA_utr1_tetR is "term_Ribo:RNA utr1--tetR";
  species protein_deGFP_contents_19 in contents = 0;
  species protein_deGFP_contents_20 in contents = 0; protein_deGFP_contents_20 is "protein deGFP*";
  species RNA_utr1_deGFP in contents = 0; RNA_utr1_deGFP is "RNA utr1--deGFP";
  species Ribo_RNA_utr1_deGFP in contents = 0; Ribo_RNA_utr1_deGFP is "Ribo:RNA utr1--deGFP";
  species DNA_p28_ptet_utr1_deGFP in contents = 2.000001/contents; DNA_p28_ptet_utr1_deGFP is "DNA p28_ptet--utr1--deGFP";
  species RNAP28 in contents = 0;
  species RNAP28_DNA_p28_ptet_utr1_deGFP in contents = 0; RNAP28_DNA_p28_ptet_utr1_deGFP is "RNAP28:DNA p28_ptet--utr1--deGFP";
  species protein_sigma28 in contents = 0;
  species CUTP_AGTP_RNAP28_DNA_p28_ptet_utr1_deGFP in contents = 0; CUTP_AGTP_RNAP28_DNA_p28_ptet_utr1_deGFP is "CUTP:AGTP:RNAP28:DNA p28_ptet--utr1--deGFP";
  species term_RNAP28_DNA_p28_ptet_utr1_deGFP in contents = 0; term_RNAP28_DNA_p28_ptet_utr1_deGFP is "term_RNAP28:DNA p28_ptet--utr1--deGFP";
  species RNAP28_DNA_p28_ptet_utr1_deGFP_protein_tetRdimer in contents = 0; RNAP28_DNA_p28_ptet_utr1_deGFP_protein_tetRdimer is "RNAP28:DNA p28_ptet--utr1--deGFP:protein tetRdimer";
  species CUTP_AGTP_RNAP28_DNA_p28_ptet_utr1_deGFP_protein_tetRdimer in contents = 0; CUTP_AGTP_RNAP28_DNA_p28_ptet_utr1_deGFP_protein_tetRdimer is "CUTP:AGTP:RNAP28:DNA p28_ptet--utr1--deGFP:protein tetRdimer";
  species term_RNAP28_DNA_p28_ptet_utr1_deGFP_protein_tetRdimer in contents = 0; term_RNAP28_DNA_p28_ptet_utr1_deGFP_protein_tetRdimer is "term_RNAP28:DNA p28_ptet--utr1--deGFP:protein tetRdimer";
  species AA_2AGTP_Ribo_RNA_utr1_deGFP in contents = 0; AA_2AGTP_Ribo_RNA_utr1_deGFP is "AA:2AGTP:Ribo:RNA utr1--deGFP";
  species term_Ribo_RNA_utr1_deGFP in contents = 0; term_Ribo_RNA_utr1_deGFP is "term_Ribo:RNA utr1--deGFP";
  species protein_sigmaX in contents = 0;
  species RNA_utr1_sigmaX in contents = 0; RNA_utr1_sigmaX is "RNA utr1--sigmaX";
  species Ribo_RNA_utr1_sigmaX in contents = 0; Ribo_RNA_utr1_sigmaX is "Ribo:RNA utr1--sigmaX";
  species DNA_plas_utr1_sigmaX in contents = 0.5000003/contents; DNA_plas_utr1_sigmaX is "DNA plas--utr1--sigmaX";
  species RNAP_DNA_plas_utr1_sigmaX in contents = 0; RNAP_DNA_plas_utr1_sigmaX is "RNAP:DNA plas--utr1--sigmaX";
  species AA_2AGTP_Ribo_RNA_utr1_sigmaX in contents = 0; AA_2AGTP_Ribo_RNA_utr1_sigmaX is "AA:2AGTP:Ribo:RNA utr1--sigmaX";
  species term_Ribo_RNA_utr1_sigmaX in contents = 0; term_Ribo_RNA_utr1_sigmaX is "term_Ribo:RNA utr1--sigmaX";
  species RNA_utr1_sigma28 in contents = 0; RNA_utr1_sigma28 is "RNA utr1--sigma28";
  species Ribo_RNA_utr1_sigma28 in contents = 0; Ribo_RNA_utr1_sigma28 is "Ribo:RNA utr1--sigma28";
  species DNA_plux_utr1_sigma28 in contents = 2.000001/contents; DNA_plux_utr1_sigma28 is "DNA plux--utr1--sigma28";
  species RNAP_DNA_plux_utr1_sigma28 in contents = 0; RNAP_DNA_plux_utr1_sigma28 is "RNAP:DNA plux--utr1--sigma28";
  species AA_2AGTP_Ribo_RNA_utr1_sigma28 in contents = 0; AA_2AGTP_Ribo_RNA_utr1_sigma28 is "AA:2AGTP:Ribo:RNA utr1--sigma28";
  species term_Ribo_RNA_utr1_sigma28 in contents = 0; term_Ribo_RNA_utr1_sigma28 is "term_Ribo:RNA utr1--sigma28";
  species protein_lasR in contents = 0;
  species OC12HSL_protein_lasR in contents = 0; OC12HSL_protein_lasR is "OC12HSL:protein lasR";
  species RNA_utr1_lasR in contents = 0; RNA_utr1_lasR is "RNA utr1--lasR";
  species Ribo_RNA_utr1_lasR in contents = 0; Ribo_RNA_utr1_lasR is "Ribo:RNA utr1--lasR";
  species DNA_plac_utr1_lasR in contents = 0.5000003/contents; DNA_plac_utr1_lasR is "DNA plac--utr1--lasR";
  species RNAP_DNA_plac_utr1_lasR in contents = 0; RNAP_DNA_plac_utr1_lasR is "RNAP:DNA plac--utr1--lasR";
  species CUTP_AGTP_RNAP_DNA_plac_utr1_lasR in contents = 0; CUTP_AGTP_RNAP_DNA_plac_utr1_lasR is "CUTP:AGTP:RNAP:DNA plac--utr1--lasR";
  species term_RNAP_DNA_plac_utr1_lasR in contents = 0; term_RNAP_DNA_plac_utr1_lasR is "term_RNAP:DNA plac--utr1--lasR";
  species AA_2AGTP_Ribo_RNA_utr1_lasR in contents = 0; AA_2AGTP_Ribo_RNA_utr1_lasR is "AA:2AGTP:Ribo:RNA utr1--lasR";
  species term_Ribo_RNA_utr1_lasR in contents = 0; term_Ribo_RNA_utr1_lasR is "term_Ribo:RNA utr1--lasR";
  species protein_luxR in contents = 0;
  species OC6HSL in contents = 0;
  species OC6HSL_protein_luxR in contents = 0; OC6HSL_protein_luxR is "OC6HSL:protein luxR";
  species RNA_utr1_luxR in contents = 0; RNA_utr1_luxR is "RNA utr1--luxR";
  species Ribo_RNA_utr1_luxR in contents = 0; Ribo_RNA_utr1_luxR is "Ribo:RNA utr1--luxR";
  species DNA_plac_utr1_luxR in contents = 2.000001/contents; DNA_plac_utr1_luxR is "DNA plac--utr1--luxR";
  species RNAP_DNA_plac_utr1_luxR in contents = 0; RNAP_DNA_plac_utr1_luxR is "RNAP:DNA plac--utr1--luxR";
  species CUTP_AGTP_RNAP_DNA_plac_utr1_luxR in contents = 0; CUTP_AGTP_RNAP_DNA_plac_utr1_luxR is "CUTP:AGTP:RNAP:DNA plac--utr1--luxR";
  species term_RNAP_DNA_plac_utr1_luxR in contents = 0; term_RNAP_DNA_plac_utr1_luxR is "term_RNAP:DNA plac--utr1--luxR";
  species AA_2AGTP_Ribo_RNA_utr1_luxR in contents = 0; AA_2AGTP_Ribo_RNA_utr1_luxR is "AA:2AGTP:Ribo:RNA utr1--luxR";
  species term_Ribo_RNA_utr1_luxR in contents = 0; term_Ribo_RNA_utr1_luxR is "term_Ribo:RNA utr1--luxR";
  species _2_aTc_protein_tetRdimer in contents = 0; _2_aTc_protein_tetRdimer is "2 aTc:protein tetRdimer";
  species CUTP_AGTP_RNAPSIGX_DNA_psigX_utr1_tetR in contents = 0; CUTP_AGTP_RNAPSIGX_DNA_psigX_utr1_tetR is "CUTP:AGTP:RNAPSIGX:DNA psigX--utr1--tetR";
  species term_RNAPSIGX_DNA_psigX_utr1_tetR in contents = 0; term_RNAPSIGX_DNA_psigX_utr1_tetR is "term_RNAPSIGX:DNA psigX--utr1--tetR";
  species AGTP_RNAPSIGX_DNA_psigX_utr1_tetR in contents = 0; AGTP_RNAPSIGX_DNA_psigX_utr1_tetR is "AGTP:RNAPSIGX:DNA psigX--utr1--tetR";
  species CUTP_RNAPSIGX_DNA_psigX_utr1_tetR in contents = 0; CUTP_RNAPSIGX_DNA_psigX_utr1_tetR is "CUTP:RNAPSIGX:DNA psigX--utr1--tetR";
  species AA_Ribo_RNA_utr1_tetR in contents = 0; AA_Ribo_RNA_utr1_tetR is "AA:Ribo:RNA utr1--tetR";
  species RNA_utr1_tetR_RNase in contents = 0; RNA_utr1_tetR_RNase is "RNA utr1--tetR:RNase";
  species Ribo_RNA_utr1_tetR_RNase in contents = 0; Ribo_RNA_utr1_tetR_RNase is "Ribo:RNA utr1--tetR:RNase";
  species AA_2AGTP_Ribo_RNA_utr1_tetR_RNase in contents = 0; AA_2AGTP_Ribo_RNA_utr1_tetR_RNase is "AA:2AGTP:Ribo:RNA utr1--tetR:RNase";
  species term_Ribo_RNA_utr1_tetR_RNase in contents = 0; term_Ribo_RNA_utr1_tetR_RNase is "term_Ribo:RNA utr1--tetR:RNase";
  species AA_Ribo_RNA_utr1_tetR_RNase in contents = 0; AA_Ribo_RNA_utr1_tetR_RNase is "AA:Ribo:RNA utr1--tetR:RNase";
  species DNA_p28_ptet_utr1_deGFP_protein_tetRdimer in contents = 0; DNA_p28_ptet_utr1_deGFP_protein_tetRdimer is "DNA p28_ptet--utr1--deGFP:protein tetRdimer";
  species AGTP_RNAP28_DNA_p28_ptet_utr1_deGFP in contents = 0; AGTP_RNAP28_DNA_p28_ptet_utr1_deGFP is "AGTP:RNAP28:DNA p28_ptet--utr1--deGFP";
  species CUTP_RNAP28_DNA_p28_ptet_utr1_deGFP in contents = 0; CUTP_RNAP28_DNA_p28_ptet_utr1_deGFP is "CUTP:RNAP28:DNA p28_ptet--utr1--deGFP";
  species AGTP_RNAP28_DNA_p28_ptet_utr1_deGFP_protein_tetRdimer in contents = 0; AGTP_RNAP28_DNA_p28_ptet_utr1_deGFP_protein_tetRdimer is "AGTP:RNAP28:DNA p28_ptet--utr1--deGFP:protein tetRdimer";
  species CUTP_RNAP28_DNA_p28_ptet_utr1_deGFP_protein_tetRdimer in contents = 0; CUTP_RNAP28_DNA_p28_ptet_utr1_deGFP_protein_tetRdimer is "CUTP:RNAP28:DNA p28_ptet--utr1--deGFP:protein tetRdimer";
  species AA_Ribo_RNA_utr1_deGFP in contents = 0; AA_Ribo_RNA_utr1_deGFP is "AA:Ribo:RNA utr1--deGFP";
  species RNA_utr1_deGFP_RNase in contents = 0; RNA_utr1_deGFP_RNase is "RNA utr1--deGFP:RNase";
  species Ribo_RNA_utr1_deGFP_RNase in contents = 0; Ribo_RNA_utr1_deGFP_RNase is "Ribo:RNA utr1--deGFP:RNase";
  species AA_2AGTP_Ribo_RNA_utr1_deGFP_RNase in contents = 0; AA_2AGTP_Ribo_RNA_utr1_deGFP_RNase is "AA:2AGTP:Ribo:RNA utr1--deGFP:RNase";
  species term_Ribo_RNA_utr1_deGFP_RNase in contents = 0; term_Ribo_RNA_utr1_deGFP_RNase is "term_Ribo:RNA utr1--deGFP:RNase";
  species AA_Ribo_RNA_utr1_deGFP_RNase in contents = 0; AA_Ribo_RNA_utr1_deGFP_RNase is "AA:Ribo:RNA utr1--deGFP:RNase";
  species DNA_plas_utr1_sigmaX_OC12HSL_protein_lasR in contents = 0; DNA_plas_utr1_sigmaX_OC12HSL_protein_lasR is "DNA plas--utr1--sigmaX:OC12HSL:protein lasR";
  species RNAP_DNA_plas_utr1_sigmaX_OC12HSL_protein_lasR in contents = 0; RNAP_DNA_plas_utr1_sigmaX_OC12HSL_protein_lasR is "RNAP:DNA plas--utr1--sigmaX:OC12HSL:protein lasR";
  species CUTP_AGTP_RNAP_DNA_plas_utr1_sigmaX in contents = 0; CUTP_AGTP_RNAP_DNA_plas_utr1_sigmaX is "CUTP:AGTP:RNAP:DNA plas--utr1--sigmaX";
  species term_RNAP_DNA_plas_utr1_sigmaX in contents = 0; term_RNAP_DNA_plas_utr1_sigmaX is "term_RNAP:DNA plas--utr1--sigmaX";
  species CUTP_AGTP_RNAP_DNA_plas_utr1_sigmaX_OC12HSL_protein_lasR in contents = 0; CUTP_AGTP_RNAP_DNA_plas_utr1_sigmaX_OC12HSL_protein_lasR is "CUTP:AGTP:RNAP:DNA plas--utr1--sigmaX:OC12HSL:protein lasR";
  species term_RNAP_DNA_plas_utr1_sigmaX_OC12HSL_protein_lasR in contents = 0; term_RNAP_DNA_plas_utr1_sigmaX_OC12HSL_protein_lasR is "term_RNAP:DNA plas--utr1--sigmaX:OC12HSL:protein lasR";
  species AGTP_RNAP_DNA_plas_utr1_sigmaX in contents = 0; AGTP_RNAP_DNA_plas_utr1_sigmaX is "AGTP:RNAP:DNA plas--utr1--sigmaX";
  species CUTP_RNAP_DNA_plas_utr1_sigmaX in contents = 0; CUTP_RNAP_DNA_plas_utr1_sigmaX is "CUTP:RNAP:DNA plas--utr1--sigmaX";
  species AGTP_RNAP_DNA_plas_utr1_sigmaX_OC12HSL_protein_lasR in contents = 0; AGTP_RNAP_DNA_plas_utr1_sigmaX_OC12HSL_protein_lasR is "AGTP:RNAP:DNA plas--utr1--sigmaX:OC12HSL:protein lasR";
  species CUTP_RNAP_DNA_plas_utr1_sigmaX_OC12HSL_protein_lasR in contents = 0; CUTP_RNAP_DNA_plas_utr1_sigmaX_OC12HSL_protein_lasR is "CUTP:RNAP:DNA plas--utr1--sigmaX:OC12HSL:protein lasR";
  species AA_Ribo_RNA_utr1_sigmaX in contents = 0; AA_Ribo_RNA_utr1_sigmaX is "AA:Ribo:RNA utr1--sigmaX";
  species RNA_utr1_sigmaX_RNase in contents = 0; RNA_utr1_sigmaX_RNase is "RNA utr1--sigmaX:RNase";
  species Ribo_RNA_utr1_sigmaX_RNase in contents = 0; Ribo_RNA_utr1_sigmaX_RNase is "Ribo:RNA utr1--sigmaX:RNase";
  species AA_2AGTP_Ribo_RNA_utr1_sigmaX_RNase in contents = 0; AA_2AGTP_Ribo_RNA_utr1_sigmaX_RNase is "AA:2AGTP:Ribo:RNA utr1--sigmaX:RNase";
  species term_Ribo_RNA_utr1_sigmaX_RNase in contents = 0; term_Ribo_RNA_utr1_sigmaX_RNase is "term_Ribo:RNA utr1--sigmaX:RNase";
  species AA_Ribo_RNA_utr1_sigmaX_RNase in contents = 0; AA_Ribo_RNA_utr1_sigmaX_RNase is "AA:Ribo:RNA utr1--sigmaX:RNase";
  species DNA_plux_utr1_sigma28_OC6HSL_protein_luxR in contents = 0; DNA_plux_utr1_sigma28_OC6HSL_protein_luxR is "DNA plux--utr1--sigma28:OC6HSL:protein luxR";
  species RNAP_DNA_plux_utr1_sigma28_OC6HSL_protein_luxR_contents_107 in contents = 0; RNAP_DNA_plux_utr1_sigma28_OC6HSL_protein_luxR_contents_107 is "RNAP:DNA plux--utr1--sigma28:OC6HSL:protein luxR";
  species RNAP_DNA_plux_utr1_sigma28_OC6HSL_protein_luxR_contents_108 in contents = 0; RNAP_DNA_plux_utr1_sigma28_OC6HSL_protein_luxR_contents_108 is "RNAP:DNA plux--utr1--sigma28+OC6HSL:protein luxR";
  species CUTP_AGTP_RNAP_DNA_plux_utr1_sigma28 in contents = 0; CUTP_AGTP_RNAP_DNA_plux_utr1_sigma28 is "CUTP:AGTP:RNAP:DNA plux--utr1--sigma28";
  species term_RNAP_DNA_plux_utr1_sigma28 in contents = 0; term_RNAP_DNA_plux_utr1_sigma28 is "term_RNAP:DNA plux--utr1--sigma28";
  species CUTP_AGTP_RNAP_DNA_plux_utr1_sigma28_OC6HSL_protein_luxR in contents = 0; CUTP_AGTP_RNAP_DNA_plux_utr1_sigma28_OC6HSL_protein_luxR is "CUTP:AGTP:RNAP:DNA plux--utr1--sigma28:OC6HSL:protein luxR";
  species term_RNAP_DNA_plux_utr1_sigma28_OC6HSL_protein_luxR in contents = 0; term_RNAP_DNA_plux_utr1_sigma28_OC6HSL_protein_luxR is "term_RNAP:DNA plux--utr1--sigma28:OC6HSL:protein luxR";
  species AGTP_RNAP_DNA_plux_utr1_sigma28 in contents = 0; AGTP_RNAP_DNA_plux_utr1_sigma28 is "AGTP:RNAP:DNA plux--utr1--sigma28";
  species CUTP_RNAP_DNA_plux_utr1_sigma28 in contents = 0; CUTP_RNAP_DNA_plux_utr1_sigma28 is "CUTP:RNAP:DNA plux--utr1--sigma28";
  species AGTP_RNAP_DNA_plux_utr1_sigma28_OC6HSL_protein_luxR in contents = 0; AGTP_RNAP_DNA_plux_utr1_sigma28_OC6HSL_protein_luxR is "AGTP:RNAP:DNA plux--utr1--sigma28:OC6HSL:protein luxR";
  species CUTP_RNAP_DNA_plux_utr1_sigma28_OC6HSL_protein_luxR in contents = 0; CUTP_RNAP_DNA_plux_utr1_sigma28_OC6HSL_protein_luxR is "CUTP:RNAP:DNA plux--utr1--sigma28:OC6HSL:protein luxR";
  species AA_Ribo_RNA_utr1_sigma28 in contents = 0; AA_Ribo_RNA_utr1_sigma28 is "AA:Ribo:RNA utr1--sigma28";
  species RNA_utr1_sigma28_RNase in contents = 0; RNA_utr1_sigma28_RNase is "RNA utr1--sigma28:RNase";
  species Ribo_RNA_utr1_sigma28_RNase in contents = 0; Ribo_RNA_utr1_sigma28_RNase is "Ribo:RNA utr1--sigma28:RNase";
  species AA_2AGTP_Ribo_RNA_utr1_sigma28_RNase in contents = 0; AA_2AGTP_Ribo_RNA_utr1_sigma28_RNase is "AA:2AGTP:Ribo:RNA utr1--sigma28:RNase";
  species term_Ribo_RNA_utr1_sigma28_RNase in contents = 0; term_Ribo_RNA_utr1_sigma28_RNase is "term_Ribo:RNA utr1--sigma28:RNase";
  species AA_Ribo_RNA_utr1_sigma28_RNase in contents = 0; AA_Ribo_RNA_utr1_sigma28_RNase is "AA:Ribo:RNA utr1--sigma28:RNase";
  species OC12HSL in contents = 0;
  species AGTP_RNAP_DNA_plac_utr1_lasR in contents = 0; AGTP_RNAP_DNA_plac_utr1_lasR is "AGTP:RNAP:DNA plac--utr1--lasR";
  species CUTP_RNAP_DNA_plac_utr1_lasR in contents = 0; CUTP_RNAP_DNA_plac_utr1_lasR is "CUTP:RNAP:DNA plac--utr1--lasR";
  species AA_Ribo_RNA_utr1_lasR in contents = 0; AA_Ribo_RNA_utr1_lasR is "AA:Ribo:RNA utr1--lasR";
  species RNA_utr1_lasR_RNase in contents = 0; RNA_utr1_lasR_RNase is "RNA utr1--lasR:RNase";
  species Ribo_RNA_utr1_lasR_RNase in contents = 0; Ribo_RNA_utr1_lasR_RNase is "Ribo:RNA utr1--lasR:RNase";
  species AA_2AGTP_Ribo_RNA_utr1_lasR_RNase in contents = 0; AA_2AGTP_Ribo_RNA_utr1_lasR_RNase is "AA:2AGTP:Ribo:RNA utr1--lasR:RNase";
  species term_Ribo_RNA_utr1_lasR_RNase in contents = 0; term_Ribo_RNA_utr1_lasR_RNase is "term_Ribo:RNA utr1--lasR:RNase";
  species AA_Ribo_RNA_utr1_lasR_RNase in contents = 0; AA_Ribo_RNA_utr1_lasR_RNase is "AA:Ribo:RNA utr1--lasR:RNase";
  species AGTP_RNAP_DNA_plac_utr1_luxR in contents = 0; AGTP_RNAP_DNA_plac_utr1_luxR is "AGTP:RNAP:DNA plac--utr1--luxR";
  species CUTP_RNAP_DNA_plac_utr1_luxR in contents = 0; CUTP_RNAP_DNA_plac_utr1_luxR is "CUTP:RNAP:DNA plac--utr1--luxR";
  species AA_Ribo_RNA_utr1_luxR in contents = 0; AA_Ribo_RNA_utr1_luxR is "AA:Ribo:RNA utr1--luxR";
  species RNA_utr1_luxR_RNase in contents = 0; RNA_utr1_luxR_RNase is "RNA utr1--luxR:RNase";
  species Ribo_RNA_utr1_luxR_RNase in contents = 0; Ribo_RNA_utr1_luxR_RNase is "Ribo:RNA utr1--luxR:RNase";
  species AA_2AGTP_Ribo_RNA_utr1_luxR_RNase in contents = 0; AA_2AGTP_Ribo_RNA_utr1_luxR_RNase is "AA:2AGTP:Ribo:RNA utr1--luxR:RNase";
  species term_Ribo_RNA_utr1_luxR_RNase in contents = 0; term_Ribo_RNA_utr1_luxR_RNase is "term_Ribo:RNA utr1--luxR:RNase";
  species AA_Ribo_RNA_utr1_luxR_RNase in contents = 0; AA_Ribo_RNA_utr1_luxR_RNase is "AA:Ribo:RNA utr1--luxR:RNase";
  species AGTP_USED in contents = 0;

  // Parameters:
  AGTPdeg_F = 0;

  // Reactions:
  reaction_142: protein_tetRdimer + 2 aTc -> _2_aTc_protein_tetRdimer; TXTL_INDUCER_TETR_ATC_F*protein_tetRdimer*aTc^2 - TXTL_INDUCER_TETR_ATC_R*_2_aTc_protein_tetRdimer;
    TXTL_INDUCER_TETR_ATC_F = 1e-5; TXTL_INDUCER_TETR_ATC_R = 0.1;
  reaction_143: 2 protein_tetR -> protein_tetRdimer; reaction_143_kf*protein_tetR^2 - reaction_143_kr*protein_tetRdimer;
    reaction_143_kf = 1; reaction_143_kr = 1;
  reaction_144: RNA_utr1_tetR + Ribo -> Ribo_RNA_utr1_tetR; reaction_144_TXTL_UTR_UTR1_F*RNA_utr1_tetR*Ribo - reaction_144_TXTL_UTR_UTR1_R*Ribo_RNA_utr1_tetR;
    reaction_144_TXTL_UTR_UTR1_F = 0.2; reaction_144_TXTL_UTR_UTR1_R = 4;
  reaction_145: DNA_psigX_utr1_tetR + RNAPSIGX -> RNAPSIGX_DNA_psigX_utr1_tetR; TXTL_SIGX_RNAPbound_F*DNA_psigX_utr1_tetR*RNAPSIGX - TXTL_SIGX_RNAPbound_R*RNAPSIGX_DNA_psigX_utr1_tetR;
    TXTL_SIGX_RNAPbound_F = 10; TXTL_SIGX_RNAPbound_R = 0.1;
  reaction_146: CUTP_AGTP_RNAPSIGX_DNA_psigX_utr1_tetR => RNAPSIGX_DNA_psigX_utr1_tetR; reaction_146_TXTL_NTP_consumption*CUTP_AGTP_RNAPSIGX_DNA_psigX_utr1_tetR;
    reaction_146_TXTL_NTP_consumption = 0.7487705;
  reaction_147: term_RNAPSIGX_DNA_psigX_utr1_tetR => RNAPSIGX + DNA_psigX_utr1_tetR; reaction_147_TXTL_RNAPBOUND_TERMINATION_RATE*term_RNAPSIGX_DNA_psigX_utr1_tetR;
    reaction_147_TXTL_RNAPBOUND_TERMINATION_RATE = 0.05;
  reaction_148: RNAPSIGX_DNA_psigX_utr1_tetR + AGTP -> AGTP_RNAPSIGX_DNA_psigX_utr1_tetR; reaction_148_TXTL_NTP_RNAP_F*RNAPSIGX_DNA_psigX_utr1_tetR*AGTP - reaction_148_TXTL_NTP_RNAP_R*AGTP_RNAPSIGX_DNA_psigX_utr1_tetR;
    reaction_148_TXTL_NTP_RNAP_F = 1000; reaction_148_TXTL_NTP_RNAP_R = 120000000;
  reaction_149: RNAPSIGX_DNA_psigX_utr1_tetR + CUTP -> CUTP_RNAPSIGX_DNA_psigX_utr1_tetR; reaction_149_TXTL_NTP_RNAP_F*RNAPSIGX_DNA_psigX_utr1_tetR*CUTP - reaction_149_TXTL_NTP_RNAP_R*CUTP_RNAPSIGX_DNA_psigX_utr1_tetR;
    reaction_149_TXTL_NTP_RNAP_F = 1000; reaction_149_TXTL_NTP_RNAP_R = 120000000;
  reaction_150: AGTP_RNAPSIGX_DNA_psigX_utr1_tetR + CUTP -> CUTP_AGTP_RNAPSIGX_DNA_psigX_utr1_tetR; reaction_150_TXTL_NTP_RNAP_F*AGTP_RNAPSIGX_DNA_psigX_utr1_tetR*CUTP - reaction_150_TXTL_NTP_RNAP_R*CUTP_AGTP_RNAPSIGX_DNA_psigX_utr1_tetR;
    reaction_150_TXTL_NTP_RNAP_F = 1; reaction_150_TXTL_NTP_RNAP_R = 120000;
  reaction_151: CUTP_RNAPSIGX_DNA_psigX_utr1_tetR + AGTP -> CUTP_AGTP_RNAPSIGX_DNA_psigX_utr1_tetR; reaction_151_TXTL_NTP_RNAP_F*CUTP_RNAPSIGX_DNA_psigX_utr1_tetR*AGTP - reaction_151_TXTL_NTP_RNAP_R*CUTP_AGTP_RNAPSIGX_DNA_psigX_utr1_tetR;
    reaction_151_TXTL_NTP_RNAP_F = 1; reaction_151_TXTL_NTP_RNAP_R = 120000;
  reaction_152: CUTP_AGTP_RNAPSIGX_DNA_psigX_utr1_tetR => term_RNAPSIGX_DNA_psigX_utr1_tetR + RNA_utr1_tetR; reaction_152_TXTL_transcription_rate1*CUTP_AGTP_RNAPSIGX_DNA_psigX_utr1_tetR;
    reaction_152_TXTL_transcription_rate1 = 0.001229508;
  reaction_153: Ribo_RNA_utr1_tetR + AA -> AA_Ribo_RNA_utr1_tetR; reaction_153_TL_AA_F*Ribo_RNA_utr1_tetR*AA - reaction_153_TL_AA_R*AA_Ribo_RNA_utr1_tetR;
    reaction_153_TL_AA_F = 300; reaction_153_TL_AA_R = 0.1;
  reaction_154: AA_Ribo_RNA_utr1_tetR + 2 AGTP -> AA_2AGTP_Ribo_RNA_utr1_tetR; reaction_154_TL_AGTP_F*AA_Ribo_RNA_utr1_tetR*AGTP^2 - reaction_154_TL_AGTP_R*AA_2AGTP_Ribo_RNA_utr1_tetR;
    reaction_154_TL_AGTP_F = 30; reaction_154_TL_AGTP_R = 10;
  reaction_155: AA_2AGTP_Ribo_RNA_utr1_tetR => term_Ribo_RNA_utr1_tetR; reaction_155_TXTL_TL_AA_consumption*AA_2AGTP_Ribo_RNA_utr1_tetR;
    reaction_155_TXTL_TL_AA_consumption = 0.03;
  reaction_156: AA_2AGTP_Ribo_RNA_utr1_tetR => term_Ribo_RNA_utr1_tetR + protein_tetR; reaction_156_TXTL_TL_rate*AA_2AGTP_Ribo_RNA_utr1_tetR;
    reaction_156_TXTL_TL_rate = 0.01;
  reaction_157: term_Ribo_RNA_utr1_tetR => RNA_utr1_tetR + Ribo; reaction_157_TXTL_RIBOBOUND_TERMINATION_RATE*term_Ribo_RNA_utr1_tetR;
    reaction_157_TXTL_RIBOBOUND_TERMINATION_RATE = 50;
  reaction_158: RNA_utr1_tetR + RNase -> RNA_utr1_tetR_RNase; reaction_158_TXTL_RNAdeg_F*RNA_utr1_tetR*RNase - reaction_158_TXTL_RNAdeg_R*RNA_utr1_tetR_RNase;
    reaction_158_TXTL_RNAdeg_F = 10; reaction_158_TXTL_RNAdeg_R = 2000;
  reaction_159: RNA_utr1_tetR_RNase => RNase; reaction_159_TXTL_RNAdeg_F*RNA_utr1_tetR_RNase;
    reaction_159_TXTL_RNAdeg_F = 0.002777778;
  reaction_160: Ribo_RNA_utr1_tetR + RNase -> Ribo_RNA_utr1_tetR_RNase; reaction_160_TXTL_RNAdeg_F*Ribo_RNA_utr1_tetR*RNase - reaction_160_TXTL_RNAdeg_R*Ribo_RNA_utr1_tetR_RNase;
    reaction_160_TXTL_RNAdeg_F = 10; reaction_160_TXTL_RNAdeg_R = 2000;
  reaction_161: Ribo_RNA_utr1_tetR_RNase => RNase + Ribo; reaction_161_TXTL_RNAdeg_F*Ribo_RNA_utr1_tetR_RNase;
    reaction_161_TXTL_RNAdeg_F = 0.002777778;
  reaction_162: AA_2AGTP_Ribo_RNA_utr1_tetR + RNase -> AA_2AGTP_Ribo_RNA_utr1_tetR_RNase; reaction_162_TXTL_RNAdeg_F*AA_2AGTP_Ribo_RNA_utr1_tetR*RNase - reaction_162_TXTL_RNAdeg_R*AA_2AGTP_Ribo_RNA_utr1_tetR_RNase;
    reaction_162_TXTL_RNAdeg_F = 10; reaction_162_TXTL_RNAdeg_R = 2000;
  reaction_163: AA_2AGTP_Ribo_RNA_utr1_tetR_RNase => RNase + AA + 2 AGTP + Ribo; reaction_163_TXTL_RNAdeg_F*AA_2AGTP_Ribo_RNA_utr1_tetR_RNase;
    reaction_163_TXTL_RNAdeg_F = 0.002777778;
  reaction_164: term_Ribo_RNA_utr1_tetR + RNase -> term_Ribo_RNA_utr1_tetR_RNase; reaction_164_TXTL_RNAdeg_F*term_Ribo_RNA_utr1_tetR*RNase - reaction_164_TXTL_RNAdeg_R*term_Ribo_RNA_utr1_tetR_RNase;
    reaction_164_TXTL_RNAdeg_F = 10; reaction_164_TXTL_RNAdeg_R = 2000;
  reaction_165: term_Ribo_RNA_utr1_tetR_RNase => RNase + Ribo; reaction_165_TXTL_RNAdeg_F*term_Ribo_RNA_utr1_tetR_RNase;
    reaction_165_TXTL_RNAdeg_F = 0.002777778;
  reaction_166: AA_Ribo_RNA_utr1_tetR + RNase -> AA_Ribo_RNA_utr1_tetR_RNase; reaction_166_TXTL_RNAdeg_F*AA_Ribo_RNA_utr1_tetR*RNase - reaction_166_TXTL_RNAdeg_R*AA_Ribo_RNA_utr1_tetR_RNase;
    reaction_166_TXTL_RNAdeg_F = 10; reaction_166_TXTL_RNAdeg_R = 2000;
  reaction_167: AA_Ribo_RNA_utr1_tetR_RNase => RNase + AA + Ribo; reaction_167_TXTL_RNAdeg_F*AA_Ribo_RNA_utr1_tetR_RNase;
    reaction_167_TXTL_RNAdeg_F = 0.002777778;
  reaction_168: protein_deGFP_contents_19 => protein_deGFP_contents_20; TXTL_PROT_deGFP_MATURATION*protein_deGFP_contents_19;
    TXTL_PROT_deGFP_MATURATION = 0.002310491;
  reaction_169: RNA_utr1_deGFP + Ribo -> Ribo_RNA_utr1_deGFP; reaction_169_TXTL_UTR_UTR1_F*RNA_utr1_deGFP*Ribo - reaction_169_TXTL_UTR_UTR1_R*Ribo_RNA_utr1_deGFP;
    reaction_169_TXTL_UTR_UTR1_F = 0.2; reaction_169_TXTL_UTR_UTR1_R = 4;
  reaction_170: DNA_p28_ptet_utr1_deGFP + RNAP28 -> RNAP28_DNA_p28_ptet_utr1_deGFP; TXTL_PTET_RNAPbound_F*DNA_p28_ptet_utr1_deGFP*RNAP28 - TXTL_PTET_RNAPbound_R*RNAP28_DNA_p28_ptet_utr1_deGFP;
    TXTL_PTET_RNAPbound_F = 0.006; TXTL_PTET_RNAPbound_R = 5;
  reaction_171: DNA_p28_ptet_utr1_deGFP + protein_tetRdimer -> DNA_p28_ptet_utr1_deGFP_protein_tetRdimer; reaction_171_kf*DNA_p28_ptet_utr1_deGFP*protein_tetRdimer - reaction_171_kr*DNA_p28_ptet_utr1_deGFP_protein_tetRdimer;
    reaction_171_kf = 0.00286; reaction_171_kr = 1.1e-5;
  reaction_172: RNAP28_DNA_p28_ptet_utr1_deGFP + protein_tetRdimer -> RNAP28_DNA_p28_ptet_utr1_deGFP_protein_tetRdimer; reaction_172_kf*RNAP28_DNA_p28_ptet_utr1_deGFP*protein_tetRdimer - reaction_172_kr*RNAP28_DNA_p28_ptet_utr1_deGFP_protein_tetRdimer;
    reaction_172_kf = 0.00286; reaction_172_kr = 1.1e-5;
  reaction_173: DNA_p28_ptet_utr1_deGFP_protein_tetRdimer + RNAP28 -> RNAP28_DNA_p28_ptet_utr1_deGFP_protein_tetRdimer; reaction_173_kf*DNA_p28_ptet_utr1_deGFP_protein_tetRdimer*RNAP28 - reaction_173_kr*RNAP28_DNA_p28_ptet_utr1_deGFP_protein_tetRdimer;
    reaction_173_kf = 0.006; reaction_173_kr = 5000;
  reaction_174: CUTP_AGTP_RNAP28_DNA_p28_ptet_utr1_deGFP => RNAP28_DNA_p28_ptet_utr1_deGFP; reaction_174_TXTL_NTP_consumption*CUTP_AGTP_RNAP28_DNA_p28_ptet_utr1_deGFP;
    reaction_174_TXTL_NTP_consumption = 0.7485294;
  reaction_175: term_RNAP28_DNA_p28_ptet_utr1_deGFP => RNAP28 + DNA_p28_ptet_utr1_deGFP; reaction_175_TXTL_RNAPBOUND_TERMINATION_RATE*term_RNAP28_DNA_p28_ptet_utr1_deGFP;
    reaction_175_TXTL_RNAPBOUND_TERMINATION_RATE = 0.05;
  reaction_176: RNAP28_DNA_p28_ptet_utr1_deGFP + AGTP -> AGTP_RNAP28_DNA_p28_ptet_utr1_deGFP; reaction_176_TXTL_NTP_RNAP_F*RNAP28_DNA_p28_ptet_utr1_deGFP*AGTP - reaction_176_TXTL_NTP_RNAP_R*AGTP_RNAP28_DNA_p28_ptet_utr1_deGFP;
    reaction_176_TXTL_NTP_RNAP_F = 1000; reaction_176_TXTL_NTP_RNAP_R = 120000000;
  reaction_177: RNAP28_DNA_p28_ptet_utr1_deGFP + CUTP -> CUTP_RNAP28_DNA_p28_ptet_utr1_deGFP; reaction_177_TXTL_NTP_RNAP_F*RNAP28_DNA_p28_ptet_utr1_deGFP*CUTP - reaction_177_TXTL_NTP_RNAP_R*CUTP_RNAP28_DNA_p28_ptet_utr1_deGFP;
    reaction_177_TXTL_NTP_RNAP_F = 1000; reaction_177_TXTL_NTP_RNAP_R = 120000000;
  reaction_178: AGTP_RNAP28_DNA_p28_ptet_utr1_deGFP + CUTP -> CUTP_AGTP_RNAP28_DNA_p28_ptet_utr1_deGFP; reaction_178_TXTL_NTP_RNAP_F*AGTP_RNAP28_DNA_p28_ptet_utr1_deGFP*CUTP - reaction_178_TXTL_NTP_RNAP_R*CUTP_AGTP_RNAP28_DNA_p28_ptet_utr1_deGFP;
    reaction_178_TXTL_NTP_RNAP_F = 1; reaction_178_TXTL_NTP_RNAP_R = 120000;
  reaction_179: CUTP_RNAP28_DNA_p28_ptet_utr1_deGFP + AGTP -> CUTP_AGTP_RNAP28_DNA_p28_ptet_utr1_deGFP; reaction_179_TXTL_NTP_RNAP_F*CUTP_RNAP28_DNA_p28_ptet_utr1_deGFP*AGTP - reaction_179_TXTL_NTP_RNAP_R*CUTP_AGTP_RNAP28_DNA_p28_ptet_utr1_deGFP;
    reaction_179_TXTL_NTP_RNAP_F = 1; reaction_179_TXTL_NTP_RNAP_R = 120000;
  reaction_180: CUTP_AGTP_RNAP28_DNA_p28_ptet_utr1_deGFP => term_RNAP28_DNA_p28_ptet_utr1_deGFP + RNA_utr1_deGFP; reaction_180_TXTL_transcription_rate1*CUTP_AGTP_RNAP28_DNA_p28_ptet_utr1_deGFP;
    reaction_180_TXTL_transcription_rate1 = 0.001470588;
  reaction_181: CUTP_AGTP_RNAP28_DNA_p28_ptet_utr1_deGFP_protein_tetRdimer => RNAP28_DNA_p28_ptet_utr1_deGFP_protein_tetRdimer; reaction_181_TXTL_NTP_consumption*CUTP_AGTP_RNAP28_DNA_p28_ptet_utr1_deGFP_protein_tetRdimer;
    reaction_181_TXTL_NTP_consumption = 0.7485294;
  reaction_182: term_RNAP28_DNA_p28_ptet_utr1_deGFP_protein_tetRdimer => RNAP28 + DNA_p28_ptet_utr1_deGFP + protein_tetRdimer; reaction_182_TXTL_RNAPBOUND_TERMINATION_RATE*term_RNAP28_DNA_p28_ptet_utr1_deGFP_protein_tetRdimer;
    reaction_182_TXTL_RNAPBOUND_TERMINATION_RATE = 0.05;
  reaction_183: RNAP28_DNA_p28_ptet_utr1_deGFP_protein_tetRdimer + AGTP -> AGTP_RNAP28_DNA_p28_ptet_utr1_deGFP_protein_tetRdimer; reaction_183_TXTL_NTP_RNAP_F*RNAP28_DNA_p28_ptet_utr1_deGFP_protein_tetRdimer*AGTP - reaction_183_TXTL_NTP_RNAP_R*AGTP_RNAP28_DNA_p28_ptet_utr1_deGFP_protein_tetRdimer;
    reaction_183_TXTL_NTP_RNAP_F = 1000; reaction_183_TXTL_NTP_RNAP_R = 120000000;
  reaction_184: RNAP28_DNA_p28_ptet_utr1_deGFP_protein_tetRdimer + CUTP -> CUTP_RNAP28_DNA_p28_ptet_utr1_deGFP_protein_tetRdimer; reaction_184_TXTL_NTP_RNAP_F*RNAP28_DNA_p28_ptet_utr1_deGFP_protein_tetRdimer*CUTP - reaction_184_TXTL_NTP_RNAP_R*CUTP_RNAP28_DNA_p28_ptet_utr1_deGFP_protein_tetRdimer;
    reaction_184_TXTL_NTP_RNAP_F = 1000; reaction_184_TXTL_NTP_RNAP_R = 120000000;
  reaction_185: AGTP_RNAP28_DNA_p28_ptet_utr1_deGFP_protein_tetRdimer + CUTP -> CUTP_AGTP_RNAP28_DNA_p28_ptet_utr1_deGFP_protein_tetRdimer; reaction_185_TXTL_NTP_RNAP_F*AGTP_RNAP28_DNA_p28_ptet_utr1_deGFP_protein_tetRdimer*CUTP - reaction_185_TXTL_NTP_RNAP_R*CUTP_AGTP_RNAP28_DNA_p28_ptet_utr1_deGFP_protein_tetRdimer;
    reaction_185_TXTL_NTP_RNAP_F = 1; reaction_185_TXTL_NTP_RNAP_R = 120000;
  reaction_186: CUTP_RNAP28_DNA_p28_ptet_utr1_deGFP_protein_tetRdimer + AGTP -> CUTP_AGTP_RNAP28_DNA_p28_ptet_utr1_deGFP_protein_tetRdimer; reaction_186_TXTL_NTP_RNAP_F*CUTP_RNAP28_DNA_p28_ptet_utr1_deGFP_protein_tetRdimer*AGTP - reaction_186_TXTL_NTP_RNAP_R*CUTP_AGTP_RNAP28_DNA_p28_ptet_utr1_deGFP_protein_tetRdimer;
    reaction_186_TXTL_NTP_RNAP_F = 1; reaction_186_TXTL_NTP_RNAP_R = 120000;
  reaction_187: CUTP_AGTP_RNAP28_DNA_p28_ptet_utr1_deGFP_protein_tetRdimer => term_RNAP28_DNA_p28_ptet_utr1_deGFP_protein_tetRdimer + RNA_utr1_deGFP; reaction_187_TXTL_transcription_rate1*CUTP_AGTP_RNAP28_DNA_p28_ptet_utr1_deGFP_protein_tetRdimer;
    reaction_187_TXTL_transcription_rate1 = 0.001470588;
  reaction_188: Ribo_RNA_utr1_deGFP + AA -> AA_Ribo_RNA_utr1_deGFP; reaction_188_TL_AA_F*Ribo_RNA_utr1_deGFP*AA - reaction_188_TL_AA_R*AA_Ribo_RNA_utr1_deGFP;
    reaction_188_TL_AA_F = 300; reaction_188_TL_AA_R = 0.1;
  reaction_189: AA_Ribo_RNA_utr1_deGFP + 2 AGTP -> AA_2AGTP_Ribo_RNA_utr1_deGFP; reaction_189_TL_AGTP_F*AA_Ribo_RNA_utr1_deGFP*AGTP^2 - reaction_189_TL_AGTP_R*AA_2AGTP_Ribo_RNA_utr1_deGFP;
    reaction_189_TL_AGTP_F = 30; reaction_189_TL_AGTP_R = 10;
  reaction_190: AA_2AGTP_Ribo_RNA_utr1_deGFP => term_Ribo_RNA_utr1_deGFP; reaction_190_TXTL_TL_AA_consumption*AA_2AGTP_Ribo_RNA_utr1_deGFP;
    reaction_190_TXTL_TL_AA_consumption = 0.024;
  reaction_191: AA_2AGTP_Ribo_RNA_utr1_deGFP => term_Ribo_RNA_utr1_deGFP + protein_deGFP_contents_19; reaction_191_TXTL_TL_rate*AA_2AGTP_Ribo_RNA_utr1_deGFP;
    reaction_191_TXTL_TL_rate = 0.012;
  reaction_192: term_Ribo_RNA_utr1_deGFP => RNA_utr1_deGFP + Ribo; reaction_192_TXTL_RIBOBOUND_TERMINATION_RATE*term_Ribo_RNA_utr1_deGFP;
    reaction_192_TXTL_RIBOBOUND_TERMINATION_RATE = 50;
  reaction_193: RNA_utr1_deGFP + RNase -> RNA_utr1_deGFP_RNase; reaction_193_TXTL_RNAdeg_F*RNA_utr1_deGFP*RNase - reaction_193_TXTL_RNAdeg_R*RNA_utr1_deGFP_RNase;
    reaction_193_TXTL_RNAdeg_F = 10; reaction_193_TXTL_RNAdeg_R = 2000;
  reaction_194: RNA_utr1_deGFP_RNase => RNase; reaction_194_TXTL_RNAdeg_F*RNA_utr1_deGFP_RNase;
    reaction_194_TXTL_RNAdeg_F = 0.002777778;
  reaction_195: Ribo_RNA_utr1_deGFP + RNase -> Ribo_RNA_utr1_deGFP_RNase; reaction_195_TXTL_RNAdeg_F*Ribo_RNA_utr1_deGFP*RNase - reaction_195_TXTL_RNAdeg_R*Ribo_RNA_utr1_deGFP_RNase;
    reaction_195_TXTL_RNAdeg_F = 10; reaction_195_TXTL_RNAdeg_R = 2000;
  reaction_196: Ribo_RNA_utr1_deGFP_RNase => RNase + Ribo; reaction_196_TXTL_RNAdeg_F*Ribo_RNA_utr1_deGFP_RNase;
    reaction_196_TXTL_RNAdeg_F = 0.002777778;
  reaction_197: AA_2AGTP_Ribo_RNA_utr1_deGFP + RNase -> AA_2AGTP_Ribo_RNA_utr1_deGFP_RNase; reaction_197_TXTL_RNAdeg_F*AA_2AGTP_Ribo_RNA_utr1_deGFP*RNase - reaction_197_TXTL_RNAdeg_R*AA_2AGTP_Ribo_RNA_utr1_deGFP_RNase;
    reaction_197_TXTL_RNAdeg_F = 10; reaction_197_TXTL_RNAdeg_R = 2000;
  reaction_198: AA_2AGTP_Ribo_RNA_utr1_deGFP_RNase => RNase + AA + 2 AGTP + Ribo; reaction_198_TXTL_RNAdeg_F*AA_2AGTP_Ribo_RNA_utr1_deGFP_RNase;
    reaction_198_TXTL_RNAdeg_F = 0.002777778;
  reaction_199: term_Ribo_RNA_utr1_deGFP + RNase -> term_Ribo_RNA_utr1_deGFP_RNase; reaction_199_TXTL_RNAdeg_F*term_Ribo_RNA_utr1_deGFP*RNase - reaction_199_TXTL_RNAdeg_R*term_Ribo_RNA_utr1_deGFP_RNase;
    reaction_199_TXTL_RNAdeg_F = 10; reaction_199_TXTL_RNAdeg_R = 2000;
  reaction_200: term_Ribo_RNA_utr1_deGFP_RNase => RNase + Ribo; reaction_200_TXTL_RNAdeg_F*term_Ribo_RNA_utr1_deGFP_RNase;
    reaction_200_TXTL_RNAdeg_F = 0.002777778;
  reaction_201: AA_Ribo_RNA_utr1_deGFP + RNase -> AA_Ribo_RNA_utr1_deGFP_RNase; reaction_201_TXTL_RNAdeg_F*AA_Ribo_RNA_utr1_deGFP*RNase - reaction_201_TXTL_RNAdeg_R*AA_Ribo_RNA_utr1_deGFP_RNase;
    reaction_201_TXTL_RNAdeg_F = 10; reaction_201_TXTL_RNAdeg_R = 2000;
  reaction_202: AA_Ribo_RNA_utr1_deGFP_RNase => RNase + AA + Ribo; reaction_202_TXTL_RNAdeg_F*AA_Ribo_RNA_utr1_deGFP_RNase;
    reaction_202_TXTL_RNAdeg_F = 0.002777778;
  reaction_203: RNAP + protein_sigmaX -> RNAPSIGX; SigmaX_RNAP_F*RNAP*protein_sigmaX - SigmaX_RNAP_R*RNAPSIGX;
    SigmaX_RNAP_F = 100; SigmaX_RNAP_R = 0.1;
  reaction_204: RNA_utr1_sigmaX + Ribo -> Ribo_RNA_utr1_sigmaX; reaction_204_TXTL_UTR_UTR1_F*RNA_utr1_sigmaX*Ribo - reaction_204_TXTL_UTR_UTR1_R*Ribo_RNA_utr1_sigmaX;
    reaction_204_TXTL_UTR_UTR1_F = 0.2; reaction_204_TXTL_UTR_UTR1_R = 4;
  reaction_205: DNA_plas_utr1_sigmaX + RNAP -> RNAP_DNA_plas_utr1_sigmaX; TXTL_PLAS_RNAPbound_F*DNA_plas_utr1_sigmaX*RNAP - TXTL_PLAS_RNAPbound_R*RNAP_DNA_plas_utr1_sigmaX;
    TXTL_PLAS_RNAPbound_F = 0.001; TXTL_PLAS_RNAPbound_R = 10;
  reaction_206: DNA_plas_utr1_sigmaX + OC12HSL_protein_lasR -> DNA_plas_utr1_sigmaX_OC12HSL_protein_lasR; reaction_206_TXTL_PLAS_TFBIND_F*DNA_plas_utr1_sigmaX*OC12HSL_protein_lasR - reaction_206_TXTL_PLAS_TFBIND_R*DNA_plas_utr1_sigmaX_OC12HSL_protein_lasR;
    reaction_206_TXTL_PLAS_TFBIND_F = 1; reaction_206_TXTL_PLAS_TFBIND_R = 0.02;
  reaction_207: DNA_plas_utr1_sigmaX_OC12HSL_protein_lasR + RNAP -> RNAP_DNA_plas_utr1_sigmaX_OC12HSL_protein_lasR; TXTL_PLAS_TFRNAPbound_F*DNA_plas_utr1_sigmaX_OC12HSL_protein_lasR*RNAP - TXTL_PLAS_TFRNAPbound_R*RNAP_DNA_plas_utr1_sigmaX_OC12HSL_protein_lasR;
    TXTL_PLAS_TFRNAPbound_F = 20; TXTL_PLAS_TFRNAPbound_R = 400;
  reaction_208: RNAP_DNA_plas_utr1_sigmaX + OC12HSL_protein_lasR -> RNAP_DNA_plas_utr1_sigmaX_OC12HSL_protein_lasR; reaction_208_TXTL_PLAS_TFBIND_F*RNAP_DNA_plas_utr1_sigmaX*OC12HSL_protein_lasR - reaction_208_TXTL_PLAS_TFBIND_R*RNAP_DNA_plas_utr1_sigmaX_OC12HSL_protein_lasR;
    reaction_208_TXTL_PLAS_TFBIND_F = 1; reaction_208_TXTL_PLAS_TFBIND_R = 0.02;
  reaction_209: CUTP_AGTP_RNAP_DNA_plas_utr1_sigmaX => RNAP_DNA_plas_utr1_sigmaX; reaction_209_TXTL_NTP_consumption*CUTP_AGTP_RNAP_DNA_plas_utr1_sigmaX;
    reaction_209_TXTL_NTP_consumption = 0.7485294;
  reaction_210: term_RNAP_DNA_plas_utr1_sigmaX => RNAP + DNA_plas_utr1_sigmaX; reaction_210_TXTL_RNAPBOUND_TERMINATION_RATE*term_RNAP_DNA_plas_utr1_sigmaX;
    reaction_210_TXTL_RNAPBOUND_TERMINATION_RATE = 0.05;
  reaction_211: RNAP_DNA_plas_utr1_sigmaX + AGTP -> AGTP_RNAP_DNA_plas_utr1_sigmaX; reaction_211_TXTL_NTP_RNAP_F*RNAP_DNA_plas_utr1_sigmaX*AGTP - reaction_211_TXTL_NTP_RNAP_R*AGTP_RNAP_DNA_plas_utr1_sigmaX;
    reaction_211_TXTL_NTP_RNAP_F = 1000; reaction_211_TXTL_NTP_RNAP_R = 120000000;
  reaction_212: RNAP_DNA_plas_utr1_sigmaX + CUTP -> CUTP_RNAP_DNA_plas_utr1_sigmaX; reaction_212_TXTL_NTP_RNAP_F*RNAP_DNA_plas_utr1_sigmaX*CUTP - reaction_212_TXTL_NTP_RNAP_R*CUTP_RNAP_DNA_plas_utr1_sigmaX;
    reaction_212_TXTL_NTP_RNAP_F = 1000; reaction_212_TXTL_NTP_RNAP_R = 120000000;
  reaction_213: AGTP_RNAP_DNA_plas_utr1_sigmaX + CUTP -> CUTP_AGTP_RNAP_DNA_plas_utr1_sigmaX; reaction_213_TXTL_NTP_RNAP_F*AGTP_RNAP_DNA_plas_utr1_sigmaX*CUTP - reaction_213_TXTL_NTP_RNAP_R*CUTP_AGTP_RNAP_DNA_plas_utr1_sigmaX;
    reaction_213_TXTL_NTP_RNAP_F = 1; reaction_213_TXTL_NTP_RNAP_R = 120000;
  reaction_214: CUTP_RNAP_DNA_plas_utr1_sigmaX + AGTP -> CUTP_AGTP_RNAP_DNA_plas_utr1_sigmaX; reaction_214_TXTL_NTP_RNAP_F*CUTP_RNAP_DNA_plas_utr1_sigmaX*AGTP - reaction_214_TXTL_NTP_RNAP_R*CUTP_AGTP_RNAP_DNA_plas_utr1_sigmaX;
    reaction_214_TXTL_NTP_RNAP_F = 1; reaction_214_TXTL_NTP_RNAP_R = 120000;
  reaction_215: CUTP_AGTP_RNAP_DNA_plas_utr1_sigmaX => term_RNAP_DNA_plas_utr1_sigmaX + RNA_utr1_sigmaX; reaction_215_TXTL_transcription_rate1*CUTP_AGTP_RNAP_DNA_plas_utr1_sigmaX;
    reaction_215_TXTL_transcription_rate1 = 0.001470588;
  reaction_216: CUTP_AGTP_RNAP_DNA_plas_utr1_sigmaX_OC12HSL_protein_lasR => RNAP_DNA_plas_utr1_sigmaX_OC12HSL_protein_lasR; reaction_216_TXTL_NTP_consumption*CUTP_AGTP_RNAP_DNA_plas_utr1_sigmaX_OC12HSL_protein_lasR;
    reaction_216_TXTL_NTP_consumption = 0.7485294;
  reaction_217: term_RNAP_DNA_plas_utr1_sigmaX_OC12HSL_protein_lasR => RNAP + DNA_plas_utr1_sigmaX + OC12HSL_protein_lasR; reaction_217_TXTL_RNAPBOUND_TERMINATION_RATE*term_RNAP_DNA_plas_utr1_sigmaX_OC12HSL_protein_lasR;
    reaction_217_TXTL_RNAPBOUND_TERMINATION_RATE = 0.05;
  reaction_218: RNAP_DNA_plas_utr1_sigmaX_OC12HSL_protein_lasR + AGTP -> AGTP_RNAP_DNA_plas_utr1_sigmaX_OC12HSL_protein_lasR; reaction_218_TXTL_NTP_RNAP_F*RNAP_DNA_plas_utr1_sigmaX_OC12HSL_protein_lasR*AGTP - reaction_218_TXTL_NTP_RNAP_R*AGTP_RNAP_DNA_plas_utr1_sigmaX_OC12HSL_protein_lasR;
    reaction_218_TXTL_NTP_RNAP_F = 1000; reaction_218_TXTL_NTP_RNAP_R = 120000000;
  reaction_219: RNAP_DNA_plas_utr1_sigmaX_OC12HSL_protein_lasR + CUTP -> CUTP_RNAP_DNA_plas_utr1_sigmaX_OC12HSL_protein_lasR; reaction_219_TXTL_NTP_RNAP_F*RNAP_DNA_plas_utr1_sigmaX_OC12HSL_protein_lasR*CUTP - reaction_219_TXTL_NTP_RNAP_R*CUTP_RNAP_DNA_plas_utr1_sigmaX_OC12HSL_protein_lasR;
    reaction_219_TXTL_NTP_RNAP_F = 1000; reaction_219_TXTL_NTP_RNAP_R = 120000000;
  reaction_220: AGTP_RNAP_DNA_plas_utr1_sigmaX_OC12HSL_protein_lasR + CUTP -> CUTP_AGTP_RNAP_DNA_plas_utr1_sigmaX_OC12HSL_protein_lasR; reaction_220_TXTL_NTP_RNAP_F*AGTP_RNAP_DNA_plas_utr1_sigmaX_OC12HSL_protein_lasR*CUTP - reaction_220_TXTL_NTP_RNAP_R*CUTP_AGTP_RNAP_DNA_plas_utr1_sigmaX_OC12HSL_protein_lasR;
    reaction_220_TXTL_NTP_RNAP_F = 1; reaction_220_TXTL_NTP_RNAP_R = 120000;
  reaction_221: CUTP_RNAP_DNA_plas_utr1_sigmaX_OC12HSL_protein_lasR + AGTP -> CUTP_AGTP_RNAP_DNA_plas_utr1_sigmaX_OC12HSL_protein_lasR; reaction_221_TXTL_NTP_RNAP_F*CUTP_RNAP_DNA_plas_utr1_sigmaX_OC12HSL_protein_lasR*AGTP - reaction_221_TXTL_NTP_RNAP_R*CUTP_AGTP_RNAP_DNA_plas_utr1_sigmaX_OC12HSL_protein_lasR;
    reaction_221_TXTL_NTP_RNAP_F = 1; reaction_221_TXTL_NTP_RNAP_R = 120000;
  reaction_222: CUTP_AGTP_RNAP_DNA_plas_utr1_sigmaX_OC12HSL_protein_lasR => term_RNAP_DNA_plas_utr1_sigmaX_OC12HSL_protein_lasR + RNA_utr1_sigmaX; reaction_222_TXTL_transcription_rate1*CUTP_AGTP_RNAP_DNA_plas_utr1_sigmaX_OC12HSL_protein_lasR;
    reaction_222_TXTL_transcription_rate1 = 0.001470588;
  reaction_223: Ribo_RNA_utr1_sigmaX + AA -> AA_Ribo_RNA_utr1_sigmaX; reaction_223_TL_AA_F*Ribo_RNA_utr1_sigmaX*AA - reaction_223_TL_AA_R*AA_Ribo_RNA_utr1_sigmaX;
    reaction_223_TL_AA_F = 300; reaction_223_TL_AA_R = 0.1;
  reaction_224: AA_Ribo_RNA_utr1_sigmaX + 2 AGTP -> AA_2AGTP_Ribo_RNA_utr1_sigmaX; reaction_224_TL_AGTP_F*AA_Ribo_RNA_utr1_sigmaX*AGTP^2 - reaction_224_TL_AGTP_R*AA_2AGTP_Ribo_RNA_utr1_sigmaX;
    reaction_224_TL_AGTP_F = 30; reaction_224_TL_AGTP_R = 10;
  reaction_225: AA_2AGTP_Ribo_RNA_utr1_sigmaX => term_Ribo_RNA_utr1_sigmaX; reaction_225_TXTL_TL_AA_consumption*AA_2AGTP_Ribo_RNA_utr1_sigmaX;
    reaction_225_TXTL_TL_AA_consumption = 0.024;
  reaction_226: AA_2AGTP_Ribo_RNA_utr1_sigmaX => term_Ribo_RNA_utr1_sigmaX + protein_sigmaX; reaction_226_TXTL_TL_rate*AA_2AGTP_Ribo_RNA_utr1_sigmaX;
    reaction_226_TXTL_TL_rate = 0.012;
  reaction_227: term_Ribo_RNA_utr1_sigmaX => RNA_utr1_sigmaX + Ribo; reaction_227_TXTL_RIBOBOUND_TERMINATION_RATE*term_Ribo_RNA_utr1_sigmaX;
    reaction_227_TXTL_RIBOBOUND_TERMINATION_RATE = 50;
  reaction_228: RNA_utr1_sigmaX + RNase -> RNA_utr1_sigmaX_RNase; reaction_228_TXTL_RNAdeg_F*RNA_utr1_sigmaX*RNase - reaction_228_TXTL_RNAdeg_R*RNA_utr1_sigmaX_RNase;
    reaction_228_TXTL_RNAdeg_F = 10; reaction_228_TXTL_RNAdeg_R = 2000;
  reaction_229: RNA_utr1_sigmaX_RNase => RNase; reaction_229_TXTL_RNAdeg_F*RNA_utr1_sigmaX_RNase;
    reaction_229_TXTL_RNAdeg_F = 0.002777778;
  reaction_230: Ribo_RNA_utr1_sigmaX + RNase -> Ribo_RNA_utr1_sigmaX_RNase; reaction_230_TXTL_RNAdeg_F*Ribo_RNA_utr1_sigmaX*RNase - reaction_230_TXTL_RNAdeg_R*Ribo_RNA_utr1_sigmaX_RNase;
    reaction_230_TXTL_RNAdeg_F = 10; reaction_230_TXTL_RNAdeg_R = 2000;
  reaction_231: Ribo_RNA_utr1_sigmaX_RNase => RNase + Ribo; reaction_231_TXTL_RNAdeg_F*Ribo_RNA_utr1_sigmaX_RNase;
    reaction_231_TXTL_RNAdeg_F = 0.002777778;
  reaction_232: AA_2AGTP_Ribo_RNA_utr1_sigmaX + RNase -> AA_2AGTP_Ribo_RNA_utr1_sigmaX_RNase; reaction_232_TXTL_RNAdeg_F*AA_2AGTP_Ribo_RNA_utr1_sigmaX*RNase - reaction_232_TXTL_RNAdeg_R*AA_2AGTP_Ribo_RNA_utr1_sigmaX_RNase;
    reaction_232_TXTL_RNAdeg_F = 10; reaction_232_TXTL_RNAdeg_R = 2000;
  reaction_233: AA_2AGTP_Ribo_RNA_utr1_sigmaX_RNase => RNase + AA + 2 AGTP + Ribo; reaction_233_TXTL_RNAdeg_F*AA_2AGTP_Ribo_RNA_utr1_sigmaX_RNase;
    reaction_233_TXTL_RNAdeg_F = 0.002777778;
  reaction_234: term_Ribo_RNA_utr1_sigmaX + RNase -> term_Ribo_RNA_utr1_sigmaX_RNase; reaction_234_TXTL_RNAdeg_F*term_Ribo_RNA_utr1_sigmaX*RNase - reaction_234_TXTL_RNAdeg_R*term_Ribo_RNA_utr1_sigmaX_RNase;
    reaction_234_TXTL_RNAdeg_F = 10; reaction_234_TXTL_RNAdeg_R = 2000;
  reaction_235: term_Ribo_RNA_utr1_sigmaX_RNase => RNase + Ribo; reaction_235_TXTL_RNAdeg_F*term_Ribo_RNA_utr1_sigmaX_RNase;
    reaction_235_TXTL_RNAdeg_F = 0.002777778;
  reaction_236: AA_Ribo_RNA_utr1_sigmaX + RNase -> AA_Ribo_RNA_utr1_sigmaX_RNase; reaction_236_TXTL_RNAdeg_F*AA_Ribo_RNA_utr1_sigmaX*RNase - reaction_236_TXTL_RNAdeg_R*AA_Ribo_RNA_utr1_sigmaX_RNase;
    reaction_236_TXTL_RNAdeg_F = 10; reaction_236_TXTL_RNAdeg_R = 2000;
  reaction_237: AA_Ribo_RNA_utr1_sigmaX_RNase => RNase + AA + Ribo; reaction_237_TXTL_RNAdeg_F*AA_Ribo_RNA_utr1_sigmaX_RNase;
    reaction_237_TXTL_RNAdeg_F = 0.002777778;
  reaction_238: RNAP + protein_sigma28 -> RNAP28; Sigma28_RNAP_F*RNAP*protein_sigma28 - Sigma28_RNAP_R*RNAP28;
    Sigma28_RNAP_F = 100; Sigma28_RNAP_R = 0.1;
  reaction_239: RNA_utr1_sigma28 + Ribo -> Ribo_RNA_utr1_sigma28; reaction_239_TXTL_UTR_UTR1_F*RNA_utr1_sigma28*Ribo - reaction_239_TXTL_UTR_UTR1_R*Ribo_RNA_utr1_sigma28;
    reaction_239_TXTL_UTR_UTR1_F = 0.2; reaction_239_TXTL_UTR_UTR1_R = 4;
  reaction_240: DNA_plux_utr1_sigma28 + RNAP -> RNAP_DNA_plux_utr1_sigma28; TXTL_PLUX_RNAPbound_F*DNA_plux_utr1_sigma28*RNAP - TXTL_PLUX_RNAPbound_R*RNAP_DNA_plux_utr1_sigma28;
    TXTL_PLUX_RNAPbound_F = 0.006; TXTL_PLUX_RNAPbound_R = 5;
  reaction_241: DNA_plux_utr1_sigma28 + OC6HSL_protein_luxR -> DNA_plux_utr1_sigma28_OC6HSL_protein_luxR; reaction_241_TXTL_PLUX_TFBIND_F*DNA_plux_utr1_sigma28*OC6HSL_protein_luxR - reaction_241_TXTL_PLUX_TFBIND_R*DNA_plux_utr1_sigma28_OC6HSL_protein_luxR;
    reaction_241_TXTL_PLUX_TFBIND_F = 0.00286; reaction_241_TXTL_PLUX_TFBIND_R = 1.1e-5;
  reaction_242: DNA_plux_utr1_sigma28_OC6HSL_protein_luxR + RNAP -> RNAP_DNA_plux_utr1_sigma28_OC6HSL_protein_luxR_contents_107; TXTL_PLUX_TFRNAPbound_F*DNA_plux_utr1_sigma28_OC6HSL_protein_luxR*RNAP - TXTL_PLUX_TFRNAPbound_R*RNAP_DNA_plux_utr1_sigma28_OC6HSL_protein_luxR_contents_107;
    TXTL_PLUX_TFRNAPbound_F = 0.3; TXTL_PLUX_TFRNAPbound_R = 5;
  reaction_243: RNAP_DNA_plux_utr1_sigma28_OC6HSL_protein_luxR_contents_108 -> RNAP_DNA_plux_utr1_sigma28_OC6HSL_protein_luxR_contents_107; reaction_243_TXTL_PLUX_TFBIND_F*RNAP_DNA_plux_utr1_sigma28_OC6HSL_protein_luxR_contents_108 - reaction_243_TXTL_PLUX_TFBIND_R*RNAP_DNA_plux_utr1_sigma28_OC6HSL_protein_luxR_contents_107;
    reaction_243_TXTL_PLUX_TFBIND_F = 0.00286; reaction_243_TXTL_PLUX_TFBIND_R = 1.1e-5;
  reaction_244: CUTP_AGTP_RNAP_DNA_plux_utr1_sigma28 => RNAP_DNA_plux_utr1_sigma28; reaction_244_TXTL_NTP_consumption*CUTP_AGTP_RNAP_DNA_plux_utr1_sigma28;
    reaction_244_TXTL_NTP_consumption = 0.7487705;
  reaction_245: term_RNAP_DNA_plux_utr1_sigma28 => RNAP + DNA_plux_utr1_sigma28; reaction_245_TXTL_RNAPBOUND_TERMINATION_RATE*term_RNAP_DNA_plux_utr1_sigma28;
    reaction_245_TXTL_RNAPBOUND_TERMINATION_RATE = 0.05;
  reaction_246: RNAP_DNA_plux_utr1_sigma28 + AGTP -> AGTP_RNAP_DNA_plux_utr1_sigma28; reaction_246_TXTL_NTP_RNAP_F*RNAP_DNA_plux_utr1_sigma28*AGTP - reaction_246_TXTL_NTP_RNAP_R*AGTP_RNAP_DNA_plux_utr1_sigma28;
    reaction_246_TXTL_NTP_RNAP_F = 1000; reaction_246_TXTL_NTP_RNAP_R = 120000000;
  reaction_247: RNAP_DNA_plux_utr1_sigma28 + CUTP -> CUTP_RNAP_DNA_plux_utr1_sigma28; reaction_247_TXTL_NTP_RNAP_F*RNAP_DNA_plux_utr1_sigma28*CUTP - reaction_247_TXTL_NTP_RNAP_R*CUTP_RNAP_DNA_plux_utr1_sigma28;
    reaction_247_TXTL_NTP_RNAP_F = 1000; reaction_247_TXTL_NTP_RNAP_R = 120000000;
  reaction_248: AGTP_RNAP_DNA_plux_utr1_sigma28 + CUTP -> CUTP_AGTP_RNAP_DNA_plux_utr1_sigma28; reaction_248_TXTL_NTP_RNAP_F*AGTP_RNAP_DNA_plux_utr1_sigma28*CUTP - reaction_248_TXTL_NTP_RNAP_R*CUTP_AGTP_RNAP_DNA_plux_utr1_sigma28;
    reaction_248_TXTL_NTP_RNAP_F = 1; reaction_248_TXTL_NTP_RNAP_R = 120000;
  reaction_249: CUTP_RNAP_DNA_plux_utr1_sigma28 + AGTP -> CUTP_AGTP_RNAP_DNA_plux_utr1_sigma28; reaction_249_TXTL_NTP_RNAP_F*CUTP_RNAP_DNA_plux_utr1_sigma28*AGTP - reaction_249_TXTL_NTP_RNAP_R*CUTP_AGTP_RNAP_DNA_plux_utr1_sigma28;
    reaction_249_TXTL_NTP_RNAP_F = 1; reaction_249_TXTL_NTP_RNAP_R = 120000;
  reaction_250: CUTP_AGTP_RNAP_DNA_plux_utr1_sigma28 => term_RNAP_DNA_plux_utr1_sigma28 + RNA_utr1_sigma28; reaction_250_TXTL_transcription_rate1*CUTP_AGTP_RNAP_DNA_plux_utr1_sigma28;
    reaction_250_TXTL_transcription_rate1 = 0.001229508;
  reaction_251: CUTP_AGTP_RNAP_DNA_plux_utr1_sigma28_OC6HSL_protein_luxR => RNAP_DNA_plux_utr1_sigma28_OC6HSL_protein_luxR_contents_107; reaction_251_TXTL_NTP_consumption*CUTP_AGTP_RNAP_DNA_plux_utr1_sigma28_OC6HSL_protein_luxR;
    reaction_251_TXTL_NTP_consumption = 0.7487705;
  reaction_252: term_RNAP_DNA_plux_utr1_sigma28_OC6HSL_protein_luxR => RNAP + DNA_plux_utr1_sigma28 + OC6HSL_protein_luxR; reaction_252_TXTL_RNAPBOUND_TERMINATION_RATE*term_RNAP_DNA_plux_utr1_sigma28_OC6HSL_protein_luxR;
    reaction_252_TXTL_RNAPBOUND_TERMINATION_RATE = 0.05;
  reaction_253: RNAP_DNA_plux_utr1_sigma28_OC6HSL_protein_luxR_contents_107 + AGTP -> AGTP_RNAP_DNA_plux_utr1_sigma28_OC6HSL_protein_luxR; reaction_253_TXTL_NTP_RNAP_F*RNAP_DNA_plux_utr1_sigma28_OC6HSL_protein_luxR_contents_107*AGTP - reaction_253_TXTL_NTP_RNAP_R*AGTP_RNAP_DNA_plux_utr1_sigma28_OC6HSL_protein_luxR;
    reaction_253_TXTL_NTP_RNAP_F = 1000; reaction_253_TXTL_NTP_RNAP_R = 120000000;
  reaction_254: RNAP_DNA_plux_utr1_sigma28_OC6HSL_protein_luxR_contents_107 + CUTP -> CUTP_RNAP_DNA_plux_utr1_sigma28_OC6HSL_protein_luxR; reaction_254_TXTL_NTP_RNAP_F*RNAP_DNA_plux_utr1_sigma28_OC6HSL_protein_luxR_contents_107*CUTP - reaction_254_TXTL_NTP_RNAP_R*CUTP_RNAP_DNA_plux_utr1_sigma28_OC6HSL_protein_luxR;
    reaction_254_TXTL_NTP_RNAP_F = 1000; reaction_254_TXTL_NTP_RNAP_R = 120000000;
  reaction_255: AGTP_RNAP_DNA_plux_utr1_sigma28_OC6HSL_protein_luxR + CUTP -> CUTP_AGTP_RNAP_DNA_plux_utr1_sigma28_OC6HSL_protein_luxR; reaction_255_TXTL_NTP_RNAP_F*AGTP_RNAP_DNA_plux_utr1_sigma28_OC6HSL_protein_luxR*CUTP - reaction_255_TXTL_NTP_RNAP_R*CUTP_AGTP_RNAP_DNA_plux_utr1_sigma28_OC6HSL_protein_luxR;
    reaction_255_TXTL_NTP_RNAP_F = 1; reaction_255_TXTL_NTP_RNAP_R = 120000;
  reaction_256: CUTP_RNAP_DNA_plux_utr1_sigma28_OC6HSL_protein_luxR + AGTP -> CUTP_AGTP_RNAP_DNA_plux_utr1_sigma28_OC6HSL_protein_luxR; reaction_256_TXTL_NTP_RNAP_F*CUTP_RNAP_DNA_plux_utr1_sigma28_OC6HSL_protein_luxR*AGTP - reaction_256_TXTL_NTP_RNAP_R*CUTP_AGTP_RNAP_DNA_plux_utr1_sigma28_OC6HSL_protein_luxR;
    reaction_256_TXTL_NTP_RNAP_F = 1; reaction_256_TXTL_NTP_RNAP_R = 120000;
  reaction_257: CUTP_AGTP_RNAP_DNA_plux_utr1_sigma28_OC6HSL_protein_luxR => term_RNAP_DNA_plux_utr1_sigma28_OC6HSL_protein_luxR + RNA_utr1_sigma28; reaction_257_TXTL_transcription_rate1*CUTP_AGTP_RNAP_DNA_plux_utr1_sigma28_OC6HSL_protein_luxR;
    reaction_257_TXTL_transcription_rate1 = 0.001229508;
  reaction_258: Ribo_RNA_utr1_sigma28 + AA -> AA_Ribo_RNA_utr1_sigma28; reaction_258_TL_AA_F*Ribo_RNA_utr1_sigma28*AA - reaction_258_TL_AA_R*AA_Ribo_RNA_utr1_sigma28;
    reaction_258_TL_AA_F = 300; reaction_258_TL_AA_R = 0.1;
  reaction_259: AA_Ribo_RNA_utr1_sigma28 + 2 AGTP -> AA_2AGTP_Ribo_RNA_utr1_sigma28; reaction_259_TL_AGTP_F*AA_Ribo_RNA_utr1_sigma28*AGTP^2 - reaction_259_TL_AGTP_R*AA_2AGTP_Ribo_RNA_utr1_sigma28;
    reaction_259_TL_AGTP_F = 30; reaction_259_TL_AGTP_R = 10;
  reaction_260: AA_2AGTP_Ribo_RNA_utr1_sigma28 => term_Ribo_RNA_utr1_sigma28; reaction_260_TXTL_TL_AA_consumption*AA_2AGTP_Ribo_RNA_utr1_sigma28;
    reaction_260_TXTL_TL_AA_consumption = 0.03;
  reaction_261: AA_2AGTP_Ribo_RNA_utr1_sigma28 => term_Ribo_RNA_utr1_sigma28 + protein_sigma28; reaction_261_TXTL_TL_rate*AA_2AGTP_Ribo_RNA_utr1_sigma28;
    reaction_261_TXTL_TL_rate = 0.01;
  reaction_262: term_Ribo_RNA_utr1_sigma28 => RNA_utr1_sigma28 + Ribo; reaction_262_TXTL_RIBOBOUND_TERMINATION_RATE*term_Ribo_RNA_utr1_sigma28;
    reaction_262_TXTL_RIBOBOUND_TERMINATION_RATE = 50;
  reaction_263: RNA_utr1_sigma28 + RNase -> RNA_utr1_sigma28_RNase; reaction_263_TXTL_RNAdeg_F*RNA_utr1_sigma28*RNase - reaction_263_TXTL_RNAdeg_R*RNA_utr1_sigma28_RNase;
    reaction_263_TXTL_RNAdeg_F = 10; reaction_263_TXTL_RNAdeg_R = 2000;
  reaction_264: RNA_utr1_sigma28_RNase => RNase; reaction_264_TXTL_RNAdeg_F*RNA_utr1_sigma28_RNase;
    reaction_264_TXTL_RNAdeg_F = 0.002777778;
  reaction_265: Ribo_RNA_utr1_sigma28 + RNase -> Ribo_RNA_utr1_sigma28_RNase; reaction_265_TXTL_RNAdeg_F*Ribo_RNA_utr1_sigma28*RNase - reaction_265_TXTL_RNAdeg_R*Ribo_RNA_utr1_sigma28_RNase;
    reaction_265_TXTL_RNAdeg_F = 10; reaction_265_TXTL_RNAdeg_R = 2000;
  reaction_266: Ribo_RNA_utr1_sigma28_RNase => RNase + Ribo; reaction_266_TXTL_RNAdeg_F*Ribo_RNA_utr1_sigma28_RNase;
    reaction_266_TXTL_RNAdeg_F = 0.002777778;
  reaction_267: AA_2AGTP_Ribo_RNA_utr1_sigma28 + RNase -> AA_2AGTP_Ribo_RNA_utr1_sigma28_RNase; reaction_267_TXTL_RNAdeg_F*AA_2AGTP_Ribo_RNA_utr1_sigma28*RNase - reaction_267_TXTL_RNAdeg_R*AA_2AGTP_Ribo_RNA_utr1_sigma28_RNase;
    reaction_267_TXTL_RNAdeg_F = 10; reaction_267_TXTL_RNAdeg_R = 2000;
  reaction_268: AA_2AGTP_Ribo_RNA_utr1_sigma28_RNase => RNase + AA + 2 AGTP + Ribo; reaction_268_TXTL_RNAdeg_F*AA_2AGTP_Ribo_RNA_utr1_sigma28_RNase;
    reaction_268_TXTL_RNAdeg_F = 0.002777778;
  reaction_269: term_Ribo_RNA_utr1_sigma28 + RNase -> term_Ribo_RNA_utr1_sigma28_RNase; reaction_269_TXTL_RNAdeg_F*term_Ribo_RNA_utr1_sigma28*RNase - reaction_269_TXTL_RNAdeg_R*term_Ribo_RNA_utr1_sigma28_RNase;
    reaction_269_TXTL_RNAdeg_F = 10; reaction_269_TXTL_RNAdeg_R = 2000;
  reaction_270: term_Ribo_RNA_utr1_sigma28_RNase => RNase + Ribo; reaction_270_TXTL_RNAdeg_F*term_Ribo_RNA_utr1_sigma28_RNase;
    reaction_270_TXTL_RNAdeg_F = 0.002777778;
  reaction_271: AA_Ribo_RNA_utr1_sigma28 + RNase -> AA_Ribo_RNA_utr1_sigma28_RNase; reaction_271_TXTL_RNAdeg_F*AA_Ribo_RNA_utr1_sigma28*RNase - reaction_271_TXTL_RNAdeg_R*AA_Ribo_RNA_utr1_sigma28_RNase;
    reaction_271_TXTL_RNAdeg_F = 10; reaction_271_TXTL_RNAdeg_R = 2000;
  reaction_272: AA_Ribo_RNA_utr1_sigma28_RNase => RNase + AA + Ribo; reaction_272_TXTL_RNAdeg_F*AA_Ribo_RNA_utr1_sigma28_RNase;
    reaction_272_TXTL_RNAdeg_F = 0.002777778;
  reaction_273: protein_lasR + OC12HSL -> OC12HSL_protein_lasR; reaction_273_TXTL_INDUCER_LUXR_AHL_F*protein_lasR*OC12HSL - reaction_273_TXTL_INDUCER_LUXR_AHL_R*OC12HSL_protein_lasR;
    reaction_273_TXTL_INDUCER_LUXR_AHL_F = 0.2; reaction_273_TXTL_INDUCER_LUXR_AHL_R = 0.05;
  reaction_274: RNA_utr1_lasR + Ribo -> Ribo_RNA_utr1_lasR; reaction_274_TXTL_UTR_UTR1_F*RNA_utr1_lasR*Ribo - reaction_274_TXTL_UTR_UTR1_R*Ribo_RNA_utr1_lasR;
    reaction_274_TXTL_UTR_UTR1_F = 0.2; reaction_274_TXTL_UTR_UTR1_R = 4;
  reaction_275: DNA_plac_utr1_lasR + RNAP -> RNAP_DNA_plac_utr1_lasR; reaction_275_TXTL_PLAC_RNAPbound_F*DNA_plac_utr1_lasR*RNAP - reaction_275_TXTL_PLAC_RNAPbound_R*RNAP_DNA_plac_utr1_lasR;
    reaction_275_TXTL_PLAC_RNAPbound_F = 20; reaction_275_TXTL_PLAC_RNAPbound_R = 400;
  reaction_276: CUTP_AGTP_RNAP_DNA_plac_utr1_lasR => RNAP_DNA_plac_utr1_lasR; reaction_276_TXTL_NTP_consumption*CUTP_AGTP_RNAP_DNA_plac_utr1_lasR;
    reaction_276_TXTL_NTP_consumption = 0.7485294;
  reaction_277: term_RNAP_DNA_plac_utr1_lasR => RNAP + DNA_plac_utr1_lasR; reaction_277_TXTL_RNAPBOUND_TERMINATION_RATE*term_RNAP_DNA_plac_utr1_lasR;
    reaction_277_TXTL_RNAPBOUND_TERMINATION_RATE = 0.05;
  reaction_278: RNAP_DNA_plac_utr1_lasR + AGTP -> AGTP_RNAP_DNA_plac_utr1_lasR; reaction_278_TXTL_NTP_RNAP_F*RNAP_DNA_plac_utr1_lasR*AGTP - reaction_278_TXTL_NTP_RNAP_R*AGTP_RNAP_DNA_plac_utr1_lasR;
    reaction_278_TXTL_NTP_RNAP_F = 1000; reaction_278_TXTL_NTP_RNAP_R = 120000000;
  reaction_279: RNAP_DNA_plac_utr1_lasR + CUTP -> CUTP_RNAP_DNA_plac_utr1_lasR; reaction_279_TXTL_NTP_RNAP_F*RNAP_DNA_plac_utr1_lasR*CUTP - reaction_279_TXTL_NTP_RNAP_R*CUTP_RNAP_DNA_plac_utr1_lasR;
    reaction_279_TXTL_NTP_RNAP_F = 1000; reaction_279_TXTL_NTP_RNAP_R = 120000000;
  reaction_280: AGTP_RNAP_DNA_plac_utr1_lasR + CUTP -> CUTP_AGTP_RNAP_DNA_plac_utr1_lasR; reaction_280_TXTL_NTP_RNAP_F*AGTP_RNAP_DNA_plac_utr1_lasR*CUTP - reaction_280_TXTL_NTP_RNAP_R*CUTP_AGTP_RNAP_DNA_plac_utr1_lasR;
    reaction_280_TXTL_NTP_RNAP_F = 1; reaction_280_TXTL_NTP_RNAP_R = 120000;
  reaction_281: CUTP_RNAP_DNA_plac_utr1_lasR + AGTP -> CUTP_AGTP_RNAP_DNA_plac_utr1_lasR; reaction_281_TXTL_NTP_RNAP_F*CUTP_RNAP_DNA_plac_utr1_lasR*AGTP - reaction_281_TXTL_NTP_RNAP_R*CUTP_AGTP_RNAP_DNA_plac_utr1_lasR;
    reaction_281_TXTL_NTP_RNAP_F = 1; reaction_281_TXTL_NTP_RNAP_R = 120000;
  reaction_282: CUTP_AGTP_RNAP_DNA_plac_utr1_lasR => term_RNAP_DNA_plac_utr1_lasR + RNA_utr1_lasR; reaction_282_TXTL_transcription_rate1*CUTP_AGTP_RNAP_DNA_plac_utr1_lasR;
    reaction_282_TXTL_transcription_rate1 = 0.001470588;
  reaction_283: Ribo_RNA_utr1_lasR + AA -> AA_Ribo_RNA_utr1_lasR; reaction_283_TL_AA_F*Ribo_RNA_utr1_lasR*AA - reaction_283_TL_AA_R*AA_Ribo_RNA_utr1_lasR;
    reaction_283_TL_AA_F = 300; reaction_283_TL_AA_R = 0.1;
  reaction_284: AA_Ribo_RNA_utr1_lasR + 2 AGTP -> AA_2AGTP_Ribo_RNA_utr1_lasR; reaction_284_TL_AGTP_F*AA_Ribo_RNA_utr1_lasR*AGTP^2 - reaction_284_TL_AGTP_R*AA_2AGTP_Ribo_RNA_utr1_lasR;
    reaction_284_TL_AGTP_F = 30; reaction_284_TL_AGTP_R = 10;
  reaction_285: AA_2AGTP_Ribo_RNA_utr1_lasR => term_Ribo_RNA_utr1_lasR; reaction_285_TXTL_TL_AA_consumption*AA_2AGTP_Ribo_RNA_utr1_lasR;
    reaction_285_TXTL_TL_AA_consumption = 0.024;
  reaction_286: AA_2AGTP_Ribo_RNA_utr1_lasR => term_Ribo_RNA_utr1_lasR + protein_lasR; reaction_286_TXTL_TL_rate*AA_2AGTP_Ribo_RNA_utr1_lasR;
    reaction_286_TXTL_TL_rate = 0.012;
  reaction_287: term_Ribo_RNA_utr1_lasR => RNA_utr1_lasR + Ribo; reaction_287_TXTL_RIBOBOUND_TERMINATION_RATE*term_Ribo_RNA_utr1_lasR;
    reaction_287_TXTL_RIBOBOUND_TERMINATION_RATE = 50;
  reaction_288: RNA_utr1_lasR + RNase -> RNA_utr1_lasR_RNase; reaction_288_TXTL_RNAdeg_F*RNA_utr1_lasR*RNase - reaction_288_TXTL_RNAdeg_R*RNA_utr1_lasR_RNase;
    reaction_288_TXTL_RNAdeg_F = 10; reaction_288_TXTL_RNAdeg_R = 2000;
  reaction_289: RNA_utr1_lasR_RNase => RNase; reaction_289_TXTL_RNAdeg_F*RNA_utr1_lasR_RNase;
    reaction_289_TXTL_RNAdeg_F = 0.002777778;
  reaction_290: Ribo_RNA_utr1_lasR + RNase -> Ribo_RNA_utr1_lasR_RNase; reaction_290_TXTL_RNAdeg_F*Ribo_RNA_utr1_lasR*RNase - reaction_290_TXTL_RNAdeg_R*Ribo_RNA_utr1_lasR_RNase;
    reaction_290_TXTL_RNAdeg_F = 10; reaction_290_TXTL_RNAdeg_R = 2000;
  reaction_291: Ribo_RNA_utr1_lasR_RNase => RNase + Ribo; reaction_291_TXTL_RNAdeg_F*Ribo_RNA_utr1_lasR_RNase;
    reaction_291_TXTL_RNAdeg_F = 0.002777778;
  reaction_292: AA_2AGTP_Ribo_RNA_utr1_lasR + RNase -> AA_2AGTP_Ribo_RNA_utr1_lasR_RNase; reaction_292_TXTL_RNAdeg_F*AA_2AGTP_Ribo_RNA_utr1_lasR*RNase - reaction_292_TXTL_RNAdeg_R*AA_2AGTP_Ribo_RNA_utr1_lasR_RNase;
    reaction_292_TXTL_RNAdeg_F = 10; reaction_292_TXTL_RNAdeg_R = 2000;
  reaction_293: AA_2AGTP_Ribo_RNA_utr1_lasR_RNase => RNase + AA + 2 AGTP + Ribo; reaction_293_TXTL_RNAdeg_F*AA_2AGTP_Ribo_RNA_utr1_lasR_RNase;
    reaction_293_TXTL_RNAdeg_F = 0.002777778;
  reaction_294: term_Ribo_RNA_utr1_lasR + RNase -> term_Ribo_RNA_utr1_lasR_RNase; reaction_294_TXTL_RNAdeg_F*term_Ribo_RNA_utr1_lasR*RNase - reaction_294_TXTL_RNAdeg_R*term_Ribo_RNA_utr1_lasR_RNase;
    reaction_294_TXTL_RNAdeg_F = 10; reaction_294_TXTL_RNAdeg_R = 2000;
  reaction_295: term_Ribo_RNA_utr1_lasR_RNase => RNase + Ribo; reaction_295_TXTL_RNAdeg_F*term_Ribo_RNA_utr1_lasR_RNase;
    reaction_295_TXTL_RNAdeg_F = 0.002777778;
  reaction_296: AA_Ribo_RNA_utr1_lasR + RNase -> AA_Ribo_RNA_utr1_lasR_RNase; reaction_296_TXTL_RNAdeg_F*AA_Ribo_RNA_utr1_lasR*RNase - reaction_296_TXTL_RNAdeg_R*AA_Ribo_RNA_utr1_lasR_RNase;
    reaction_296_TXTL_RNAdeg_F = 10; reaction_296_TXTL_RNAdeg_R = 2000;
  reaction_297: AA_Ribo_RNA_utr1_lasR_RNase => RNase + AA + Ribo; reaction_297_TXTL_RNAdeg_F*AA_Ribo_RNA_utr1_lasR_RNase;
    reaction_297_TXTL_RNAdeg_F = 0.002777778;
  reaction_298: protein_luxR + OC6HSL -> OC6HSL_protein_luxR; reaction_298_TXTL_INDUCER_LUXR_AHL_F*protein_luxR*OC6HSL - reaction_298_TXTL_INDUCER_LUXR_AHL_R*OC6HSL_protein_luxR;
    reaction_298_TXTL_INDUCER_LUXR_AHL_F = 0.002; reaction_298_TXTL_INDUCER_LUXR_AHL_R = 0.001;
  reaction_299: RNA_utr1_luxR + Ribo -> Ribo_RNA_utr1_luxR; reaction_299_TXTL_UTR_UTR1_F*RNA_utr1_luxR*Ribo - reaction_299_TXTL_UTR_UTR1_R*Ribo_RNA_utr1_luxR;
    reaction_299_TXTL_UTR_UTR1_F = 0.2; reaction_299_TXTL_UTR_UTR1_R = 4;
  reaction_300: DNA_plac_utr1_luxR + RNAP -> RNAP_DNA_plac_utr1_luxR; reaction_300_TXTL_PLAC_RNAPbound_F*DNA_plac_utr1_luxR*RNAP - reaction_300_TXTL_PLAC_RNAPbound_R*RNAP_DNA_plac_utr1_luxR;
    reaction_300_TXTL_PLAC_RNAPbound_F = 20; reaction_300_TXTL_PLAC_RNAPbound_R = 400;
  reaction_301: CUTP_AGTP_RNAP_DNA_plac_utr1_luxR => RNAP_DNA_plac_utr1_luxR; reaction_301_TXTL_NTP_consumption*CUTP_AGTP_RNAP_DNA_plac_utr1_luxR;
    reaction_301_TXTL_NTP_consumption = 0.7487705;
  reaction_302: term_RNAP_DNA_plac_utr1_luxR => RNAP + DNA_plac_utr1_luxR; reaction_302_TXTL_RNAPBOUND_TERMINATION_RATE*term_RNAP_DNA_plac_utr1_luxR;
    reaction_302_TXTL_RNAPBOUND_TERMINATION_RATE = 0.05;
  reaction_303: RNAP_DNA_plac_utr1_luxR + AGTP -> AGTP_RNAP_DNA_plac_utr1_luxR; reaction_303_TXTL_NTP_RNAP_F*RNAP_DNA_plac_utr1_luxR*AGTP - reaction_303_TXTL_NTP_RNAP_R*AGTP_RNAP_DNA_plac_utr1_luxR;
    reaction_303_TXTL_NTP_RNAP_F = 1000; reaction_303_TXTL_NTP_RNAP_R = 120000000;
  reaction_304: RNAP_DNA_plac_utr1_luxR + CUTP -> CUTP_RNAP_DNA_plac_utr1_luxR; reaction_304_TXTL_NTP_RNAP_F*RNAP_DNA_plac_utr1_luxR*CUTP - reaction_304_TXTL_NTP_RNAP_R*CUTP_RNAP_DNA_plac_utr1_luxR;
    reaction_304_TXTL_NTP_RNAP_F = 1000; reaction_304_TXTL_NTP_RNAP_R = 120000000;
  reaction_305: AGTP_RNAP_DNA_plac_utr1_luxR + CUTP -> CUTP_AGTP_RNAP_DNA_plac_utr1_luxR; reaction_305_TXTL_NTP_RNAP_F*AGTP_RNAP_DNA_plac_utr1_luxR*CUTP - reaction_305_TXTL_NTP_RNAP_R*CUTP_AGTP_RNAP_DNA_plac_utr1_luxR;
    reaction_305_TXTL_NTP_RNAP_F = 1; reaction_305_TXTL_NTP_RNAP_R = 120000;
  reaction_306: CUTP_RNAP_DNA_plac_utr1_luxR + AGTP -> CUTP_AGTP_RNAP_DNA_plac_utr1_luxR; reaction_306_TXTL_NTP_RNAP_F*CUTP_RNAP_DNA_plac_utr1_luxR*AGTP - reaction_306_TXTL_NTP_RNAP_R*CUTP_AGTP_RNAP_DNA_plac_utr1_luxR;
    reaction_306_TXTL_NTP_RNAP_F = 1; reaction_306_TXTL_NTP_RNAP_R = 120000;
  reaction_307: CUTP_AGTP_RNAP_DNA_plac_utr1_luxR => term_RNAP_DNA_plac_utr1_luxR + RNA_utr1_luxR; reaction_307_TXTL_transcription_rate1*CUTP_AGTP_RNAP_DNA_plac_utr1_luxR;
    reaction_307_TXTL_transcription_rate1 = 0.001229508;
  reaction_308: Ribo_RNA_utr1_luxR + AA -> AA_Ribo_RNA_utr1_luxR; reaction_308_TL_AA_F*Ribo_RNA_utr1_luxR*AA - reaction_308_TL_AA_R*AA_Ribo_RNA_utr1_luxR;
    reaction_308_TL_AA_F = 300; reaction_308_TL_AA_R = 0.1;
  reaction_309: AA_Ribo_RNA_utr1_luxR + 2 AGTP -> AA_2AGTP_Ribo_RNA_utr1_luxR; reaction_309_TL_AGTP_F*AA_Ribo_RNA_utr1_luxR*AGTP^2 - reaction_309_TL_AGTP_R*AA_2AGTP_Ribo_RNA_utr1_luxR;
    reaction_309_TL_AGTP_F = 30; reaction_309_TL_AGTP_R = 10;
  reaction_310: AA_2AGTP_Ribo_RNA_utr1_luxR => term_Ribo_RNA_utr1_luxR; reaction_310_TXTL_TL_AA_consumption*AA_2AGTP_Ribo_RNA_utr1_luxR;
    reaction_310_TXTL_TL_AA_consumption = 0.03;
  reaction_311: AA_2AGTP_Ribo_RNA_utr1_luxR => term_Ribo_RNA_utr1_luxR + protein_luxR; reaction_311_TXTL_TL_rate*AA_2AGTP_Ribo_RNA_utr1_luxR;
    reaction_311_TXTL_TL_rate = 0.01;
  reaction_312: term_Ribo_RNA_utr1_luxR => RNA_utr1_luxR + Ribo; reaction_312_TXTL_RIBOBOUND_TERMINATION_RATE*term_Ribo_RNA_utr1_luxR;
    reaction_312_TXTL_RIBOBOUND_TERMINATION_RATE = 50;
  reaction_313: RNA_utr1_luxR + RNase -> RNA_utr1_luxR_RNase; reaction_313_TXTL_RNAdeg_F*RNA_utr1_luxR*RNase - reaction_313_TXTL_RNAdeg_R*RNA_utr1_luxR_RNase;
    reaction_313_TXTL_RNAdeg_F = 10; reaction_313_TXTL_RNAdeg_R = 2000;
  reaction_314: RNA_utr1_luxR_RNase => RNase; reaction_314_TXTL_RNAdeg_F*RNA_utr1_luxR_RNase;
    reaction_314_TXTL_RNAdeg_F = 0.002777778;
  reaction_315: Ribo_RNA_utr1_luxR + RNase -> Ribo_RNA_utr1_luxR_RNase; reaction_315_TXTL_RNAdeg_F*Ribo_RNA_utr1_luxR*RNase - reaction_315_TXTL_RNAdeg_R*Ribo_RNA_utr1_luxR_RNase;
    reaction_315_TXTL_RNAdeg_F = 10; reaction_315_TXTL_RNAdeg_R = 2000;
  reaction_316: Ribo_RNA_utr1_luxR_RNase => RNase + Ribo; reaction_316_TXTL_RNAdeg_F*Ribo_RNA_utr1_luxR_RNase;
    reaction_316_TXTL_RNAdeg_F = 0.002777778;
  reaction_317: AA_2AGTP_Ribo_RNA_utr1_luxR + RNase -> AA_2AGTP_Ribo_RNA_utr1_luxR_RNase; reaction_317_TXTL_RNAdeg_F*AA_2AGTP_Ribo_RNA_utr1_luxR*RNase - reaction_317_TXTL_RNAdeg_R*AA_2AGTP_Ribo_RNA_utr1_luxR_RNase;
    reaction_317_TXTL_RNAdeg_F = 10; reaction_317_TXTL_RNAdeg_R = 2000;
  reaction_318: AA_2AGTP_Ribo_RNA_utr1_luxR_RNase => RNase + AA + 2 AGTP + Ribo; reaction_318_TXTL_RNAdeg_F*AA_2AGTP_Ribo_RNA_utr1_luxR_RNase;
    reaction_318_TXTL_RNAdeg_F = 0.002777778;
  reaction_319: term_Ribo_RNA_utr1_luxR + RNase -> term_Ribo_RNA_utr1_luxR_RNase; reaction_319_TXTL_RNAdeg_F*term_Ribo_RNA_utr1_luxR*RNase - reaction_319_TXTL_RNAdeg_R*term_Ribo_RNA_utr1_luxR_RNase;
    reaction_319_TXTL_RNAdeg_F = 10; reaction_319_TXTL_RNAdeg_R = 2000;
  reaction_320: term_Ribo_RNA_utr1_luxR_RNase => RNase + Ribo; reaction_320_TXTL_RNAdeg_F*term_Ribo_RNA_utr1_luxR_RNase;
    reaction_320_TXTL_RNAdeg_F = 0.002777778;
  reaction_321: AA_Ribo_RNA_utr1_luxR + RNase -> AA_Ribo_RNA_utr1_luxR_RNase; reaction_321_TXTL_RNAdeg_F*AA_Ribo_RNA_utr1_luxR*RNase - reaction_321_TXTL_RNAdeg_R*AA_Ribo_RNA_utr1_luxR_RNase;
    reaction_321_TXTL_RNAdeg_F = 10; reaction_321_TXTL_RNAdeg_R = 2000;
  reaction_322: AA_Ribo_RNA_utr1_luxR_RNase => RNase + AA + Ribo; reaction_322_TXTL_RNAdeg_F*AA_Ribo_RNA_utr1_luxR_RNase;
    reaction_322_TXTL_RNAdeg_F = 0.002777778;
  reaction_323: AGTP => AGTP_USED; AGTPdeg_F*AGTP;

  // Events:
  event_324: at (time <= 5400): AGTPdeg_F = 0;
  event_325: at (time > 5400): AGTPdeg_F = 0.0002;
end
