// SBML level 2 version 4

model mix_of_E30VNPRL_E30VNPRL_gene_expression()
  // mix_of_E30VNPRL_E30VNPRL_gene_expression

  // Compartments:
  compartment contents = 1;

  // Species:
  species RNAP in contents = 100.0001/contents;
  species Ribo in contents = 30.00002/contents;
  species RecBCD in contents = 5.000003/contents;
  species RNase in contents = 100.0001/contents;
  species AGTP in contents = 3180048/contents;
  species CUTP in contents = 1908029/contents;
  species AA in contents = 3.180048e7/contents;
  species protein_tetR in contents = 0;
  species aTc in contents = 0;
  species protein_tetRdimer in contents = 0;
  species RNA_utr1_tetR in contents = 0; RNA_utr1_tetR is "RNA utr1--tetR";
  species Ribo_RNA_utr1_tetR in contents = 0; Ribo_RNA_utr1_tetR is "Ribo:RNA utr1--tetR";
  species DNA_psigX_utr1_tetR in contents = 0.5000003/contents; DNA_psigX_utr1_tetR is "DNA psigX--utr1--tetR";
  species RNAPSIGX in contents = 0;
  species RNAPSIGX_DNA_psigX_utr1_tetR in contents = 0; RNAPSIGX_DNA_psigX_utr1_tetR is "RNAPSIGX:DNA psigX--utr1--tetR";
  species AA_2AGTP_Ribo_RNA_utr1_tetR in contents = 0; AA_2AGTP_Ribo_RNA_utr1_tetR is "AA:2AGTP:Ribo:RNA utr1--tetR";
  species term_Ribo_RNA_utr1_tetR in contents = 0; term_Ribo_RNA_utr1_tetR is "term_Ribo:RNA utr1--tetR";
  species _2_aTc_protein_tetRdimer in contents = 0; _2_aTc_protein_tetRdimer is "2 aTc:protein tetRdimer";
  species CUTP_AGTP_RNAPSIGX_DNA_psigX_utr1_tetR in contents = 0; CUTP_AGTP_RNAPSIGX_DNA_psigX_utr1_tetR is "CUTP:AGTP:RNAPSIGX:DNA psigX--utr1--tetR";
  species term_RNAPSIGX_DNA_psigX_utr1_tetR in contents = 0; term_RNAPSIGX_DNA_psigX_utr1_tetR is "term_RNAPSIGX:DNA psigX--utr1--tetR";
  species AGTP_RNAPSIGX_DNA_psigX_utr1_tetR in contents = 0; AGTP_RNAPSIGX_DNA_psigX_utr1_tetR is "AGTP:RNAPSIGX:DNA psigX--utr1--tetR";
  species CUTP_RNAPSIGX_DNA_psigX_utr1_tetR in contents = 0; CUTP_RNAPSIGX_DNA_psigX_utr1_tetR is "CUTP:RNAPSIGX:DNA psigX--utr1--tetR";
  species AA_Ribo_RNA_utr1_tetR in contents = 0; AA_Ribo_RNA_utr1_tetR is "AA:Ribo:RNA utr1--tetR";
  species RNA_utr1_tetR_RNase in contents = 0; RNA_utr1_tetR_RNase is "RNA utr1--tetR:RNase";
  species Ribo_RNA_utr1_tetR_RNase in contents = 0; Ribo_RNA_utr1_tetR_RNase is "Ribo:RNA utr1--tetR:RNase";
  species AA_2AGTP_Ribo_RNA_utr1_tetR_RNase in contents = 0; AA_2AGTP_Ribo_RNA_utr1_tetR_RNase is "AA:2AGTP:Ribo:RNA utr1--tetR:RNase";
  species term_Ribo_RNA_utr1_tetR_RNase in contents = 0; term_Ribo_RNA_utr1_tetR_RNase is "term_Ribo:RNA utr1--tetR:RNase";
  species AA_Ribo_RNA_utr1_tetR_RNase in contents = 0; AA_Ribo_RNA_utr1_tetR_RNase is "AA:Ribo:RNA utr1--tetR:RNase";
  species AGTP_USED in contents = 0;

  // Parameters:
  AGTPdeg_F = 0;

  // Reactions:
  reaction_32: protein_tetRdimer + 2 aTc -> _2_aTc_protein_tetRdimer; TXTL_INDUCER_TETR_ATC_F*protein_tetRdimer*aTc^2 - TXTL_INDUCER_TETR_ATC_R*_2_aTc_protein_tetRdimer;
    TXTL_INDUCER_TETR_ATC_F = 1e-5; TXTL_INDUCER_TETR_ATC_R = 0.1;
  reaction_33: 2 protein_tetR -> protein_tetRdimer; kf*protein_tetR^2 - kr*protein_tetRdimer;
    kf = 1; kr = 1;
  reaction_34: RNA_utr1_tetR + Ribo -> Ribo_RNA_utr1_tetR; TXTL_UTR_UTR1_F*RNA_utr1_tetR*Ribo - TXTL_UTR_UTR1_R*Ribo_RNA_utr1_tetR;
    TXTL_UTR_UTR1_F = 0.2; TXTL_UTR_UTR1_R = 4;
  reaction_35: DNA_psigX_utr1_tetR + RNAPSIGX -> RNAPSIGX_DNA_psigX_utr1_tetR; TXTL_SIGX_RNAPbound_F*DNA_psigX_utr1_tetR*RNAPSIGX - TXTL_SIGX_RNAPbound_R*RNAPSIGX_DNA_psigX_utr1_tetR;
    TXTL_SIGX_RNAPbound_F = 10; TXTL_SIGX_RNAPbound_R = 0.1;
  reaction_36: CUTP_AGTP_RNAPSIGX_DNA_psigX_utr1_tetR => RNAPSIGX_DNA_psigX_utr1_tetR; TXTL_NTP_consumption*CUTP_AGTP_RNAPSIGX_DNA_psigX_utr1_tetR;
    TXTL_NTP_consumption = 0.7487705;
  reaction_37: term_RNAPSIGX_DNA_psigX_utr1_tetR => RNAPSIGX + DNA_psigX_utr1_tetR; TXTL_RNAPBOUND_TERMINATION_RATE*term_RNAPSIGX_DNA_psigX_utr1_tetR;
    TXTL_RNAPBOUND_TERMINATION_RATE = 0.05;
  reaction_38: RNAPSIGX_DNA_psigX_utr1_tetR + AGTP -> AGTP_RNAPSIGX_DNA_psigX_utr1_tetR; reaction_38_TXTL_NTP_RNAP_F*RNAPSIGX_DNA_psigX_utr1_tetR*AGTP - reaction_38_TXTL_NTP_RNAP_R*AGTP_RNAPSIGX_DNA_psigX_utr1_tetR;
    reaction_38_TXTL_NTP_RNAP_F = 1000; reaction_38_TXTL_NTP_RNAP_R = 120000000;
  reaction_39: RNAPSIGX_DNA_psigX_utr1_tetR + CUTP -> CUTP_RNAPSIGX_DNA_psigX_utr1_tetR; reaction_39_TXTL_NTP_RNAP_F*RNAPSIGX_DNA_psigX_utr1_tetR*CUTP - reaction_39_TXTL_NTP_RNAP_R*CUTP_RNAPSIGX_DNA_psigX_utr1_tetR;
    reaction_39_TXTL_NTP_RNAP_F = 1000; reaction_39_TXTL_NTP_RNAP_R = 120000000;
  reaction_40: AGTP_RNAPSIGX_DNA_psigX_utr1_tetR + CUTP -> CUTP_AGTP_RNAPSIGX_DNA_psigX_utr1_tetR; reaction_40_TXTL_NTP_RNAP_F*AGTP_RNAPSIGX_DNA_psigX_utr1_tetR*CUTP - reaction_40_TXTL_NTP_RNAP_R*CUTP_AGTP_RNAPSIGX_DNA_psigX_utr1_tetR;
    reaction_40_TXTL_NTP_RNAP_F = 1; reaction_40_TXTL_NTP_RNAP_R = 120000;
  reaction_41: CUTP_RNAPSIGX_DNA_psigX_utr1_tetR + AGTP -> CUTP_AGTP_RNAPSIGX_DNA_psigX_utr1_tetR; reaction_41_TXTL_NTP_RNAP_F*CUTP_RNAPSIGX_DNA_psigX_utr1_tetR*AGTP - reaction_41_TXTL_NTP_RNAP_R*CUTP_AGTP_RNAPSIGX_DNA_psigX_utr1_tetR;
    reaction_41_TXTL_NTP_RNAP_F = 1; reaction_41_TXTL_NTP_RNAP_R = 120000;
  reaction_42: CUTP_AGTP_RNAPSIGX_DNA_psigX_utr1_tetR => term_RNAPSIGX_DNA_psigX_utr1_tetR + RNA_utr1_tetR; TXTL_transcription_rate1*CUTP_AGTP_RNAPSIGX_DNA_psigX_utr1_tetR;
    TXTL_transcription_rate1 = 0.001229508;
  reaction_43: Ribo_RNA_utr1_tetR + AA -> AA_Ribo_RNA_utr1_tetR; TL_AA_F*Ribo_RNA_utr1_tetR*AA - TL_AA_R*AA_Ribo_RNA_utr1_tetR;
    TL_AA_F = 300; TL_AA_R = 0.1;
  reaction_44: AA_Ribo_RNA_utr1_tetR + 2 AGTP -> AA_2AGTP_Ribo_RNA_utr1_tetR; TL_AGTP_F*AA_Ribo_RNA_utr1_tetR*AGTP^2 - TL_AGTP_R*AA_2AGTP_Ribo_RNA_utr1_tetR;
    TL_AGTP_F = 30; TL_AGTP_R = 10;
  reaction_45: AA_2AGTP_Ribo_RNA_utr1_tetR => term_Ribo_RNA_utr1_tetR; TXTL_TL_AA_consumption*AA_2AGTP_Ribo_RNA_utr1_tetR;
    TXTL_TL_AA_consumption = 0.03;
  reaction_46: AA_2AGTP_Ribo_RNA_utr1_tetR => term_Ribo_RNA_utr1_tetR + protein_tetR; TXTL_TL_rate*AA_2AGTP_Ribo_RNA_utr1_tetR;
    TXTL_TL_rate = 0.01;
  reaction_47: term_Ribo_RNA_utr1_tetR => RNA_utr1_tetR + Ribo; TXTL_RIBOBOUND_TERMINATION_RATE*term_Ribo_RNA_utr1_tetR;
    TXTL_RIBOBOUND_TERMINATION_RATE = 50;
  reaction_48: RNA_utr1_tetR + RNase -> RNA_utr1_tetR_RNase; reaction_48_TXTL_RNAdeg_F*RNA_utr1_tetR*RNase - reaction_48_TXTL_RNAdeg_R*RNA_utr1_tetR_RNase;
    reaction_48_TXTL_RNAdeg_F = 10; reaction_48_TXTL_RNAdeg_R = 2000;
  reaction_49: RNA_utr1_tetR_RNase => RNase; reaction_49_TXTL_RNAdeg_F*RNA_utr1_tetR_RNase;
    reaction_49_TXTL_RNAdeg_F = 0.002777778;
  reaction_50: Ribo_RNA_utr1_tetR + RNase -> Ribo_RNA_utr1_tetR_RNase; reaction_50_TXTL_RNAdeg_F*Ribo_RNA_utr1_tetR*RNase - reaction_50_TXTL_RNAdeg_R*Ribo_RNA_utr1_tetR_RNase;
    reaction_50_TXTL_RNAdeg_F = 10; reaction_50_TXTL_RNAdeg_R = 2000;
  reaction_51: Ribo_RNA_utr1_tetR_RNase => RNase + Ribo; reaction_51_TXTL_RNAdeg_F*Ribo_RNA_utr1_tetR_RNase;
    reaction_51_TXTL_RNAdeg_F = 0.002777778;
  reaction_52: AA_2AGTP_Ribo_RNA_utr1_tetR + RNase -> AA_2AGTP_Ribo_RNA_utr1_tetR_RNase; reaction_52_TXTL_RNAdeg_F*AA_2AGTP_Ribo_RNA_utr1_tetR*RNase - reaction_52_TXTL_RNAdeg_R*AA_2AGTP_Ribo_RNA_utr1_tetR_RNase;
    reaction_52_TXTL_RNAdeg_F = 10; reaction_52_TXTL_RNAdeg_R = 2000;
  reaction_53: AA_2AGTP_Ribo_RNA_utr1_tetR_RNase => RNase + AA + 2 AGTP + Ribo; reaction_53_TXTL_RNAdeg_F*AA_2AGTP_Ribo_RNA_utr1_tetR_RNase;
    reaction_53_TXTL_RNAdeg_F = 0.002777778;
  reaction_54: term_Ribo_RNA_utr1_tetR + RNase -> term_Ribo_RNA_utr1_tetR_RNase; reaction_54_TXTL_RNAdeg_F*term_Ribo_RNA_utr1_tetR*RNase - reaction_54_TXTL_RNAdeg_R*term_Ribo_RNA_utr1_tetR_RNase;
    reaction_54_TXTL_RNAdeg_F = 10; reaction_54_TXTL_RNAdeg_R = 2000;
  reaction_55: term_Ribo_RNA_utr1_tetR_RNase => RNase + Ribo; reaction_55_TXTL_RNAdeg_F*term_Ribo_RNA_utr1_tetR_RNase;
    reaction_55_TXTL_RNAdeg_F = 0.002777778;
  reaction_56: AA_Ribo_RNA_utr1_tetR + RNase -> AA_Ribo_RNA_utr1_tetR_RNase; reaction_56_TXTL_RNAdeg_F*AA_Ribo_RNA_utr1_tetR*RNase - reaction_56_TXTL_RNAdeg_R*AA_Ribo_RNA_utr1_tetR_RNase;
    reaction_56_TXTL_RNAdeg_F = 10; reaction_56_TXTL_RNAdeg_R = 2000;
  reaction_57: AA_Ribo_RNA_utr1_tetR_RNase => RNase + AA + Ribo; reaction_57_TXTL_RNAdeg_F*AA_Ribo_RNA_utr1_tetR_RNase;
    reaction_57_TXTL_RNAdeg_F = 0.002777778;
  reaction_58: AGTP => AGTP_USED; AGTPdeg_F*AGTP;

  // Events:
  event_59: at (time <= 5400): AGTPdeg_F = 0;
  event_60: at (time > 5400): AGTPdeg_F = 0.0002;
end
