// SBML level 3 version 2

model shared_model_of_cell()
  // model units - substance: count, time: second, extent: mole

  // Compartments:
  compartment cell = 3 litre;

  // Species:
  species X_DP1 in cell = NaN/cell;
  species inP_X_DP1 in cell = NaN/cell; inP_X_DP1 is "inP:X";
  species E_DP1 in cell = NaN/cell;
  species E_X_P_DP1 in cell = NaN/cell; E_X_P_DP1 is "E:X:P";
  species inP_X_P_DP1 in cell = NaN/cell; inP_X_P_DP1 is "inP:X:P";
  species X_P_P_DP1 in cell = NaN/cell; X_P_P_DP1 is "X:P:P";
  species E_X_P_P_DP1 in cell = NaN/cell; E_X_P_P_DP1 is "E:X:P:P";
  species X_DP2 in cell = NaN/cell;
  species inP_X_DP2 in cell = NaN/cell; inP_X_DP2 is "inP:X";
  species E_DP2 in cell = NaN/cell;
  species E_X_P_DP2 in cell = NaN/cell; E_X_P_DP2 is "E:X:P";
  species inP_X_P_DP2 in cell = NaN/cell; inP_X_P_DP2 is "inP:X:P";
  species X_P_P_DP2 in cell = NaN/cell; X_P_P_DP2 is "X:P:P";
  species E_X_P_P_DP2 in cell = NaN/cell; E_X_P_P_DP2 is "E:X:P:P";
  species inp_IFFL_IFFL in cell = NaN/cell;
  species DA_IFFL_IFFL in cell = NaN/cell;
  species C1_IFFL_IFFL in cell = NaN/cell;
  species mA_IFFL_IFFL in cell = NaN/cell;
  species pA_IFFL_IFFL in cell = NaN/cell;
  species C2_IFFL_IFFL in cell = NaN/cell;
  species DB_IFFL_IFFL in cell = NaN/cell;
  species mB_IFFL_IFFL in cell = NaN/cell;
  species pB_IFFL_IFFL in cell = NaN/cell;
  species C3_IFFL_IFFL in cell = NaN/cell;
  species DC_IFFL_IFFL in cell = NaN/cell;
  species C4_IFFL_IFFL in cell = NaN/cell;
  species C5_IFFL_IFFL in cell = NaN/cell;
  species C6_IFFL_IFFL in cell = NaN/cell;
  species mC_IFFL_IFFL in cell = NaN/cell;
  species out_IFFL_IFFL in cell = NaN/cell;
  species $inP_DP1_shared in cell = NaN/cell;
  species X_P_DP1_shared in cell = NaN/cell; X_P_DP1_shared is "X:P";

  // Parameters:
  k1f_DP1 = 1 per_second;
  k1r_DP1 = 1 per_second;
  k2f_DP1 = 1 per_second;
  k3f_DP1 = 1 per_second;
  k3r_DP1 = 1 per_second;
  k4f_DP1 = 1 per_second;
  k5f_DP1 = 1 per_second;
  k5r_DP1 = 1 per_second;
  k6f_DP1 = 1 per_second;
  k7f_DP1 = 1 per_second;
  k7r_DP1 = 1 per_second;
  k8f_DP1 = 1 per_second;
  k1f_DP2 = 1 per_second;
  k1r_DP2 = 1 per_second;
  k2f_DP2 = 1 per_second;
  k3f_DP2 = 1 per_second;
  k3r_DP2 = 1 per_second;
  k4f_DP2 = 1 per_second;
  k5f_DP2 = 1 per_second;
  k5r_DP2 = 1 per_second;
  k6f_DP2 = 1 per_second;
  k7f_DP2 = 1 per_second;
  k7r_DP2 = 1 per_second;
  k8f_DP2 = 1 per_second;
  k1f_IFFL = 1 per_second;
  k1r_IFFL = 1 per_second;
  k2f_IFFL = 1 per_second;
  k3f_IFFL = 1 per_second;
  k4f_IFFL = 1 per_second;
  k5f_IFFL = 1 per_second;
  k6f_IFFL = 1 per_second;
  k6r_IFFL = 1 per_second;
  k7f_IFFL = 1 per_second;
  k8f_IFFL = 1 per_second;
  k9f_IFFL = 1 per_second;
  k10f_IFFL = 1 per_second;
  k11f_IFFL = 1 per_second;
  k11r_IFFL = 1 per_second;
  k12f_IFFL = 1 per_second;
  k12r_IFFL = 1 per_second;
  k13f_IFFL = 1 per_second;
  k13r_IFFL = 1 per_second;
  k14f_IFFL = 1 per_second;
  k14r_IFFL = 1 per_second;
  k15f_IFFL = 1 per_second;
  k16f_IFFL = 1 per_second;
  k17f_IFFL = 1 per_second;
  k18f_IFFL = 1 per_second;

  // Reactions:
  r1_DP1: $inP_DP1_shared + X_DP1 -> inP_X_DP1; k1f_DP1*inP_DP1_shared*X_DP1 - k1r_DP1*inP_X_DP1;
  r2_DP1: inP_X_DP1 => $inP_DP1_shared + X_P_DP1_shared; k2f_DP1*inP_X_DP1;
  r3_DP1: E_DP1 + X_P_DP1_shared -> E_X_P_DP1; k3f_DP1*E_DP1*X_P_DP1_shared - k3r_DP1*E_X_P_DP1;
  r4_DP1: E_X_P_DP1 => E_DP1 + X_DP1; k4f_DP1*E_X_P_DP1;
  r5_DP1: $inP_DP1_shared + X_P_DP1_shared -> inP_X_P_DP1; k5f_DP1*inP_DP1_shared*X_P_DP1_shared - k5r_DP1*inP_X_P_DP1;
  r6_DP1: inP_X_P_DP1 => X_P_P_DP1 + $inP_DP1_shared; k6f_DP1*inP_X_P_DP1;
  r7_DP1: E_DP1 + X_P_P_DP1 -> E_X_P_P_DP1; k7f_DP1*E_DP1*X_P_P_DP1 - k7r_DP1*E_X_P_P_DP1;
  r8_DP1: E_X_P_P_DP1 => X_P_DP1_shared + E_DP1; k8f_DP1*E_X_P_P_DP1;
  r1_DP2: $inP_DP1_shared + X_DP2 -> inP_X_DP2; k1f_DP2*inP_DP1_shared*X_DP2 - k1r_DP2*inP_X_DP2;
  r2_DP2: inP_X_DP2 => $inP_DP1_shared + X_P_DP1_shared; k2f_DP2*inP_X_DP2;
  r3_DP2: E_DP2 + X_P_DP1_shared -> E_X_P_DP2; k3f_DP2*E_DP2*X_P_DP1_shared - k3r_DP2*E_X_P_DP2;
  r4_DP2: E_X_P_DP2 => E_DP2 + X_DP2; k4f_DP2*E_X_P_DP2;
  r5_DP2: $inP_DP1_shared + X_P_DP1_shared -> inP_X_P_DP2; k5f_DP2*inP_DP1_shared*X_P_DP1_shared - k5r_DP2*inP_X_P_DP2;
  r6_DP2: inP_X_P_DP2 => X_P_P_DP2 + $inP_DP1_shared; k6f_DP2*inP_X_P_DP2;
  r7_DP2: E_DP2 + X_P_P_DP2 -> E_X_P_P_DP2; k7f_DP2*E_DP2*X_P_P_DP2 - k7r_DP2*E_X_P_P_DP2;
  r8_DP2: E_X_P_P_DP2 => X_P_DP1_shared + E_DP2; k8f_DP2*E_X_P_P_DP2;
  r1_IFFL: inp_IFFL_IFFL + DA_IFFL_IFFL -> C1_IFFL_IFFL; k1f_IFFL*inp_IFFL_IFFL*DA_IFFL_IFFL - k1r_IFFL*C1_IFFL_IFFL;
  r2_IFFL: C1_IFFL_IFFL => C1_IFFL_IFFL + mA_IFFL_IFFL; k2f_IFFL*C1_IFFL_IFFL;
  r3_IFFL: mA_IFFL_IFFL => mA_IFFL_IFFL + pA_IFFL_IFFL; k3f_IFFL*mA_IFFL_IFFL;
  r4_IFFL: mA_IFFL_IFFL => ; k4f_IFFL*mA_IFFL_IFFL;
  r5_IFFL: pA_IFFL_IFFL => ; k5f_IFFL*pA_IFFL_IFFL;
  r6_IFFL: pA_IFFL_IFFL + DB_IFFL_IFFL -> C2_IFFL_IFFL; k6f_IFFL*pA_IFFL_IFFL*DB_IFFL_IFFL - k6r_IFFL*C2_IFFL_IFFL;
  r7_IFFL: C2_IFFL_IFFL => C2_IFFL_IFFL + mB_IFFL_IFFL; k7f_IFFL*C2_IFFL_IFFL;
  r8_IFFL: mB_IFFL_IFFL => mB_IFFL_IFFL + pB_IFFL_IFFL; k8f_IFFL*mB_IFFL_IFFL;
  r9_IFFL: mB_IFFL_IFFL => ; k9f_IFFL*mB_IFFL_IFFL;
  r10_IFFL: pB_IFFL_IFFL => ; k10f_IFFL*pB_IFFL_IFFL;
  r11_IFFL: pB_IFFL_IFFL + DC_IFFL_IFFL -> C3_IFFL_IFFL; k11f_IFFL*pB_IFFL_IFFL*DC_IFFL_IFFL - k11r_IFFL*C3_IFFL_IFFL;
  r12_IFFL: pA_IFFL_IFFL + DC_IFFL_IFFL -> C4_IFFL_IFFL; k12f_IFFL*pA_IFFL_IFFL*DC_IFFL_IFFL - k12r_IFFL*C4_IFFL_IFFL;
  r13_IFFL: pA_IFFL_IFFL + C3_IFFL_IFFL -> C5_IFFL_IFFL; k13f_IFFL*pA_IFFL_IFFL*C3_IFFL_IFFL - k13r_IFFL*C5_IFFL_IFFL;
  r14_IFFL: pB_IFFL_IFFL + C4_IFFL_IFFL -> C6_IFFL_IFFL; k14f_IFFL*pB_IFFL_IFFL*C4_IFFL_IFFL - k14r_IFFL*C6_IFFL_IFFL;
  r15_IFFL: C4_IFFL_IFFL => C4_IFFL_IFFL + mC_IFFL_IFFL; k15f_IFFL*C4_IFFL_IFFL;
  r16_IFFL: mC_IFFL_IFFL => mC_IFFL_IFFL + out_IFFL_IFFL; k16f_IFFL*mC_IFFL_IFFL;
  r17_IFFL: mC_IFFL_IFFL => ; k17f_IFFL*mC_IFFL_IFFL;
  r18_IFFL: out_IFFL_IFFL => ; k18f_IFFL*out_IFFL_IFFL;

  // Unit definitions:
  unit per_second = 1 / second;
  unit count = dimensionless;
end
