// SBML level 3 version 1

model IFFLmodel_1()
  // model units - substance: count, time: second, extent: mole

  // Compartments:
  compartment cell = 1 litre;

  // Species:
  species inp_IFFL_1 in cell = 50/cell;
  species DA_IFFL_1 in cell = 50/cell;
  species C1_IFFL_1 in cell = 0;
  species mA_IFFL_1 in cell = 0;
  species pA_IFFL_1 in cell = 0;
  species C2_IFFL_1 in cell = 0;
  species DB_IFFL_1 in cell = 50/cell;
  species mB_IFFL_1 in cell = 0;
  species pB_IFFL_1 in cell = 0;
  species C3_IFFL_1 in cell = 0;
  species DC_IFFL_1 in cell = 50/cell;
  species C4_IFFL_1 in cell = 0;
  species C5_IFFL_1 in cell = 0;
  species C6_IFFL_1 in cell = 0;
  species mC_IFFL_1 in cell = 0;
  species out_IFFL_1 in cell = 0;

  // Parameters:
  k1f_1 = 1 per_second;
  k1r_1 = 1 per_second;
  k2f_1 = 1 per_second;
  k3f_1 = 1 per_second;
  k4f_1 = 1 per_second;
  k5f_1 = 1 per_second;
  k6f_1 = 1 per_second;
  k6r_1 = 1 per_second;
  k7f_1 = 1 per_second;
  k8f_1 = 1 per_second;
  k9f_1 = 1 per_second;
  k10f_1 = 1 per_second;
  k11f_1 = 1 per_second;
  k11r_1 = 1 per_second;
  k12f_1 = 1 per_second;
  k12r_1 = 1 per_second;
  k13f_1 = 1 per_second;
  k13r_1 = 1 per_second;
  k14f_1 = 1 per_second;
  k14r_1 = 1 per_second;
  k15f_1 = 1 per_second;
  k16f_1 = 1 per_second;
  k17f_1 = 1 per_second;
  k18f_1 = 1 per_second;

  // Reactions:
  r1_1: inp_IFFL_1 + DA_IFFL_1 -> C1_IFFL_1; k1f_1*inp_IFFL_1*DA_IFFL_1 - k1r_1*C1_IFFL_1;  // fast
  r2_1: C1_IFFL_1 => C1_IFFL_1 + mA_IFFL_1; k2f_1*C1_IFFL_1;
  r3_1: mA_IFFL_1 => mA_IFFL_1 + pA_IFFL_1; k3f_1*mA_IFFL_1;
  r4_1: mA_IFFL_1 => ; k4f_1*mA_IFFL_1;
  r5_1: pA_IFFL_1 => ; k5f_1*pA_IFFL_1;
  r6_1: pA_IFFL_1 + DB_IFFL_1 -> C2_IFFL_1; k6f_1*pA_IFFL_1*DB_IFFL_1 - k6r_1*C2_IFFL_1;
  r7_1: C2_IFFL_1 => C2_IFFL_1 + mB_IFFL_1; k7f_1*C2_IFFL_1;
  r8_1: mB_IFFL_1 => mB_IFFL_1 + pB_IFFL_1; k8f_1*mB_IFFL_1;
  r9_1: mB_IFFL_1 => ; k9f_1*mB_IFFL_1;
  r10_1: pB_IFFL_1 => ; k10f_1*pB_IFFL_1;
  r11_1: pB_IFFL_1 + DC_IFFL_1 -> C3_IFFL_1; k11f_1*pB_IFFL_1*DC_IFFL_1 - k11r_1*C3_IFFL_1;
  r12_1: pA_IFFL_1 + DC_IFFL_1 -> C4_IFFL_1; k12f_1*pA_IFFL_1*DC_IFFL_1 - k12r_1*C4_IFFL_1;
  r13_1: pA_IFFL_1 + C3_IFFL_1 -> C5_IFFL_1; k13f_1*pA_IFFL_1*C3_IFFL_1 - k13r_1*C5_IFFL_1;
  r14_1: pB_IFFL_1 + C4_IFFL_1 -> C6_IFFL_1; k14f_1*pB_IFFL_1*C4_IFFL_1 - k14r_1*C6_IFFL_1;
  r15_1: C4_IFFL_1 => C4_IFFL_1 + mC_IFFL_1; k15f_1*C4_IFFL_1;
  r16_1: mC_IFFL_1 => mC_IFFL_1 + out_IFFL_1; k16f_1*mC_IFFL_1;
  r17_1: mC_IFFL_1 => ; k17f_1*mC_IFFL_1;
  r18_1: out_IFFL_1 => ; k18f_1*out_IFFL_1;

  // Unit definitions:
  unit per_second = 1 / second;
  unit count = dimensionless;
end
